folder HE1: version=37; creator=Apsim 7.10-r4191
  folder
    variables My Variables
      variable:
        today format dd/mm/yyyy as Date
        daysAfterSowing as Das
        day_of_year
        Stage
        Biomass
        GreenWt
        Biomass units g/m^2 as BiomassWt
        RootGreenWt
        LeafGreenWt
        StemGreenWt
        RachisGreenWt
        GrainGreenWt
        biomass_n
        GreenN
        RootGreenN
        LeafGreenN
        StemGreenN
        RachisGreenN
        GrainGreenN
        GrainGreenNConc
        GrainNo
        GrainSize
        HI
        LeafNo
        LAI
        SLAI
        ESW
        no3() as NO3
        SLN
        WaterSD
        sw()
        TPLA
        SPLA
        dlt_dm_green
        sw_supply
        radn_int
        DeltaGreenWt
        DeltaLAI
        DeltaGreenN
        DeltaLeafGreenN
        DeltaSLAI
        DeltaTT
        SenescedWt
        SenescedN
        RootSenescedN
        RootSenescedWt
        LeafSenescedWt
        LeafSenescedN
        RLV
        RootDepth
        RootProportion
        sum(sw_uptake)
        n_total_uptake
        n_supply_soil
        n_cum_uptake
        sw_demand
        sw_deficit
        root_depth
        no3
        sw
        sw_uptake
        n_sd_ratio
        no3_demand
        esw
        swdef_pheno
        swdef_photo
        swdef_expan
        nfact_pheno
        nfact_expan
        sw_dep
        n_diffusion_uptake
        n_massflow_uptake
        cover_green
        cover_tot
        DeltaTTfm
      constants: constant precision=8
  simulation Sorghum_SomeStress
    clock
      start_date = 08/01/1997  # Select the start date of the simulation
      end_date = 30/06/1997  # Select the end date of the simulation
    summaryfile
    metfile met: filename=HE1996.met
    area paddock
      folder Manager folder
        manager Sow SkipRow on a fixed date
          # Sowing criteria
          date = 9/01/1997  # Enter sowing date (d/m/yyyy)
          # Sowing parameters
          crop = Sorghum  # Enter name of crop to sow
          density = 10  # Enter sowing density (plants/m2)
          depth = 30  # Enter sowing depth (mm)
          cultivar = Buster  # Enter cultivar
          row_spacing = 0.5  # Enter row spacing (m)
          RowConfiguration = solid  # Enter skip row configuration
          ftn = 0  # Enter Fertile Tiller No.
          on start_of_day:
```
            if (paddock_is_fallow() = 1 and today = date('[date]')) then
              [crop] sow plants =[density], sowing_depth = [depth], cultivar = [cultivar], row_spacing = [row_spacing], skip = [RowConfiguration], tiller_no_fertile = [ftn] ()
            endif
```
        manager Harvesting rule
          # Harvesting criteria
          crop = Sorghum  # Enter name of crop to harvest when ripe
          on end_of_day:
```
           if [crop].StageName = 'harvest_ripe' or [crop].plant_status = 'dead' then
              [crop]  harvest
              [crop]  end_crop
           endif
```
      irrigation
        automatic_irrigation = off  # switch
        asw_depth = 600.0  # Depth to which ASW is calculated. (mm)
        crit_fr_asw = 0.5  # Fraction of ASW below which irrigation is applied (0-1.0)
        irrigation_efficiency = 1.0  # Efficiency of the irrigation. (0-1.0)
        default_no3_conc = 0.0  # Nitrate concentration (ppm N)
        default_nh4_conc = 0.0  # Ammonium concentration (ppm N)
        default_cl_conc = 0.0  # Chloride concentration (ppm Cl)
      fertiliser
      operations
        9/01/1997  Irrigation apply amount = 52
        16/01/1997  Irrigation apply amount = 36
        21/01/1997  Irrigation apply amount = 18
        29/01/1997  Irrigation apply amount = 20
        7/02/1997  Irrigation apply amount = 14
        13/03/1997  Irrigation apply amount = 30
        21/03/1997  Irrigation apply amount = 45
        10/04/1997  Irrigation apply amount = 27
        17/04/1997  Irrigation apply amount = 42
        2/05/1997  Irrigation apply amount = 27
        20/12/1996  fertiliser apply amount = 33 (kg/ha), depth = 50 (mm), type = NO3_N ()
        23/12/1996  fertiliser apply amount = 0 (kg/ha), depth = 50 (mm), type = NO3_N ()
        23/12/1996  fertiliser apply amount = 119 (kg/ha), depth = 50 (mm), type = NO3_N ()
        12/02/1997  fertiliser apply amount = 59 (kg/ha), depth = 50 (mm), type = NO3_N ()
        21/03/1997  fertiliser apply amount = 59 (kg/ha), depth = 50 (mm), type = NO3_N ()
      sorghum
      Soil HRS: SoilType=HMM; LocalName=HRS; Site=HRS; NearestTown=Unknown; Region=SE Queensland; NaturalVegetation=Unknown; Latitude=0; Longitude=0; YearOfSampling=0
        Water
          Thickness  BD    AirDry  LL15   DUL   SAT
          100        1.34  0.08    0.226  0.42  0.45
          100        1.34  0.19    0.226  0.42  0.45
          200        1.33  0.23    0.258  0.46  0.48
          200        1.38  0.26    0.27   0.46  0.47
          200        1.4   0.26    0.268  0.43  0.45
          200        1.55  0.28    0.304  0.4   0.41
          200        1.59  0.25    0.335  0.37  0.38
          200        1.63  0.28    0.33   0.33  0.37
          200        1.66  0.3     0.32   0.32  0.37
          200        1.68  0.31    0.33   0.33  0.36
          SoilCrop Sorghum
            LL=[0.226, 0.226, 0.258, 0.27, 0.268, 0.304, 0.335, 0.33, 0.32, 0.33]
            KL=[0.07, 0.07, 0.07, 0.07, 0.06, 0.06, 0.06, 0.05, 0.05, 0.04]
            XF=[1, 1, 1, 1, 1, 1, 1, 1, 1, 1]
        SoilWater: SummerCona=6.5; SummerU=1.5; SummerDate=1-Nov; WinterCona=6.5; WinterU=1.5; WinterDate=1-Apr; DiffusConst=40; DiffusSlope=16; Salb=0.2; CN2Bare=85; CNRed=20; CNCov=0.8; Thickness=[100, 100, 200, 200, 200, 200, 200, 200, 200, 200]; SWCON=[0.3, 0.3, 0.3, 0.3, 0.3, 0.3, 0.3, 0.3, 0.3, 0.3]
        SoilOrganicMatter: RootCN=50; RootWt=1000; SoilCN=12.5; EnrACoeff=7.4; EnrBCoeff=0.2; OCUnits=Total
          Thickness  OC    FBiom  FInert
          100        1.19  0.05   0.45
          100        0.59  0.02   0.6
          200        0.45  0.01   0.75
          200        0.3   0.01   0.9
          200        0.2   0.01   0.9
          200        0.16  0.01   0.9
          200        0.17  0.01   0.9
          200        0.17  0.05   0.9
          200        0.17  0.02   0.9
          200        0.17  0.01   0.9
        Analysis: Thickness=[100, 100, 200, 200, 200, 200, 200, 200, 200, 200]; PH=[6.3, 6.4, 6.5, 6.6, 6.6, 6.5, 6.5, 6.5, 6.5, 6.5]; PHUnits=Water; BoronUnits=HotWater
        Sample Initial Water: Thickness=[100, 100, 200, 200, 200, 200, 200, 200, 200, 200]; NO3Units=ppm; NH4Units=ppm; SWUnits=Volumetric; OCUnits=Total; PHUnits=Water
          SW=[0.235, 0.252, 0.27, 0.3, 0.268, 0.304, 0.335, 0.33, 0.32, 0.33]
        Sample Initial Nitrogen: NO3Units=ppm; NH4Units=ppm; SWUnits=Volumetric; OCUnits=Total; PHUnits=Water
          Thickness  NO3    NH4
          100        10.4   0.1
          100        1.633  0.1
          200        1.233  0.1
          200        0.9    0.1
          200        1.1    0.1
          200        1.467  0.1
          200        3.633  0.1
          200        5.667  0.1
          200        5.8    0.1
          200        7.267  0.1
      outputfile: filename=Sorghum_SomeStress.out; title=Sorghum_SomeStress
        variables My Variables -> /HE1/folder/My Variables
        events My Variables Events: event=end_day
  simulation Sorghum_NStress
    clock
      start_date = 08/01/1997  # Select the start date of the simulation
      end_date = 30/06/1997  # Select the end date of the simulation
    summaryfile
    metfile met: filename=HE1996.met
    area paddock
      folder Manager folder: same as Sorghum_SomeStress.paddock.Manager folder
      irrigation: same as Sorghum_SomeStress.paddock.Irrigation
      fertiliser
      operations
        9/01/1997  Irrigation apply amount = 100
        16/01/1997  Irrigation apply amount = 36
        21/01/1997  Irrigation apply amount = 100
        29/01/1997  Irrigation apply amount = 20
        7/02/1997  Irrigation apply amount = 14
        13/03/1997  Irrigation apply amount = 100
        21/03/1997  Irrigation apply amount = 45
        10/04/1997  Irrigation apply amount = 27
        17/04/1997  Irrigation apply amount = 100
        2/05/1997  Irrigation apply amount = 27
        20/12/1996  fertiliser apply amount = 0 (kg/ha), depth = 50 (mm), type = NO3_N ()
        23/12/1996  fertiliser apply amount = 0 (kg/ha), depth = 50 (mm), type = NO3_N ()
        23/12/1996  fertiliser apply amount = 0 (kg/ha), depth = 50 (mm), type = NO3_N ()
        12/02/1997  fertiliser apply amount = 0 (kg/ha), depth = 50 (mm), type = NO3_N ()
        21/03/1997  fertiliser apply amount = 0 (kg/ha), depth = 50 (mm), type = NO3_N ()
      sorghum
      Soil HRS: same as Sorghum_SomeStress.paddock.HRS
      outputfile: filename=Sorghum_NStress.out; title=Sorghum_NStress
        variables My Variables -> /HE1/folder/My Variables
        events My Variables Events: event=end_day
  simulation Sorghum_WaterStress
    clock
      start_date = 08/01/1997  # Select the start date of the simulation
      end_date = 30/06/1997  # Select the end date of the simulation
    summaryfile
    metfile met: filename=HE1996.met
    area paddock
      folder Manager folder: same as Sorghum_SomeStress.paddock.Manager folder
      irrigation: same as Sorghum_SomeStress.paddock.Irrigation
      fertiliser
      operations
        9/01/1997  Irrigation apply amount = 52
        16/01/1997  Irrigation apply amount = 0
        21/01/1997  Irrigation apply amount = 0
        29/01/1997  Irrigation apply amount = 0
        7/02/1997  Irrigation apply amount = 0
        13/03/1997  Irrigation apply amount = 0
        21/03/1997  Irrigation apply amount = 0
        10/04/1997  Irrigation apply amount = 0
        17/04/1997  Irrigation apply amount = 0
        2/05/1997  Irrigation apply amount = 0
        20/12/1996  fertiliser apply amount = 33 (kg/ha), depth = 50 (mm), type = NO3_N ()
        23/12/1996  fertiliser apply amount = 150 (kg/ha), depth = 50 (mm), type = NO3_N ()
        23/12/1996  fertiliser apply amount = 119 (kg/ha), depth = 50 (mm), type = NO3_N ()
        12/02/1997  fertiliser apply amount = 59 (kg/ha), depth = 50 (mm), type = NO3_N ()
        21/03/1997  fertiliser apply amount = 59 (kg/ha), depth = 50 (mm), type = NO3_N ()
      sorghum
      Soil HRS: same as Sorghum_SomeStress.paddock.HRS
      outputfile: filename=Sorghum_WaterStress.out; title=Sorghum_WaterStress
        variables My Variables -> /HE1/folder/My Variables
        events My Variables Events: event=end_day
  simulation Sorghum_NoStress
    clock
      start_date = 08/01/1997  # Select the start date of the simulation
      end_date = 30/06/1997  # Select the end date of the simulation
    summaryfile
    metfile met: filename=HE1996.met
    area paddock
      folder Manager folder: same as Sorghum_SomeStress.paddock.Manager folder
      irrigation: same as Sorghum_SomeStress.paddock.Irrigation
      fertiliser
      operations
        9/01/1997  Irrigation apply amount = 100
        16/01/1997  Irrigation apply amount = 36
        21/01/1997  Irrigation apply amount = 100
        29/01/1997  Irrigation apply amount = 20
        7/02/1997  Irrigation apply amount = 14
        13/03/1997  Irrigation apply amount = 100
        21/03/1997  Irrigation apply amount = 45
        10/04/1997  Irrigation apply amount = 27
        17/04/1997  Irrigation apply amount = 100
        2/05/1997  Irrigation apply amount = 27
        20/12/1996  fertiliser apply amount = 33 (kg/ha), depth = 50 (mm), type = NO3_N ()
        23/12/1996  fertiliser apply amount = 150 (kg/ha), depth = 50 (mm), type = NO3_N ()
        23/12/1996  fertiliser apply amount = 119 (kg/ha), depth = 50 (mm), type = NO3_N ()
        12/02/1997  fertiliser apply amount = 59 (kg/ha), depth = 50 (mm), type = NO3_N ()
        21/03/1997  fertiliser apply amount = 59 (kg/ha), depth = 50 (mm), type = NO3_N ()
      sorghum
      Soil HRS: same as Sorghum_SomeStress.paddock.HRS
      outputfile: filename=Sorghum_NoStress.out; title=Sorghum_NoStress
        variables My Variables -> /HE1/folder/My Variables
        events My Variables Events: event=end_day
  simulation Sorghum_NoStress_ftn
    clock
      start_date = 08/01/1997  # Select the start date of the simulation
      end_date = 30/06/1997  # Select the end date of the simulation
    summaryfile
    metfile met: filename=HE1996.met
    area paddock
      folder Manager folder
        manager Sow SkipRow on a fixed date
          # Sowing criteria
          date = 9/01/1997  # Enter sowing date (d/m/yyyy)
          # Sowing parameters
          crop = Sorghum  # Enter name of crop to sow
          density = 10  # Enter sowing density (plants/m2)
          depth = 30  # Enter sowing depth (mm)
          cultivar = Buster  # Enter cultivar
          row_spacing = 0.5  # Enter row spacing (m)
          RowConfiguration = solid  # Enter skip row configuration
          ftn = 2  # Enter Fertile Tiller No.
          on start_of_day:
          script: same as in Sorghum_SomeStress.paddock.Manager folder.Sow SkipRow on a fixed date
        manager Harvesting rule
          # Harvesting criteria
          crop = Sorghum  # Enter name of crop to harvest when ripe
          on end_of_day:
          script: same as in Sorghum_SomeStress.paddock.Manager folder.Harvesting rule
      irrigation: same as Sorghum_SomeStress.paddock.Irrigation
      fertiliser
      operations: same as Sorghum_NoStress.paddock.operations
      sorghum
      Soil HRS: same as Sorghum_SomeStress.paddock.HRS
      outputfile: filename=Sorghum_NoStress_ftn.out; title=Sorghum_NoStress_ftn
        variables My Variables -> /HE1/folder/My Variables
        events My Variables Events: event=end_day
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