folder Validation: version=37; creator=Apsim 7.10-r4191
  folder shared
    variables My Variables
      variable:
        today format dd/mm/yyyy as Date
        daysAfterSowing as Das
        day_of_year
        Stage
        Biomass
        GreenWt
        Biomass units g/m^2 as BiomassWt
        RootGreenWt
        LeafGreenWt
        StemGreenWt
        RachisGreenWt
        GrainGreenWt
        biomass_n
        GreenN
        RootGreenN
        LeafGreenN
        StemGreenN
        RachisGreenN
        GrainGreenN
        GrainGreenNConc
        GrainNo
        GrainSize
        HI
        LeafNo
        LAI
        SLAI
        ESW
        no3() as NO3
        SLN
        WaterSD
        sw()
        TPLA
        SPLA
        dlt_dm_green
        sw_supply
        radn_int
        DeltaGreenWt
        DeltaLAI
        DeltaGreenN
        DeltaLeafGreenN
        DeltaSLAI
        DeltaTT
        SenescedWt
        SenescedN
        RootSenescedN
        RootSenescedWt
        LeafSenescedWt
        LeafSenescedN
        RLV
        RootDepth
        RootProportion
        sum(sw_uptake)
        n_total_uptake
        n_supply_soil
        n_cum_uptake
        sw_demand
        sw_deficit
        root_depth
        no3
        sw
        sw_uptake
        n_sd_ratio
        no3_demand
        esw
        swdef_pheno
        swdef_photo
        swdef_expan
        nfact_pheno
        nfact_expan
        sw_dep
        n_diffusion_uptake
        n_massflow_uptake
        cover_green
        cover_tot
        DeltaTTFM
        st
        GrainTempFactor
    events My Variables Events: event=end_day
  folder Hermitage
    folder HE1
      simulation Sorghum_HE1_T1
        clock
          start_date = 1/12/1996  # Select the start date of the simulation
          end_date = 11/06/1997  # Select the end date of the simulation
        summaryfile
        metfile met: filename=HE1.met
        area paddock
          outputfile: filename=Sorghum_HE1_T1.out; title=Sorghum_HE1_T1
            variables My Variables -> /Validation/shared/My Variables
            events My Variables Events -> /Validation/shared/My Variables
          folder Manager folder
            manager Sow SkipRow on a fixed date
              # Sowing criteria
              date = 9/01/1997  # Enter sowing date (d/m/yyyy)
              # Sowing parameters
              crop = Sorghum  # Enter name of crop to sow
              density = 10  # Enter sowing density (plants/m2)
              depth = 30  # Enter sowing depth (mm)
              cultivar = QL41xQL36  # Enter cultivar
              row_spacing = 500  # Enter row spacing (m)
              RowConfiguration = solid  # Enter skip row configuration
              ftn = 0  # Enter Fertile Tiller No.
              on start_of_day:
```
            if (paddock_is_fallow() = 1 and today = date('[date]')) then
              [crop] sow plants =[density], sowing_depth = [depth], cultivar = [cultivar], row_spacing = [row_spacing], skip = [RowConfiguration], tiller_no_fertile = [ftn] ()
            endif
            if (paddock_is_fallow() = 0) then
               outputfile do_output
            endif
```
            manager Harvesting rule
              # Harvesting criteria
              crop = Sorghum  # Enter name of crop to harvest when ripe
              on end_of_day:
```
           if [crop].StageName = 'harvest_ripe' or [crop].plant_status = 'dead' then
              [crop]  harvest
              [crop]  end_crop
           endif
```
          irrigation
            automatic_irrigation = off  # switch
            asw_depth = 600.0  # Depth to which ASW is calculated. (mm)
            crit_fr_asw = 0.5  # Fraction of ASW below which irrigation is applied (0-1.0)
            irrigation_efficiency = 1.0  # Efficiency of the irrigation. (0-1.0)
            default_no3_conc = 0.0  # Nitrate concentration (ppm N)
            default_nh4_conc = 0.0  # Ammonium concentration (ppm N)
            default_cl_conc = 0.0  # Chloride concentration (ppm Cl)
          fertiliser
          operations
            9/01/1997  Irrigation apply amount = 52
            16/01/1997  Irrigation apply amount = 36
            21/01/1997  Irrigation apply amount = 18
            29/01/1997  Irrigation apply amount = 20
            7/02/1997  Irrigation apply amount = 14
            13/03/1997  Irrigation apply amount = 30
            21/03/1997  Irrigation apply amount = 45
            10/04/1997  Irrigation apply amount = 27
            17/04/1997  Irrigation apply amount = 42
            2/05/1997  Irrigation apply amount = 27
            20/12/1996  fertiliser apply amount = 33 (kg/ha), depth = 50 (mm), type = NO3_N ()
            23/12/1996  fertiliser apply amount = 0 (kg/ha), depth = 50 (mm), type = NO3_N ()
            23/12/1996  fertiliser apply amount = 119 (kg/ha), depth = 50 (mm), type = NO3_N ()
            12/02/1997  fertiliser apply amount = 59 (kg/ha), depth = 50 (mm), type = NO3_N ()
            21/03/1997  fertiliser apply amount = 59 (kg/ha), depth = 50 (mm), type = NO3_N ()
          Soil HRS: SoilType=HMM; LocalName=HRS; Site=HRS; NearestTown=Unknown; Region=SE Queensland; NaturalVegetation=Unknown; Latitude=0; Longitude=0; YearOfSampling=0
            Water
              Thickness  BD    AirDry  LL15   DUL   SAT
              100        1.34  0.08    0.226  0.42  0.45
              100        1.34  0.19    0.226  0.42  0.45
              200        1.33  0.23    0.258  0.46  0.48
              200        1.38  0.26    0.27   0.46  0.47
              200        1.4   0.26    0.268  0.43  0.45
              200        1.55  0.28    0.304  0.4   0.41
              200        1.59  0.25    0.335  0.37  0.38
              200        1.63  0.28    0.33   0.33  0.37
              200        1.66  0.3     0.32   0.32  0.37
              200        1.68  0.31    0.33   0.33  0.36
              SoilCrop Sorghum
                LL=[0.226, 0.226, 0.258, 0.27, 0.268, 0.304, 0.335, 0.33, 0.32, 0.33]
                KL=[0.07, 0.07, 0.07, 0.07, 0.06, 0.06, 0.06, 0.05, 0.05, 0.04]
                XF=[1, 1, 1, 1, 1, 1, 1, 1, 1, 1]
            SoilWater: SummerCona=6.5; SummerU=1.5; SummerDate=1-Nov; WinterCona=6.5; WinterU=1.5; WinterDate=1-Apr; DiffusConst=40; DiffusSlope=16; Salb=0.2; CN2Bare=85; CNRed=20; CNCov=0.8; Thickness=[100, 100, 200, 200, 200, 200, 200, 200, 200, 200]; SWCON=[0.3, 0.3, 0.3, 0.3, 0.3, 0.3, 0.3, 0.3, 0.3, 0.3]
            SoilOrganicMatter: RootCN=50; RootWt=1000; SoilCN=12.5; EnrACoeff=7.4; EnrBCoeff=0.2; OCUnits=Total
              Thickness  OC    FBiom  FInert
              100        1.19  0.05   0.45
              100        0.59  0.02   0.6
              200        0.45  0.01   0.75
              200        0.3   0.01   0.9
              200        0.2   0.01   0.9
              200        0.16  0.01   0.9
              200        0.17  0.01   0.9
              200        0.17  0.05   0.9
              200        0.17  0.02   0.9
              200        0.17  0.01   0.9
            Analysis: Thickness=[100, 100, 200, 200, 200, 200, 200, 200, 200, 200]; PH=[6.3, 6.4, 6.5, 6.6, 6.6, 6.5, 6.5, 6.5, 6.5, 6.5]; PHUnits=Water; BoronUnits=HotWater
            Sample Initial nitrogen: NO3Units=kgha; NH4Units=ppm; SWUnits=Volumetric; OCUnits=Total; PHUnits=Water
              Thickness  NO3       NH4
              100        13.936    0.1
              100        2.18822   0.1
              200        3.27978   0.1
              200        2.484     0.1
              200        3.08      0.1
              200        4.5477    0.1
              200        11.55294  0.1
              200        18.47442  0.1
              200        19.256    0.1
              200        24.41712  0.1
            Sample Initial water: Thickness=[100, 100, 200, 200, 200, 200, 200, 200, 200, 200]; NO3Units=ppm; NH4Units=ppm; SWUnits=Volumetric; OCUnits=Total; PHUnits=Water
              SW=[0.235, 0.252, 0.27, 0.3, 0.268, 0.304, 0.335, 0.33, 0.32, 0.33]
          sorghum
            sorghumConstants standard
              crop_type = sorghum
              default_crop_class = plant
              stage_names = sowing germination emergence end_of_juvenile floral_initiation flag_leaf flowering start_grain_fill end_grain_fill maturity harvest_ripe end_crop
              pesw_germ = 0.0  # plant extractable soil water in seedling layer inadequate for germination (mm/mm)
              shoot_lag = 15.0  # time lag before linear coleoptile growth starts (deg days)
              shoot_rate = 0.6  # growing deg day increase with depth for coleoptile (deg day/mm depth)
              twilight = -2.2  # Twilight is defined as the interval between sunrise or sunset and the time when the true
              x_temp = 11 30  42  # cardinal temps.
              y_tt = 0  19   0  # diff
              x_temp_fm = 5.7 23.5
              y_tt_fm = 0   17.8
              leaf_no_at_emerg = 1.0  # (expanded) leaf number at emergence ()
              leaf_no_seed = 4.0  # number of leaf primordia present in seed
              leaf_no_min = 10.0  # minimum leaf number
              leaf_no_max = 40.0  # maximum leaf number
              leaf_init_rate = 21.6  # degree days to initiate each leaf primordium until floral init (deg day)
              leaf_app_rate1 = 41.0  # Growing deg day required to develop the most leaf ligules. (deg day).
              leaf_app_rate2 = 20.0  # Growing deg day required to develop last leaf ligules. (deg day).
              leaf_no_rate_change = 3.5  # Leaf no below flag above which leaf appearance rate changes from rate1 to rate2.
              rue = 1.25  # g bio/MJ Radn radiation use efficiency
              row_spacing_default = 750  # Default rowing spacing used to calculate k
              x_row_spacing = 0.20   0.50   1.00  # Row spacing
              y_extinct_coef = 0.70   0.40   0.40  # extinction coefficient for green leaf
              x_ave_temp = 8 20 35 50  # mean daily temperature
              y_stress_photo = 0  1  1  0  # multiplier on RUE
              dm_leaf_init = 0.1  # leaf weight at emergence (g/plant)
              dm_root_init = 0.1  # root weight at emergence (g/plant)
              dm_stem_init = 0.1  # stem weight at emergence (g/plant)
              stem_trans_frac = 0.20  # fraction of stem used in translocation to grain
              leaf_trans_frac = 0.15  # fraction of leaf used in translocation to grain
              retransRate = 0.15
              ratio_root_shoot = 0   0   1    1     0.33  0.33  0.087  0    0     0    0    0
              partition_rate_leaf = 0.006  # coefficient of sigmoidal function between leaf partition fraction and internode no**2 (0-1)
              frac_stem2flower = 0.30  # fraction of dm allocated to stem that goes to developing head
              grn_water_cont = 0.130  # water content of grain g/g
              GrainTempWindow = -50 100
              GrainHiTemperature = 32 33 36 38  # Grain High Temperature
              GrainStressSeverity = 0 0.14 0.23 0.65  # Severity of seed set stress
              leaf_no_correction = 1.52  # corrects for other growing leaves
              sla_max = 45000
              sla_min = 8000  # minimum specific leaf area for new leaf area
              initial_tpla = 200.0  # initial total plant leaf area
              root_depth_rate = 0 27.0  27.0  27.0 27.0  27.0   27.0   0      0       0    0    0  # mm/day.
              x_sw_ratio = 0   0.25  # water availability for effects on root depth growth
              y_sw_fac_root = 0   1  # stress factor for root depth growth, This may be probably the same for all crops
              specific_root_length = 100000
              x_plant_rld = 0.0  0.1  # root branching
              y_rel_root_rate = 1.0  1.0
              transp_eff_cf = 0.009
              svp_fract = 0.75  # (0-1)
              x_sw_demand_ratio = 0.1 1.1  # water availability This is the original value
              y_swdef_leaf = 0   1  # stress indices
              x_sw_avail_ratio = 0 0.2 1.0  # water availability Needs to be severe to worry phenology
              y_swdef_pheno = 0 1.0 1.0  # stress indices
              no3_diffn_const = 2.0
              maxUptakeRate = 0.029
              initialRootNConc = 0.020
              targetRootNConc = 0.002
              initialLeafSLN = 1.5
              targetLeafSLN = 1.5
              newLeafSLN = 1.0
              leafDilnNSlope = 0.0043
              leafDilnNInt = -0.0017
              initialStemNConc = 0.01
              x_stem_n = 3         5       7         10
              targetStemNConc = 0.055   0.016   0.01      0.005
              structStemNConc = 0.012  0.012   0.005   0.0015
              stemDilnNSlope = 0.0062
              stemDilnNInt = -0.001
              initialRachisNConc = 0.000
              targetRachisNConc = 0.01
              structRachisNConc = 0.003
              rachisDilnNSlope = 0.0062
              rachisDilnNInt = -0.001
              grainFillRate = 0.001
              targetGrainNConc = 0.0175
              nUptakeCease = 570
              nSupplyFrac = 5
              dm_root_sen_frac = 0.002  # fraction of root dry matter senesced each day
              sen_light_time_const = 10.0  # delay factor for light senescence
              sen_radn_crit = 2  # radiation level for onset of light senescence
              frost_kill = 1.0  # temperature threshold for leaf death
              sen_water_time_const = 10.0  # delay factor for water senescence
              sen_threshold = 0.25  # supply:demand ratio for onset of water senescence
              tt_emerg_limit = 150.0  # maximum degree days allowed for emergence to take place
              pfact_photo_slope = 2.5
              pfact_expansion_slope = 2.5
              pfact_pheno_slope = 100
              pfact_grain_slope = 20
              x_p_stage_code = 3       4      5      6      7      8      10
              y_p_conc_max_leaf = 0.0059  0.0054 0.0040 0.0029 0.0026 0.0025 0.0022
              y_p_conc_min_leaf = 0.003   0.003  0.0029 0.0011 0.0011 0.0008 0.0006
              y_p_conc_sen_leaf = 0.0005  0.0005 0.0005 0.0005 0.0005 0.0005 0.0005
              y_p_conc_max_stem = 0.0057  0.0038 0.0037 0.0018 0.0016 0.0013 0.0013
              y_p_conc_min_stem = 0.003   0.003  0.002  0.0006 0.0006 0.0002 0.0002
              y_p_conc_sen_stem = 0.0002  0.0002 0.0002 0.0002 0.0002 0.0002 0.0002
              y_p_conc_max_root = 0.0010  0.0010 0.0010 0.0010 0.0010 0.0010 0.0010  # assume P conc in roots non-varying
              y_p_conc_min_root = 0.0010  0.0010 0.0010 0.0010 0.0010 0.0010 0.0010
              y_p_conc_sen_root = 0.0010  0.0010 0.0010 0.0010 0.0010 0.0010 0.0010
              y_p_conc_max_flower = 0.0057  0.0038 0.0037 0.0018 0.0016 0.0013 0.0013  # assumed same as stem
              y_p_conc_min_flower = 0.003   0.003  0.002  0.0006 0.0006 0.0002 0.0002
              y_p_conc_sen_flower = 0.0002  0.0002 0.0002 0.0002 0.0002 0.0002 0.0002
              y_p_conc_max_grain = 0.001   0.001  0.001  0.001  0.052  0.0044  0.0034
              y_p_conc_min_grain = 0.001   0.001  0.001  0.001  0.001  0.0015  0.0015  # based on Kenya maize data
              y_p_conc_sen_grain = 0.001   0.001  0.001  0.001  0.001  0.0015  0.0015
              p_conc_init_leaf = 0.0059
              p_conc_init_stem = 0.0057
              p_conc_init_root = 0.010
              p_conc_init_flower = 0.0057
              p_conc_init_grain = 0.0052
              senescedLeafSLN = 0.3
              tillerSlaBound = 30  # SLA Range (%)
              aX0 = 0.786  # Largest leaf multiplier
              aMaxS = 46.312  # Largest Leaf Area Slope
              aMaxI = -321.13  # Intercept for Largest leaf calculation
              aMaxVert = 0.3  # Vertical Offset for Largest Leaf Calc
              aTillerVert = 0,05  # Additional Vertical Offset for each additional Tiller
              tilleringPropensity = -0.82  # Propensity to Tiller
              tillerSdSlope = 0.2065  # Tiller Supply/demand slope
            sorghumGenotype Buster
              tt_emerg_to_endjuv = 100
              photoperiod_crit1 = 11.5
              photoperiod_crit2 = 13.5
              photoperiod_slope = 11.5
              tt_endjuv_to_init = 160
              tt_flag_to_flower = 170
              tt_flower_to_start_grain = 80
              tt_flower_to_maturity = 761
              tt_maturity_to_ripe = 1
              dm_per_seed = 0.00083
              x_stem_wt = 0    80  # look up table for canopy height
              y_height = 0  2000  # plant canopy height
              maxGFRate = 0.09
              aX0 = 0.786  # Largest leaf multiplier
              aMaxS = 46.312  # Largest Leaf Area Slope
              aMaxI = -321.13  # Intercept for Largest leaf calculation
            sorghumGenotype QL41xQL36
              tt_emerg_to_endjuv = 100
              photoperiod_crit1 = 11.5
              photoperiod_crit2 = 13.5
              photoperiod_slope = 12.5
              tt_endjuv_to_init = 179
              tt_flag_to_flower = 170
              tt_flower_to_start_grain = 80
              tt_flower_to_maturity = 761
              tt_maturity_to_ripe = 1
              dm_per_seed = 0.00083
              x_stem_wt = 0    80  # look up table for canopy height
              y_height = 0  2000  # plant canopy height
              maxGFRate = 0.09
              aX0 = 0.687  # Largest leaf multiplier
              aMaxS = 0  # Largest Leaf Area Slope
              aMaxI = 450  # Intercept for Largest leaf calculation
            sorghumGenotype M35-1
              tt_emerg_to_endjuv = 100
              photoperiod_crit1 = 11.5
              photoperiod_crit2 = 13.5
              photoperiod_slope = 61
              tt_endjuv_to_init = 252
              tt_flag_to_flower = 170
              tt_flower_to_start_grain = 80
              tt_flower_to_maturity = 761
              tt_maturity_to_ripe = 1
              dm_per_seed = 0.00142784
              x_stem_wt = 0    80  # look up table for canopy height
              y_height = 0  2000  # plant canopy height
              maxGFRate = 0.09
              partition_rate_leaf = 0.018
              nUptakeCease = 10
              leaf_init_rate = 26.1
              targetLeafSLN = 1.2
              aX0 = 0.687  # Largest leaf multiplier
              aMaxS = 8.9  # Largest Leaf Area Slope
              aMaxI = 245.3  # Intercept for Largest leaf calculation
            sorghumGenotype CSH13R
              tt_emerg_to_endjuv = 100
              photoperiod_crit1 = 11.5
              photoperiod_crit2 = 13.5
              photoperiod_slope = 17
              tt_endjuv_to_init = 228
              tt_flag_to_flower = 170
              tt_flower_to_start_grain = 80
              tt_flower_to_maturity = 761
              tt_maturity_to_ripe = 1
              dm_per_seed = 0.0015
              x_stem_wt = 0    80  # look up table for canopy height
              y_height = 0  2000  # plant canopy height
              maxGFRate = 0.09
              rue = 1.6
              partition_rate_leaf = 0.018
              targetLeafSLN = 1.2
              leaf_init_rate = 23.2
              aX0 = 0.687  # Largest leaf multiplier
              aMaxS = 22.25  # Largest Leaf Area Slope
              aMaxI = 92.45  # Intercept for Largest leaf calculation
            sorghumGenotype ATX623xRTX430
              tt_emerg_to_endjuv = 100
              photoperiod_crit1 = 11.5
              photoperiod_crit2 = 13.5
              photoperiod_slope = 13
              tt_endjuv_to_init = 202
              tt_flag_to_flower = 170
              tt_flower_to_start_grain = 80
              tt_flower_to_maturity = 761
              tt_maturity_to_ripe = 1
              dm_per_seed = 0.00083
              maxGFRate = 0.09
              x_stem_wt = 0    80  # look up table for canopy height
              y_height = 0  2000  # plant canopy height
            sorghumGenotype A35xQL36
              tt_emerg_to_endjuv = 100
              photoperiod_crit1 = 11.8
              photoperiod_crit2 = 14
              photoperiod_slope = 39.7
              tt_endjuv_to_init = 134.4
              tt_flag_to_flower = 170
              tt_flower_to_start_grain = 80
              tt_flower_to_maturity = 761
              tt_maturity_to_ripe = 1
              dm_per_seed = 0.00083
              maxGFRate = 0.09
              x_stem_wt = 0    80  # look up table for canopy height
              y_height = 0  2000  # plant canopy height
            sorghumGenotype QL39xQL36
              tt_emerg_to_endjuv = 100
              photoperiod_crit1 = 11.8
              photoperiod_crit2 = 14
              photoperiod_slope = 39.7
              tt_endjuv_to_init = 114.4
              tt_flag_to_flower = 170
              tt_flower_to_start_grain = 80
              tt_flower_to_maturity = 761
              tt_maturity_to_ripe = 1
              main_stem_coef = 2.9
              tpla_prod_coef = 0.018
              dm_per_seed = 0.00083
              maxGFRate = 0.09
              x_stem_wt = 0    80  # look up table for canopy height
              y_height = 0  2000  # plant canopy height
      simulation Sorghum_HE1_T2
        clock
          start_date = 1/12/1996  # Select the start date of the simulation
          end_date = 30/06/1997  # Select the end date of the simulation
        summaryfile
        metfile met: filename=HE1.met
        area paddock
          outputfile: filename=Sorghum_HE1_T2.out; title=Sorghum_HE1_T2
            variables My Variables -> /Validation/shared/My Variables
            events My Variables Events -> /Validation/shared/My Variables
          folder Manager folder
            manager Sow SkipRow on a fixed date
              # Sowing criteria
              date = 9/01/1997  # Enter sowing date (d/m/yyyy)
              # Sowing parameters
              crop = Sorghum  # Enter name of crop to sow
              density = 10  # Enter sowing density (plants/m2)
              depth = 30  # Enter sowing depth (mm)
              cultivar = Buster  # Enter cultivar
              row_spacing = 0.5  # Enter row spacing (m)
              RowConfiguration = solid  # Enter skip row configuration
              ftn = 0.2  # Enter Fertile Tiller No.
              on start_of_day:
              script: same as in Hermitage.HE1.Sorghum_HE1_T1.paddock.Manager folder.Sow SkipRow on a fixed date
            manager Harvesting rule
              # Harvesting criteria
              crop = Sorghum  # Enter name of crop to harvest when ripe
              on end_of_day:
              script: same as in Hermitage.HE1.Sorghum_HE1_T1.paddock.Manager folder.Harvesting rule
          irrigation: same as Hermitage.HE1.Sorghum_HE1_T1.paddock.Irrigation
          fertiliser
          operations: same as Hermitage.HE1.Sorghum_HE1_T1.paddock.operations
          Soil HRS: same as Hermitage.HE1.Sorghum_HE1_T1.paddock.HRS
          sorghum: same as Hermitage.HE1.Sorghum_HE1_T1.paddock.sorghum
      simulation Sorghum_HE1_T3
        clock
          start_date = 1/12/1996  # Select the start date of the simulation
          end_date = 30/06/1997  # Select the end date of the simulation
        summaryfile
        metfile met: filename=HE1.met
        area paddock
          outputfile: filename=Sorghum_HE1_T3.out; title=Sorghum_HE1_T3
            variables My Variables -> /Validation/shared/My Variables
            events My Variables Events -> /Validation/shared/My Variables
          folder Manager folder
            manager Sow SkipRow on a fixed date
              # Sowing criteria
              date = 9/01/1997  # Enter sowing date (d/m/yyyy)
              # Sowing parameters
              crop = Sorghum  # Enter name of crop to sow
              density = 10  # Enter sowing density (plants/m2)
              depth = 30  # Enter sowing depth (mm)
              cultivar = M35-1  # Enter cultivar
              row_spacing = 0.5  # Enter row spacing (m)
              RowConfiguration = solid  # Enter skip row configuration
              ftn = 0  # Enter Fertile Tiller No.
              on start_of_day:
              script: same as in Hermitage.HE1.Sorghum_HE1_T1.paddock.Manager folder.Sow SkipRow on a fixed date
            manager Harvesting rule
              # Harvesting criteria
              crop = Sorghum  # Enter name of crop to harvest when ripe
              on end_of_day:
              script: same as in Hermitage.HE1.Sorghum_HE1_T1.paddock.Manager folder.Harvesting rule
          irrigation: same as Hermitage.HE1.Sorghum_HE1_T1.paddock.Irrigation
          fertiliser
          operations: same as Hermitage.HE1.Sorghum_HE1_T1.paddock.operations
          Soil HRS: same as Hermitage.HE1.Sorghum_HE1_T1.paddock.HRS
          sorghum: same as Hermitage.HE1.Sorghum_HE1_T1.paddock.sorghum
    folder HE2
      simulation Sorghum_HE2_T1
        clock
          start_date = 1/12/1996  # Select the start date of the simulation
          end_date = 30/06/1997  # Select the end date of the simulation
        summaryfile
        metfile met: filename=HE2.met
        area paddock
          outputfile: filename=Sorghum_HE2_T1.out; title=Sorghum_HE2_T1
            events My Variables Events -> /Validation/shared/My Variables
            variables My Variables -> /Validation/shared/My Variables
          folder Manager folder
            manager Sow SkipRow on a fixed date
              # Sowing criteria
              date = 9/01/1997  # Enter sowing date (d/m/yyyy)
              # Sowing parameters
              crop = Sorghum  # Enter name of crop to sow
              density = 10  # Enter sowing density (plants/m2)
              depth = 30  # Enter sowing depth (mm)
              cultivar = QL41xQL36  # Enter cultivar
              row_spacing = 0.5  # Enter row spacing (m)
              RowConfiguration = solid  # Enter skip row configuration
              ftn = 0  # Enter Fertile Tiller No.
              on start_of_day:
              script: same as in Hermitage.HE1.Sorghum_HE1_T1.paddock.Manager folder.Sow SkipRow on a fixed date
            manager Harvesting rule
              # Harvesting criteria
              crop = Sorghum  # Enter name of crop to harvest when ripe
              on end_of_day:
              script: same as in Hermitage.HE1.Sorghum_HE1_T1.paddock.Manager folder.Harvesting rule
          irrigation: same as Hermitage.HE1.Sorghum_HE1_T1.paddock.Irrigation
          fertiliser
          operations
            9/01/1997  Irrigation apply amount = 54
            16/01/1997  Irrigation apply amount = 37
            21/01/1997  Irrigation apply amount = 19
            29/01/1997  Irrigation apply amount = 20
            7/02/1997  Irrigation apply amount = 14
            13/03/1997  Irrigation apply amount = 30
            21/03/1997  Irrigation apply amount = 46
            10/04/1997  Irrigation apply amount = 24
            17/04/1997  Irrigation apply amount = 41
            2/05/1997  Irrigation apply amount = 25
            20/12/1996  fertiliser apply amount = 0(kg/ha), depth = 50 (mm), type = NO3_N ()
            23/12/1996  fertiliser apply amount = 0 (kg/ha), depth = 50 (mm), type = NO3_N ()
            23/12/1996  fertiliser apply amount = 10 (kg/ha), depth = 50 (mm), type = NO3_N ()
          Soil HRS: same as Hermitage.HE1.Sorghum_HE1_T1.paddock.HRS
          sorghum: same as Hermitage.HE1.Sorghum_HE1_T1.paddock.sorghum
      simulation Sorghum_HE2_T2
        clock
          start_date = 1/12/1996  # Select the start date of the simulation
          end_date = 30/06/1997  # Select the end date of the simulation
        summaryfile
        metfile met: filename=HE2.met
        area paddock
          outputfile: filename=Sorghum_HE2_T2.out; title=Sorghum_HE2_T2
            events My Variables Events -> /Validation/shared/My Variables
            variables My Variables -> /Validation/shared/My Variables
          folder Manager folder
            manager Sow SkipRow on a fixed date
              # Sowing criteria
              date = 9/01/1997  # Enter sowing date (d/m/yyyy)
              # Sowing parameters
              crop = Sorghum  # Enter name of crop to sow
              density = 10  # Enter sowing density (plants/m2)
              depth = 30  # Enter sowing depth (mm)
              cultivar = Buster  # Enter cultivar
              row_spacing = 0.5  # Enter row spacing (m)
              RowConfiguration = solid  # Enter skip row configuration
              ftn = 0  # Enter Fertile Tiller No.
              on start_of_day:
              script: same as in Hermitage.HE1.Sorghum_HE1_T1.paddock.Manager folder.Sow SkipRow on a fixed date
            manager Harvesting rule
              # Harvesting criteria
              crop = Sorghum  # Enter name of crop to harvest when ripe
              on end_of_day:
              script: same as in Hermitage.HE1.Sorghum_HE1_T1.paddock.Manager folder.Harvesting rule
          irrigation: same as Hermitage.HE1.Sorghum_HE1_T1.paddock.Irrigation
          fertiliser
          operations
            9/01/1997  Irrigation apply amount = 54
            16/01/1997  Irrigation apply amount = 37
            21/01/1997  Irrigation apply amount = 19
            29/01/1997  Irrigation apply amount = 20
            7/02/1997  Irrigation apply amount = 14
            13/03/1997  Irrigation apply amount = 30
            21/03/1997  Irrigation apply amount = 46
            10/04/1997  Irrigation apply amount = 24
            17/04/1997  Irrigation apply amount = 41
            2/05/1997  Irrigation apply amount = 25
            20/12/1996  fertiliser apply amount = 0 (kg/ha), depth = 50 (mm), type = NO3_N ()
            23/12/1996  fertiliser apply amount = 0 (kg/ha), depth = 50 (mm), type = NO3_N ()
            23/12/1996  fertiliser apply amount = 10 (kg/ha), depth = 50 (mm), type = NO3_N ()
          Soil HRS: same as Hermitage.HE1.Sorghum_HE1_T1.paddock.HRS
          sorghum: same as Hermitage.HE1.Sorghum_HE1_T1.paddock.sorghum
      simulation Sorghum_HE2_T3
        clock
          start_date = 1/12/1996  # Select the start date of the simulation
          end_date = 30/06/1997  # Select the end date of the simulation
        summaryfile
        metfile met: filename=HE2.met
        area paddock
          outputfile: filename=Sorghum_HE2_T3.out; title=Sorghum_HE2_T3
            events My Variables Events -> /Validation/shared/My Variables
            variables My Variables -> /Validation/shared/My Variables
          folder Manager folder
            manager Sow SkipRow on a fixed date: same as Hermitage.HE1.Sorghum_HE1_T3.paddock.Manager folder.Sow SkipRow on a fixed date
            manager Harvesting rule
              # Harvesting criteria
              crop = Sorghum  # Enter name of crop to harvest when ripe
              on end_of_day:
              script: same as in Hermitage.HE1.Sorghum_HE1_T1.paddock.Manager folder.Harvesting rule
          irrigation: same as Hermitage.HE1.Sorghum_HE1_T1.paddock.Irrigation
          fertiliser
          operations
            9/01/1997  Irrigation apply amount = 54
            16/01/1997  Irrigation apply amount = 37
            21/01/1997  Irrigation apply amount = 19
            29/01/1997  Irrigation apply amount = 20
            7/02/1997  Irrigation apply amount = 14
            13/03/1997  Irrigation apply amount = 30
            21/03/1997  Irrigation apply amount = 46
            10/04/1997  Irrigation apply amount = 24
            17/04/1997  Irrigation apply amount = 41
            2/05/1997  Irrigation apply amount = 25
            20/12/1996  fertiliser apply amount = 3 (kg/ha), depth = 50 (mm), type = NO3_N ()
            23/12/1996  fertiliser apply amount = 0 (kg/ha), depth = 50 (mm), type = NO3_N ()
            23/12/1996  fertiliser apply amount = 10 (kg/ha), depth = 50 (mm), type = NO3_N ()
          Soil HRS: same as Hermitage.HE1.Sorghum_HE1_T1.paddock.HRS
          sorghum: same as Hermitage.HE1.Sorghum_HE1_T1.paddock.sorghum
    folder HE3
      Soil HRS: SoilType=HMM; LocalName=HRS; Site=HRS; NearestTown=Unknown; Region=SE Queensland; NaturalVegetation=Unknown; Latitude=0; Longitude=0; YearOfSampling=0
        Water
          Thickness  BD    AirDry  LL15   DUL   SAT
          100        1.34  0.08    0.226  0.42  0.45
          100        1.34  0.19    0.226  0.42  0.45
          200        1.33  0.23    0.258  0.46  0.48
          200        1.38  0.26    0.27   0.46  0.47
          200        1.4   0.26    0.268  0.43  0.45
          200        1.55  0.28    0.304  0.4   0.41
          200        1.59  0.32    0.335  0.37  0.38
          200        1.63  0.32    0.33   0.33  0.37
          200        1.66  0.32    0.32   0.32  0.37
          200        1.68  0.33    0.33   0.33  0.36
          SoilCrop Sorghum
            LL=[0.226, 0.226, 0.258, 0.27, 0.268, 0.304, 0.335, 0.33, 0.32, 0.33]
            KL=[0.07, 0.07, 0.07, 0.07, 0.06, 0.06, 0.06, 0.05, 0.05, 0.04]
            XF=[1, 1, 1, 1, 1, 1, 1, 1, 1, 1]
        SoilWater: same as Hermitage.HE1.Sorghum_HE1_T1.paddock.HRS.SoilWater
        SoilOrganicMatter: RootCN=50; RootWt=1000; SoilCN=12.5; EnrACoeff=7.4; EnrBCoeff=0.2
          Thickness  OC     FBiom  FInert
          100        1.190  0.050  0.450
          100        0.590  0.020  0.600
          200        0.450  0.010  0.750
          200        0.300  0.010  0.900
          200        0.200  0.010  0.900
          200        0.160  0.010  0.900
          200        0.170  0.010  0.900
          200        0.170  0.050  0.900
          200        0.170  0.020  0.900
          200        0.170  0.010  0.900
        Analysis: Thickness=[100, 100, 200, 200, 200, 200, 200, 200, 200, 200]
          PH=[6.300, 6.400, 6.500, 6.600, 6.600, 6.500, 6.500, 6.500, 6.500, 6.500]
        Sample Initial nitrogen: NO3Units=ppm; NH4Units=ppm; SWUnits=Volumetric; OCUnits=Total; PHUnits=Water
          Thickness  NO3     NH4
          100        12.233  0.1
          100        1.867   0.1
          200        1.4     0.1
          200        0.867   0.1
          200        0.9     0.1
          200        2.833   0.1
          200        3.833   0.1
          200        3.9     0.1
          200        4.233   0.1
          200        3.767   0.1
        Sample Initial water: Thickness=[100, 100, 200, 200, 200, 200, 200, 200, 200, 200]; NO3Units=ppm; NH4Units=ppm; SWUnits=Volumetric; OCUnits=Total; PHUnits=Water
          SW=[0.217, 0.357, 0.375, 0.401, 0.349, 0.351, 0.359, 0.33, 0.322, 0.347]
      simulation Sorghum_HE3_T1
        clock
          start_date = 9/01/1997  # Select the start date of the simulation
          end_date = 30/06/1997  # Select the end date of the simulation
        summaryfile
        metfile met: filename=HE3.met
        area paddock
          outputfile: filename=Sorghum_HE3_T1.out; title=Sorghum_HE3_T1
            events My Variables Events -> /Validation/shared/My Variables
            variables My Variables -> /Validation/shared/My Variables
          folder Manager folder
            manager Sow SkipRow on a fixed date
              # Sowing criteria
              date = 9/01/1997  # Enter sowing date (d/m/yyyy)
              # Sowing parameters
              crop = Sorghum  # Enter name of crop to sow
              density = 10  # Enter sowing density (plants/m2)
              depth = 15  # Enter sowing depth (mm)
              cultivar = QL41xQL36  # Enter cultivar
              row_spacing = 0.5  # Enter row spacing (m)
              RowConfiguration = solid  # Enter skip row configuration
              ftn = 0  # Enter Fertile Tiller No.
              on start_of_day:
              script: same as in Hermitage.HE1.Sorghum_HE1_T1.paddock.Manager folder.Sow SkipRow on a fixed date
            manager Harvesting rule
              # Harvesting criteria
              crop = Sorghum  # Enter name of crop to harvest when ripe
              on end_of_day:
              script: same as in Hermitage.HE1.Sorghum_HE1_T1.paddock.Manager folder.Harvesting rule
          irrigation: same as Hermitage.HE1.Sorghum_HE1_T1.paddock.Irrigation
          fertiliser
          operations
            23/12/1996  Irrigation apply amount = 69
            27/12/1996  Irrigation apply amount = 9
            9/01/1997  Irrigation apply amount = 33
            16/01/1997  Irrigation apply amount = 28
            31/01/1997  Irrigation apply amount = 19
            20/12/1996  fertiliser apply amount = 33 (kg/ha), depth = 50 (mm), type = NO3_N ()
            23/12/1996  fertiliser apply amount = 0 (kg/ha), depth = 50 (mm), type = NO3_N ()
            23/12/1996  fertiliser apply amount = 119 (kg/ha), depth = 50 (mm), type = NO3_N ()
          Soil HRS: same as Hermitage.HE3.HRS
          sorghum: same as Hermitage.HE1.Sorghum_HE1_T1.paddock.sorghum
      simulation Sorghum_HE3_T2
        clock
          start_date = 9/01/1997  # Select the start date of the simulation
          end_date = 30/06/1997  # Select the end date of the simulation
        summaryfile
        metfile met: filename=HE3.met
        area paddock
          outputfile: filename=Sorghum_HE3_T2.out; title=Sorghum_HE3_T2
            events My Variables Events -> /Validation/shared/My Variables
            variables My Variables -> /Validation/shared/My Variables
          folder Manager folder
            manager Sow SkipRow on a fixed date
              # Sowing criteria
              date = 9/01/1997  # Enter sowing date (d/m/yyyy)
              # Sowing parameters
              crop = Sorghum  # Enter name of crop to sow
              density = 10  # Enter sowing density (plants/m2)
              depth = 15  # Enter sowing depth (mm)
              cultivar = Buster  # Enter cultivar
              row_spacing = 0.5  # Enter row spacing (m)
              RowConfiguration = solid  # Enter skip row configuration
              ftn = 0  # Enter Fertile Tiller No.
              on start_of_day:
              script: same as in Hermitage.HE1.Sorghum_HE1_T1.paddock.Manager folder.Sow SkipRow on a fixed date
            manager Harvesting rule
              # Harvesting criteria
              crop = Sorghum  # Enter name of crop to harvest when ripe
              on end_of_day:
              script: same as in Hermitage.HE1.Sorghum_HE1_T1.paddock.Manager folder.Harvesting rule
          irrigation: same as Hermitage.HE1.Sorghum_HE1_T1.paddock.Irrigation
          fertiliser
          operations: same as Hermitage.HE3.Sorghum_HE3_T1.paddock.operations
          Soil HRS: same as Hermitage.HE3.HRS
          sorghum: same as Hermitage.HE1.Sorghum_HE1_T1.paddock.sorghum
      simulation Sorghum_HE3_T3
        clock
          start_date = 9/01/1997  # Select the start date of the simulation
          end_date = 30/06/1997  # Select the end date of the simulation
        summaryfile
        metfile met: filename=HE3.met
        area paddock
          outputfile: filename=Sorghum_HE3_T3.out; title=Sorghum_HE3_T3
            events My Variables Events -> /Validation/shared/My Variables
            variables My Variables -> /Validation/shared/My Variables
          folder Manager folder
            manager Sow SkipRow on a fixed date
              # Sowing criteria
              date = 9/01/1997  # Enter sowing date (d/m/yyyy)
              # Sowing parameters
              crop = Sorghum  # Enter name of crop to sow
              density = 10  # Enter sowing density (plants/m2)
              depth = 15  # Enter sowing depth (mm)
              cultivar = M35-1  # Enter cultivar
              row_spacing = 0.5  # Enter row spacing (m)
              RowConfiguration = solid  # Enter skip row configuration
              ftn = 0  # Enter Fertile Tiller No.
              on start_of_day:
              script: same as in Hermitage.HE1.Sorghum_HE1_T1.paddock.Manager folder.Sow SkipRow on a fixed date
            manager Harvesting rule
              # Harvesting criteria
              crop = Sorghum  # Enter name of crop to harvest when ripe
              on end_of_day:
              script: same as in Hermitage.HE1.Sorghum_HE1_T1.paddock.Manager folder.Harvesting rule
          irrigation: same as Hermitage.HE1.Sorghum_HE1_T1.paddock.Irrigation
          fertiliser
          operations: same as Hermitage.HE3.Sorghum_HE3_T1.paddock.operations
          Soil HRS: same as Hermitage.HE3.HRS
          sorghum: same as Hermitage.HE1.Sorghum_HE1_T1.paddock.sorghum
    folder HE4
      operations
        23/12/1996  Irrigation apply amount = 69
        27/12/1996  Irrigation apply amount = 9
        9/01/1997  Irrigation apply amount = 33
        16/01/1997  Irrigation apply amount = 28
        31/01/1997  Irrigation apply amount = 19
        20/12/1996  fertiliser apply amount = 0 (kg/ha), depth = 50 (mm), type = NO3_N ()
        23/12/1996  fertiliser apply amount = 10 (kg/ha), depth = 50 (mm), type = NO3_N ()
        23/12/1997  fertiliser apply amount = 0 (kg/ha), depth = 50 (mm), type = NO3_N ()
      Soil HRS: SoilType=HMM; LocalName=HRS; Site=HRS; NearestTown=Unknown; Region=SE Queensland; NaturalVegetation=Unknown; Latitude=0; Longitude=0; YearOfSampling=0
        InitialWater Initial water: FractionFull=0.6; PercentMethod=FilledFromTop
        Water: same as Hermitage.HE1.Sorghum_HE1_T1.paddock.HRS.Water
        SoilWater: same as Hermitage.HE1.Sorghum_HE1_T1.paddock.HRS.SoilWater
        SoilOrganicMatter: same as Hermitage.HE3.HRS.SoilOrganicMatter
        Analysis: Thickness=[100, 100, 200, 200, 200, 200, 200, 200, 200, 200]
          PH=[6.300, 6.400, 6.500, 6.600, 6.600, 6.500, 6.500, 6.500, 6.500, 6.500]
        Sample Initial nitrogen: NO3Units=ppm; NH4Units=ppm; SWUnits=Volumetric; OCUnits=Total; PHUnits=Water
          Thickness  NO3      NH4
          100        18.4607  0.468732
          100        2.89869  0.468732
          200        2.18866  0.468732
          200        1.59756  0.468732
          200        1.95258  0.468732
          200        2.60403  0.468732
          200        6.44883  0.468732
          200        10.0593  0.468732
          200        10.2954  0.468732
          200        12.8994  0.468732
      simulation Sorghum_HE4_T1
        clock
          start_date = 1/12/1996  # Select the start date of the simulation
          end_date = 11/06/1997  # Select the end date of the simulation
        summaryfile
        metfile met: filename=HE4.met
        area paddock
          outputfile: filename=Sorghum_HE4_T1.out; title=Sorghum_HE4_T1
            events My Variables Events -> /Validation/shared/My Variables
            variables My Variables -> /Validation/shared/My Variables
          folder Manager folder
            manager Sow SkipRow on a fixed date
              # Sowing criteria
              date = 9/01/1997  # Enter sowing date (d/m/yyyy)
              # Sowing parameters
              crop = Sorghum  # Enter name of crop to sow
              density = 10  # Enter sowing density (plants/m2)
              depth = 15  # Enter sowing depth (mm)
              cultivar = QL41xQL36  # Enter cultivar
              row_spacing = 500  # Enter row spacing (m)
              RowConfiguration = solid  # Enter skip row configuration
              ftn = 0  # Enter Fertile Tiller No.
              on start_of_day:
              script: same as in Hermitage.HE1.Sorghum_HE1_T1.paddock.Manager folder.Sow SkipRow on a fixed date
            manager Harvesting rule
              # Harvesting criteria
              crop = Sorghum  # Enter name of crop to harvest when ripe
              on end_of_day:
              script: same as in Hermitage.HE1.Sorghum_HE1_T1.paddock.Manager folder.Harvesting rule
          irrigation
            automatic_irrigation = off  # switch
            asw_depth = 600  # Depth to which ASW is calculated. (mm)
            crit_fr_asw = 0.5  # Fraction of ASW below which irrigation is applied (0-1.0)
            irrigation_efficiency = 1  # Efficiency of the irrigation. (0-1.0)
            default_no3_conc = 0.0  # Nitrate concentration (ppm N)
            default_nh4_conc = 0.0  # Ammonium concentration (ppm N)
            default_cl_conc = 0.0  # Chloride concentration (ppm Cl)
          fertiliser
          operations: same as Hermitage.HE4.operations
          Soil HRS: same as Hermitage.HE4.HRS
          sorghum: same as Hermitage.HE1.Sorghum_HE1_T1.paddock.sorghum
      simulation Sorghum_HE4_T2
        clock
          start_date = 1/12/1996  # Select the start date of the simulation
          end_date = 30/06/1997  # Select the end date of the simulation
        summaryfile
        metfile met: filename=HE4.met
        area paddock
          outputfile: filename=Sorghum_HE4_T2.out; title=Sorghum_HE4_T2
            events My Variables Events -> /Validation/shared/My Variables
            variables My Variables -> /Validation/shared/My Variables
          folder Manager folder: same as Hermitage.HE1.Sorghum_HE1_T2.paddock.Manager folder
          irrigation: same as Hermitage.HE4.Sorghum_HE4_T1.paddock.Irrigation
          fertiliser
          operations: same as Hermitage.HE4.operations
          Soil HRS: same as Hermitage.HE4.HRS
          sorghum: same as Hermitage.HE1.Sorghum_HE1_T1.paddock.sorghum
      simulation Sorghum_HE4_T3
        clock
          start_date = 1/12/1996  # Select the start date of the simulation
          end_date = 30/06/1997  # Select the end date of the simulation
        summaryfile
        metfile met: filename=HE4.met
        area paddock
          outputfile: filename=Sorghum_HE4_T3.out; title=Sorghum_HE4_T3
            events My Variables Events -> /Validation/shared/My Variables
            variables My Variables -> /Validation/shared/My Variables
          folder Manager folder: same as Hermitage.HE1.Sorghum_HE1_T3.paddock.Manager folder
          irrigation: same as Hermitage.HE1.Sorghum_HE1_T1.paddock.Irrigation
          fertiliser
          operations: same as Hermitage.HE4.operations
          Soil HRS: same as Hermitage.HE4.HRS
          sorghum: same as Hermitage.HE1.Sorghum_HE1_T1.paddock.sorghum
    folder HE5
      Soil HRS: SoilType=HMM; LocalName=HRS; Site=HRS; NearestTown=Unknown; Region=SE Queensland; NaturalVegetation=Unknown; Latitude=0; Longitude=0; YearOfSampling=0
        Water: same as Hermitage.HE1.Sorghum_HE1_T1.paddock.HRS.Water
        SoilWater: SummerCona=6.5; SummerU=1.5; SummerDate=1-Nov; WinterCona=6.5; WinterU=1.5; WinterDate=1-Apr; DiffusConst=40; DiffusSlope=16; Salb=0.2; CN2Bare=85; CNRed=20; CNCov=0.8; Thickness=[100, 100, 200, 200, 200, 200, 200, 200, 200, 200]
          SWCON=[0.300, 0.300, 0.300, 0.300, 0.300, 0.300, 0.300, 0.300, 0.300, 0.300]
        SoilOrganicMatter: same as Hermitage.HE3.HRS.SoilOrganicMatter
        Analysis: Thickness=[100, 100, 200, 200, 200, 200, 200, 200, 200, 200]
          PH=[6.300, 6.400, 6.500, 6.600, 6.600, 6.500, 6.500, 6.500, 6.500, 6.500]
        Sample Initial nitrogen: NO3Units=ppm; NH4Units=ppm; SWUnits=Volumetric; OCUnits=Total; PHUnits=Water
          Thickness  NO3     NH4
          100        8.421   0.1
          100        8.054   0.1
          200        7.001   0.1
          200        3.824   0.1
          200        2.759   0.1
          200        3.429   0.1
          200        8.668   0.1
          200        11.576  0.1
          200        8.816   0.1
          200        11.758  0.1
        Sample Initial water: Thickness=[100, 100, 200, 200, 200, 200, 200, 200, 200, 200]; NO3Units=ppm; NH4Units=ppm; SWUnits=Volumetric; OCUnits=Total; PHUnits=Water
          SW=[0.217, 0.357, 0.375, 0.401, 0.349, 0.351, 0.359, 0.33, 0.322, 0.347]
      simulation Sorghum_HE5_T1
        clock
          start_date = 18/11/1997  # Select the start date of the simulation
          end_date = 15/04/1998  # Select the end date of the simulation
        summaryfile
        metfile met: filename=HE5.met
        area paddock
          outputfile: filename=Sorghum_HE5_T1.out; title=Sorghum_HE5_T1
            events My Variables Events -> /Validation/shared/My Variables
            variables My Variables -> /Validation/shared/My Variables
          folder Manager folder
            manager Sow SkipRow on a fixed date
              # Sowing criteria
              date = 27/11/1997  # Enter sowing date (d/m/yyyy)
              # Sowing parameters
              crop = Sorghum  # Enter name of crop to sow
              density = 10  # Enter sowing density (plants/m2)
              depth = 30  # Enter sowing depth (mm)
              cultivar = Buster  # Enter cultivar
              row_spacing = 0.5  # Enter row spacing (m)
              RowConfiguration = solid  # Enter skip row configuration
              ftn = 0.1  # Enter Fertile Tiller No.
              on start_of_day:
              script: same as in Hermitage.HE1.Sorghum_HE1_T1.paddock.Manager folder.Sow SkipRow on a fixed date
            manager Harvesting rule
              # Harvesting criteria
              crop = Sorghum  # Enter name of crop to harvest when ripe
              on end_of_day:
              script: same as in Hermitage.HE1.Sorghum_HE1_T1.paddock.Manager folder.Harvesting rule
          irrigation: same as Hermitage.HE1.Sorghum_HE1_T1.paddock.Irrigation
          fertiliser
          operations
            28/11/1997  Irrigation apply amount = 16
            2/12/1997  Irrigation apply amount = 25
            4/12/1997  Irrigation apply amount = 13
            8/12/1997  Irrigation apply amount = 21
            18/12/1997  Irrigation apply amount = 28
            6/01/1998  Irrigation apply amount = 26
            12/01/1998  Irrigation apply amount = 46
            27/01/1998  Irrigation apply amount = 25
            20/02/1998  Irrigation apply amount = 26
            27/02/1998  Irrigation apply amount = 55
            13/03/1998  Irrigation apply amount = 22
            18/03/1998  Irrigation apply amount = 39
            20/03/1998  Irrigation apply amount = 21
            26/11/1997  fertiliser apply amount = 3 (kg/ha), depth = 50 (mm), type = NO3_N ()
            20/02/1998  fertiliser apply amount = 59 (kg/ha), depth = 50 (mm), type = NO3_N ()
          Soil HRS: same as Hermitage.HE5.HRS
          sorghum: same as Hermitage.HE1.Sorghum_HE1_T1.paddock.sorghum
      simulation Sorghum_HE5_T2
        clock
          start_date = 18/11/1997  # Select the start date of the simulation
          end_date = 15/04/1998  # Select the end date of the simulation
        summaryfile
        metfile met: filename=HE5.met
        area paddock
          outputfile: filename=Sorghum_HE5_T2.out; title=Sorghum_HE5_T2
            events My Variables Events -> /Validation/shared/My Variables
            variables My Variables -> /Validation/shared/My Variables
          folder Manager folder
            manager Sow SkipRow on a fixed date
              # Sowing criteria
              date = 27/11/1997  # Enter sowing date (d/m/yyyy)
              # Sowing parameters
              crop = Sorghum  # Enter name of crop to sow
              density = 10  # Enter sowing density (plants/m2)
              depth = 30  # Enter sowing depth (mm)
              cultivar = M35-1  # Enter cultivar
              row_spacing = 0.5  # Enter row spacing (m)
              RowConfiguration = solid  # Enter skip row configuration
              ftn = 0.2  # Enter Fertile Tiller No.
              on start_of_day:
              script: same as in Hermitage.HE1.Sorghum_HE1_T1.paddock.Manager folder.Sow SkipRow on a fixed date
            manager Harvesting rule
              # Harvesting criteria
              crop = Sorghum  # Enter name of crop to harvest when ripe
              on end_of_day:
              script: same as in Hermitage.HE1.Sorghum_HE1_T1.paddock.Manager folder.Harvesting rule
          irrigation: same as Hermitage.HE1.Sorghum_HE1_T1.paddock.Irrigation
          fertiliser
          operations: same as Hermitage.HE5.Sorghum_HE5_T1.paddock.operations
          Soil HRS: same as Hermitage.HE5.HRS
          sorghum: same as Hermitage.HE1.Sorghum_HE1_T1.paddock.sorghum
      simulation Sorghum_HE5_T3
        clock
          start_date = 18/11/1997  # Select the start date of the simulation
          end_date = 15/04/1998  # Select the end date of the simulation
        summaryfile
        metfile met: filename=HE5.met
        area paddock
          outputfile: filename=Sorghum_HE5_T3.out; title=Sorghum_HE5_T3
            events My Variables Events -> /Validation/shared/My Variables
            variables My Variables -> /Validation/shared/My Variables
          folder Manager folder
            manager Sow SkipRow on a fixed date
              # Sowing criteria
              date = 27/11/1997  # Enter sowing date (d/m/yyyy)
              # Sowing parameters
              crop = Sorghum  # Enter name of crop to sow
              density = 10  # Enter sowing density (plants/m2)
              depth = 30  # Enter sowing depth (mm)
              cultivar = CSH13R  # Enter cultivar
              row_spacing = 0.5  # Enter row spacing (m)
              RowConfiguration = solid  # Enter skip row configuration
              ftn = 0  # Enter Fertile Tiller No.
              on start_of_day:
              script: same as in Hermitage.HE1.Sorghum_HE1_T1.paddock.Manager folder.Sow SkipRow on a fixed date
            manager Harvesting rule
              # Harvesting criteria
              crop = Sorghum  # Enter name of crop to harvest when ripe
              on end_of_day:
              script: same as in Hermitage.HE1.Sorghum_HE1_T1.paddock.Manager folder.Harvesting rule
          irrigation: same as Hermitage.HE1.Sorghum_HE1_T1.paddock.Irrigation
          fertiliser
          operations
            28/11/1997  Irrigation apply amount = 16
            2/12/1997  Irrigation apply amount = 25
            4/12/1997  Irrigation apply amount = 13
            8/12/1997  Irrigation apply amount = 21
            18/12/1997  Irrigation apply amount = 28
            6/01/1998  Irrigation apply amount = 26
            12/01/1998  Irrigation apply amount = 46
            27/01/1998  Irrigation apply amount = 25
            20/02/1998  Irrigation apply amount = 26
            27/02/1998  Irrigation apply amount = 55
            13/03/1998  Irrigation apply amount = 22
            18/03/1998  Irrigation apply amount = 39
            20/03/1998  Irrigation apply amount = 21
            26/11/1997  fertiliser apply amount = 0 (kg/ha), depth = 50 (mm), type = NO3_N ()
            26/11/1997  fertiliser apply amount = 33 (kg/ha), depth = 50 (mm), type = NO3_N ()
            20/02/1998  fertiliser apply amount = 59 (kg/ha), depth = 50 (mm), type = NO3_N ()
          Soil HRS: same as Hermitage.HE5.HRS
          sorghum: same as Hermitage.HE1.Sorghum_HE1_T1.paddock.sorghum
    folder HE6
      Soil HRS: SoilType=HMM; LocalName=HRS; Site=HRS; NearestTown=Unknown; Region=SE Queensland; NaturalVegetation=Unknown; Latitude=0; Longitude=0; YearOfSampling=0
        Water: same as Hermitage.HE1.Sorghum_HE1_T1.paddock.HRS.Water
        SoilWater: same as Hermitage.HE5.HRS.SoilWater
        SoilOrganicMatter: same as Hermitage.HE3.HRS.SoilOrganicMatter
        Analysis: Thickness=[100, 100, 200, 200, 200, 200, 200, 200, 200, 200]
          PH=[6.300, 6.400, 6.500, 6.600, 6.600, 6.500, 6.500, 6.500, 6.500, 6.500]
        Sample Initial nitrogen: NO3Units=ppm; NH4Units=ppm; SWUnits=Volumetric; OCUnits=Total; PHUnits=Water
          Thickness  NO3    NH4
          100        1.493  0.1
          100        1.633  0.1
          200        1.233  0.1
          200        0.9    0.1
          200        1.1    0.1
          200        1.467  0.1
          200        2.516  0.1
          200        3.067  0.1
          200        3.012  0.1
          200        2.976  0.1
        Sample Initial water: Thickness=[100, 100, 200, 200, 200, 200, 200, 200, 200, 200]; NO3Units=ppm; NH4Units=ppm; SWUnits=Volumetric; OCUnits=Total; PHUnits=Water
          SW=[0.217, 0.357, 0.375, 0.401, 0.349, 0.351, 0.359, 0.33, 0.322, 0.347]
      simulation Sorghum_HE6_T1
        clock
          start_date = 18/11/1997  # Select the start date of the simulation
          end_date = 15/04/1998  # Select the end date of the simulation
        summaryfile
        metfile met: filename=HE6.met
        area paddock
          outputfile: filename=Sorghum_HE6_T1.out; title=Sorghum_HE6_T1
            events My Variables Events -> /Validation/shared/My Variables
            variables My Variables -> /Validation/shared/My Variables
          folder Manager folder
            manager Sow SkipRow on a fixed date
              # Sowing criteria
              date = 27/11/1997  # Enter sowing date (d/m/yyyy)
              # Sowing parameters
              crop = Sorghum  # Enter name of crop to sow
              density = 10  # Enter sowing density (plants/m2)
              depth = 30  # Enter sowing depth (mm)
              cultivar = Buster  # Enter cultivar
              row_spacing = 0.5  # Enter row spacing (m)
              RowConfiguration = solid  # Enter skip row configuration
              ftn = 0  # Enter Fertile Tiller No.
              on start_of_day:
              script: same as in Hermitage.HE1.Sorghum_HE1_T1.paddock.Manager folder.Sow SkipRow on a fixed date
            manager Harvesting rule
              # Harvesting criteria
              crop = Sorghum  # Enter name of crop to harvest when ripe
              on end_of_day:
              script: same as in Hermitage.HE1.Sorghum_HE1_T1.paddock.Manager folder.Harvesting rule
          irrigation: same as Hermitage.HE1.Sorghum_HE1_T1.paddock.Irrigation
          fertiliser
          operations
            28/11/1997  Irrigation apply amount = 16
            2/12/1997  Irrigation apply amount = 24
            4/12/1997  Irrigation apply amount = 13
            8/12/1997  Irrigation apply amount = 21
            18/12/1997  Irrigation apply amount = 28
            6/01/1998  Irrigation apply amount = 26
            12/01/1998  Irrigation apply amount = 47
            27/01/1998  Irrigation apply amount = 25
            20/02/1998  Irrigation apply amount = 20
            27/02/1998  Irrigation apply amount = 38
            13/03/1998  Irrigation apply amount = 22
            18/03/1998  Irrigation apply amount = 40
            26/11/1997  fertiliser apply amount = 10 (kg/ha), depth = 50 (mm), type = NO3_N ()
          Soil HRS: same as Hermitage.HE6.HRS
          sorghum: same as Hermitage.HE1.Sorghum_HE1_T1.paddock.sorghum
      simulation Sorghum_HE6_T2
        clock
          start_date = 18/11/1997  # Select the start date of the simulation
          end_date = 15/04/1998  # Select the end date of the simulation
        summaryfile
        metfile met: filename=HE6.met
        area paddock
          outputfile: filename=Sorghum_HE6_T2.out; title=Sorghum_HE6_T2
            events My Variables Events -> /Validation/shared/My Variables
            variables My Variables -> /Validation/shared/My Variables
          folder Manager folder
            manager Sow SkipRow on a fixed date
              # Sowing criteria
              date = 27/11/1997  # Enter sowing date (d/m/yyyy)
              # Sowing parameters
              crop = Sorghum  # Enter name of crop to sow
              density = 10  # Enter sowing density (plants/m2)
              depth = 30  # Enter sowing depth (mm)
              cultivar = M35-1  # Enter cultivar
              row_spacing = 0.5  # Enter row spacing (m)
              RowConfiguration = solid  # Enter skip row configuration
              ftn = 0  # Enter Fertile Tiller No.
              on start_of_day:
              script: same as in Hermitage.HE1.Sorghum_HE1_T1.paddock.Manager folder.Sow SkipRow on a fixed date
            manager Harvesting rule
              # Harvesting criteria
              crop = Sorghum  # Enter name of crop to harvest when ripe
              on end_of_day:
              script: same as in Hermitage.HE1.Sorghum_HE1_T1.paddock.Manager folder.Harvesting rule
          irrigation: same as Hermitage.HE1.Sorghum_HE1_T1.paddock.Irrigation
          fertiliser
          operations: same as Hermitage.HE6.Sorghum_HE6_T1.paddock.operations
          Soil HRS: same as Hermitage.HE6.HRS
          sorghum: same as Hermitage.HE1.Sorghum_HE1_T1.paddock.sorghum
      simulation Sorghum_HE6_T3
        clock
          start_date = 18/11/1997  # Select the start date of the simulation
          end_date = 15/04/1998  # Select the end date of the simulation
        summaryfile
        metfile met: filename=HE6.met
        area paddock
          outputfile: filename=Sorghum_HE6_T3.out; title=Sorghum_HE6_T3
            events My Variables Events -> /Validation/shared/My Variables
            variables My Variables -> /Validation/shared/My Variables
          folder Manager folder
            manager Sow SkipRow on a fixed date
              # Sowing criteria
              date = 27/11/1997  # Enter sowing date (d/m/yyyy)
              # Sowing parameters
              crop = Sorghum  # Enter name of crop to sow
              density = 10  # Enter sowing density (plants/m2)
              depth = 30  # Enter sowing depth (mm)
              cultivar = CSH13R  # Enter cultivar
              row_spacing = 0.5  # Enter row spacing (m)
              RowConfiguration = solid  # Enter skip row configuration
              ftn = 0  # Enter Fertile Tiller No.
              on start_of_day:
```
   tlai = lai + slai
            if (paddock_is_fallow() = 1 and today = date('[date]')) then
              [crop] sow plants =[density], sowing_depth = [depth], cultivar = [cultivar], row_spacing = [row_spacing], skip = [RowConfiguration], tiller_no_fertile = [ftn] ()
            endif
           if (paddock_is_fallow() = 0) then
               outputfile do_output
           endif
```
            manager Harvesting rule
              # Harvesting criteria
              crop = Sorghum  # Enter name of crop to harvest when ripe
              on end_of_day:
              script: same as in Hermitage.HE1.Sorghum_HE1_T1.paddock.Manager folder.Harvesting rule
          irrigation: same as Hermitage.HE1.Sorghum_HE1_T1.paddock.Irrigation
          fertiliser
          operations: same as Hermitage.HE6.Sorghum_HE6_T1.paddock.operations
          Soil HRS: same as Hermitage.HE6.HRS
          sorghum: same as Hermitage.HE1.Sorghum_HE1_T1.paddock.sorghum
    folder HE7
      simulation Sorghum_HE7_T1
        clock
          start_date = 25/11/1997  # Select the start date of the simulation
          end_date = 15/04/1998  # Select the end date of the simulation
        summaryfile
        metfile met: filename=HE7.met
        area paddock
          outputfile: filename=Sorghum_HE7_T1.out; title=Sorghum_HE7_T1
            events My Variables Events -> /Validation/shared/My Variables
            variables My Variables -> /Validation/shared/My Variables
          folder Manager folder
            manager Sow SkipRow on a fixed date
              # Sowing criteria
              date = 27/11/1997  # Enter sowing date (d/m/yyyy)
              # Sowing parameters
              crop = Sorghum  # Enter name of crop to sow
              density = 10  # Enter sowing density (plants/m2)
              depth = 15  # Enter sowing depth (mm)
              cultivar = Buster  # Enter cultivar
              row_spacing = 0.5  # Enter row spacing (m)
              RowConfiguration = solid  # Enter skip row configuration
              ftn = 0  # Enter Fertile Tiller No.
              on start_of_day:
              script: same as in Hermitage.HE1.Sorghum_HE1_T1.paddock.Manager folder.Sow SkipRow on a fixed date
            manager Harvesting rule
              # Harvesting criteria
              crop = Sorghum  # Enter name of crop to harvest when ripe
              on end_of_day:
              script: same as in Hermitage.HE1.Sorghum_HE1_T1.paddock.Manager folder.Harvesting rule
          irrigation: same as Hermitage.HE1.Sorghum_HE1_T1.paddock.Irrigation
          fertiliser
          operations
            28/11/1997  Irrigation apply amount = 65
            16/12/1997  Irrigation apply amount = 90
            26/11/1997  fertiliser apply amount = 3 (kg/ha), depth = 50 (mm), type = NO3_N ()
            26/11/1997  fertiliser apply amount = 119 (kg/ha), depth = 50 (mm), type = NO3_N ()
          Soil HRS: SoilType=HMM; LocalName=HRS; Site=HRS; NearestTown=Unknown; Region=SE Queensland; NaturalVegetation=Unknown; Latitude=0; Longitude=0; YearOfSampling=0
            Water: same as Hermitage.HE3.HRS.Water
            SoilWater: same as Hermitage.HE1.Sorghum_HE1_T1.paddock.HRS.SoilWater
            SoilOrganicMatter: same as Hermitage.HE3.HRS.SoilOrganicMatter
            Analysis: Thickness=[100, 100, 200, 200, 200, 200, 200, 200, 200, 200]
              PH=[6.300, 6.400, 6.500, 6.600, 6.600, 6.500, 6.500, 6.500, 6.500, 6.500]
            Sample Initial nitrogen: NO3Units=ppm; NH4Units=ppm; SWUnits=Volumetric; OCUnits=Total; PHUnits=Water
              Thickness  NO3     NH4
              100        25.798  0.1
              100        6.921   0.1
              200        9.285   0.1
              200        2.823   0.1
              200        2.286   0.1
              200        3.196   0.1
              200        3.695   0.1
              200        4.41    0.1
              200        2.743   0.1
              200        4.891   0.1
            Sample Initial water: Thickness=[100, 100, 200, 200, 200, 200, 200, 200, 200, 200]; NO3Units=ppm; NH4Units=ppm; SWUnits=Volumetric; OCUnits=Total; PHUnits=Water
              SW=[0.307, 0.326, 0.444, 0.429, 0.363, 0.351, 0.336, 0.343, 0.352, 0.347]
          sorghum: same as Hermitage.HE1.Sorghum_HE1_T1.paddock.sorghum
      simulation Sorghum_HE7_T2
        clock
          start_date = 25/11/1997  # Select the start date of the simulation
          end_date = 15/04/1998  # Select the end date of the simulation
        summaryfile
        metfile met: filename=HE7.met
        area paddock
          outputfile: filename=Sorghum_HE7_T2.out; title=Sorghum_HE7_T2
            events My Variables Events -> /Validation/shared/My Variables
            variables My Variables -> /Validation/shared/My Variables
          folder Manager folder
            manager Sow SkipRow on a fixed date
              # Sowing criteria
              date = 27/11/1997  # Enter sowing date (d/m/yyyy)
              # Sowing parameters
              crop = Sorghum  # Enter name of crop to sow
              density = 10  # Enter sowing density (plants/m2)
              depth = 15  # Enter sowing depth (mm)
              cultivar = M35-1  # Enter cultivar
              row_spacing = 0.5  # Enter row spacing (m)
              RowConfiguration = solid  # Enter skip row configuration
              ftn = 0  # Enter Fertile Tiller No.
              on start_of_day:
              script: same as in Hermitage.HE1.Sorghum_HE1_T1.paddock.Manager folder.Sow SkipRow on a fixed date
            manager Harvesting rule
              # Harvesting criteria
              crop = Sorghum  # Enter name of crop to harvest when ripe
              on end_of_day:
              script: same as in Hermitage.HE1.Sorghum_HE1_T1.paddock.Manager folder.Harvesting rule
          irrigation: same as Hermitage.HE1.Sorghum_HE1_T1.paddock.Irrigation
          fertiliser
          operations
            28/11/1997  Irrigation apply amount = 65
            16/12/1997  Irrigation apply amount = 90
            26/11/1997  fertiliser apply amount = 0 (kg/ha), depth = 50 (mm), type = NO3_N ()
            26/11/1997  fertiliser apply amount = 33 (kg/ha), depth = 50 (mm), type = NO3_N ()
            26/11/1997  fertiliser apply amount = 119 (kg/ha), depth = 50 (mm), type = NO3_N ()
          Soil HRS: LocalName=HRS; Site=HRS; Region=SE Queensland
            SoilType = HMM  # Soil description
            NearestTown = Unknown
            NaturalVegetation = Unknown
            Water: same as Hermitage.HE3.HRS.Water
            SoilWater: same as Hermitage.HE5.HRS.SoilWater
            SoilOrganicMatter: same as Hermitage.HE3.HRS.SoilOrganicMatter
            Analysis: Thickness=[100, 100, 200, 200, 200, 200, 200, 200, 200, 200]
              PH=[6.300, 6.400, 6.500, 6.600, 6.600, 6.500, 6.500, 6.500, 6.500, 6.500]
            Sample Initial nitrogen: same as Hermitage.HE7.Sorghum_HE7_T1.paddock.HRS.Initial nitrogen
            Sample Initial water: Thickness=[100, 100, 200, 200, 200, 200, 200, 200, 200, 200]; NO3Units=ppm; NH4Units=ppm; SWUnits=Volumetric; OCUnits=Total; PHUnits=Water
              SW=[0.323, 0.407, 0.388, 0.342, 0.341, 0.321, 0.324, 0.332, 0.339, 0.341]
          sorghum: same as Hermitage.HE1.Sorghum_HE1_T1.paddock.sorghum
      simulation Sorghum_HE7_T3
        clock
          start_date = 25/11/1997  # Select the start date of the simulation
          end_date = 15/04/1998  # Select the end date of the simulation
        summaryfile
        metfile met: filename=HE7.met
        area paddock
          outputfile: filename=Sorghum_HE7_T3.out; title=Sorghum_HE7_T3
            events My Variables Events -> /Validation/shared/My Variables
            variables My Variables -> /Validation/shared/My Variables
          folder Manager folder
            manager Sow SkipRow on a fixed date
              # Sowing criteria
              date = 27/11/1997  # Enter sowing date (d/m/yyyy)
              # Sowing parameters
              crop = Sorghum  # Enter name of crop to sow
              density = 10  # Enter sowing density (plants/m2)
              depth = 15  # Enter sowing depth (mm)
              cultivar = CSH13R  # Enter cultivar
              row_spacing = 0.5  # Enter row spacing (m)
              RowConfiguration = solid  # Enter skip row configuration
              ftn = 0  # Enter Fertile Tiller No.
              on start_of_day:
              script: same as in Hermitage.HE1.Sorghum_HE1_T1.paddock.Manager folder.Sow SkipRow on a fixed date
            manager Harvesting rule
              # Harvesting criteria
              crop = Sorghum  # Enter name of crop to harvest when ripe
              on end_of_day:
              script: same as in Hermitage.HE1.Sorghum_HE1_T1.paddock.Manager folder.Harvesting rule
          irrigation: same as Hermitage.HE1.Sorghum_HE1_T1.paddock.Irrigation
          fertiliser
          operations: same as Hermitage.HE7.Sorghum_HE7_T2.paddock.operations
          Soil HRS: SoilType=HMM; LocalName=HRS; Site=HRS; NearestTown=Unknown; Region=SE Queensland; NaturalVegetation=Unknown; Latitude=0; Longitude=0; YearOfSampling=0
            Water: same as Hermitage.HE3.HRS.Water
            SoilWater: same as Hermitage.HE5.HRS.SoilWater
            SoilOrganicMatter: same as Hermitage.HE3.HRS.SoilOrganicMatter
            Analysis: Thickness=[100, 100, 200, 200, 200, 200, 200, 200, 200, 200]
              PH=[6.300, 6.400, 6.500, 6.600, 6.600, 6.500, 6.500, 6.500, 6.500, 6.500]
            Sample Initial nitrogen: same as Hermitage.HE7.Sorghum_HE7_T1.paddock.HRS.Initial nitrogen
            Sample Initial water: Thickness=[100, 100, 200, 200, 200, 200, 200, 200, 200, 200]; NO3Units=ppm; NH4Units=ppm; SWUnits=Volumetric; OCUnits=Total; PHUnits=Water
              SW=[0.307, 0.377, 0.385, 0.382, 0.376, 0.337, 0.346, 0.359, 0.348, 0.35]
          sorghum: same as Hermitage.HE1.Sorghum_HE1_T1.paddock.sorghum
    folder HE8
      simulation Sorghum_HE8_T1
        clock
          start_date = 25/11/1997  # Select the start date of the simulation
          end_date = 15/04/1998  # Select the end date of the simulation
        summaryfile
        metfile met: filename=HE8.met
        area paddock
          outputfile: filename=Sorghum_HE8_T1.out; title=Sorghum_HE8_T1
            events My Variables Events -> /Validation/shared/My Variables
            variables My Variables -> /Validation/shared/My Variables
          folder Manager folder
            manager Sow SkipRow on a fixed date: same as Hermitage.HE7.Sorghum_HE7_T1.paddock.Manager folder.Sow SkipRow on a fixed date
            manager Harvesting rule
              # Harvesting criteria
              crop = Sorghum  # Enter name of crop to harvest when ripe
              on end_of_day:
              script: same as in Hermitage.HE1.Sorghum_HE1_T1.paddock.Manager folder.Harvesting rule
          irrigation: same as Hermitage.HE1.Sorghum_HE1_T1.paddock.Irrigation
          fertiliser
          operations
            28/11/1997  Irrigation apply amount = 65
            16/12/1997  Irrigation apply amount = 90
            26/11/1997  fertiliser apply amount = 3 (kg/ha), depth = 50 (mm), type = NO3_N ()
            26/11/1997  fertiliser apply amount = 10 (kg/ha), depth = 50 (mm), type = NO3_N ()
          Soil HRS: SoilType=HMM; LocalName=HRS; Site=HRS; NearestTown=Unknown; Region=SE Queensland; NaturalVegetation=Unknown; Latitude=0; Longitude=0; YearOfSampling=0
            Water: same as Hermitage.HE3.HRS.Water
            SoilWater: same as Hermitage.HE5.HRS.SoilWater
            SoilOrganicMatter: same as Hermitage.HE3.HRS.SoilOrganicMatter
            Analysis: Thickness=[100, 100, 200, 200, 200, 200, 200, 200, 200, 200]
              PH=[6.300, 6.400, 6.500, 6.600, 6.600, 6.500, 6.500, 6.500, 6.500, 6.500]
            Sample Initial nitrogen: same as Hermitage.HE7.Sorghum_HE7_T1.paddock.HRS.Initial nitrogen
            Sample Initial water: Thickness=[100, 100, 200, 200, 200, 200, 200, 200, 200, 200]; NO3Units=ppm; NH4Units=ppm; SWUnits=Volumetric; OCUnits=Total; PHUnits=Water
              SW=[0.294, 0.381, 0.367, 0.306, 0.29, 0.319, 0.33, 0.343, 0.337, 0.344]
          sorghum: same as Hermitage.HE1.Sorghum_HE1_T1.paddock.sorghum
      simulation Sorghum_HE8_T2
        clock
          start_date = 25/11/1997  # Select the start date of the simulation
          end_date = 15/04/1998  # Select the end date of the simulation
        summaryfile
        metfile met: filename=HE8.met
        area paddock
          outputfile: filename=Sorghum_HE8_T2.out; title=Sorghum_HE8_T2
            events My Variables Events -> /Validation/shared/My Variables
            variables My Variables -> /Validation/shared/My Variables
          folder Manager folder
            manager Sow SkipRow on a fixed date: same as Hermitage.HE7.Sorghum_HE7_T2.paddock.Manager folder.Sow SkipRow on a fixed date
            manager Harvesting rule
              # Harvesting criteria
              crop = Sorghum  # Enter name of crop to harvest when ripe
              on end_of_day:
              script: same as in Hermitage.HE1.Sorghum_HE1_T1.paddock.Manager folder.Harvesting rule
          irrigation: same as Hermitage.HE1.Sorghum_HE1_T1.paddock.Irrigation
          fertiliser
          operations
            28/11/1997  Irrigation apply amount = 65
            16/12/1997  Irrigation apply amount = 90
            26/11/1997  fertiliser apply amount = 0 (kg/ha), depth = 50 (mm), type = NO3_N ()
            26/11/1997  fertiliser apply amount = 33 (kg/ha), depth = 50 (mm), type = NO3_N ()
            26/11/1997  fertiliser apply amount = 10 (kg/ha), depth = 50 (mm), type = NO3_N ()
          Soil HRS: SoilType=HMM; LocalName=HRS; Site=HRS; NearestTown=Unknown; Region=SE Queensland; NaturalVegetation=Unknown; Latitude=0; Longitude=0; YearOfSampling=0
            Water: same as Hermitage.HE3.HRS.Water
            SoilWater: same as Hermitage.HE5.HRS.SoilWater
            SoilOrganicMatter: same as Hermitage.HE3.HRS.SoilOrganicMatter
            Analysis: Thickness=[100, 100, 200, 200, 200, 200, 200, 200, 200, 200]
              PH=[6.300, 6.400, 6.500, 6.600, 6.600, 6.500, 6.500, 6.500, 6.500, 6.500]
            Sample Initial nitrogen: same as Hermitage.HE7.Sorghum_HE7_T1.paddock.HRS.Initial nitrogen
            Sample Initial water: Thickness=[100, 100, 200, 200, 200, 200, 200, 200, 200, 200]; NO3Units=ppm; NH4Units=ppm; SWUnits=Volumetric; OCUnits=Total; PHUnits=Water
              SW=[0.338, 0.364, 0.359, 0.376, 0.364, 0.351, 0.358, 0.351, 0.346, 0.343]
          sorghum: same as Hermitage.HE1.Sorghum_HE1_T1.paddock.sorghum
      simulation Sorghum_HE8_T3
        clock
          start_date = 25/11/1997  # Select the start date of the simulation
          end_date = 15/04/1998  # Select the end date of the simulation
        summaryfile
        metfile met: filename=HE8.met
        area paddock
          outputfile: filename=Sorghum_HE8_T3.out; title=Sorghum_HE8_T3
            events My Variables Events -> /Validation/shared/My Variables
            variables My Variables -> /Validation/shared/My Variables
          folder Manager folder
            manager Sow SkipRow on a fixed date
              # Sowing criteria
              date = 27/11/1997  # Enter sowing date (d/m/yyyy)
              # Sowing parameters
              crop = sorghum  # Enter name of crop to sow
              density = 10  # Enter sowing density (plants/m2)
              depth = 15  # Enter sowing depth (mm)
              cultivar = CSH13R  # Enter cultivar
              row_spacing = 0.5  # Enter row spacing (m)
              RowConfiguration = solid  # Enter skip row configuration
              ftn = 0  # Enter Fertile Tiller No.
              on start_of_day:
              script: same as in Hermitage.HE1.Sorghum_HE1_T1.paddock.Manager folder.Sow SkipRow on a fixed date
            manager Harvesting rule
              # Harvesting criteria
              crop = Sorghum  # Enter name of crop to harvest when ripe
              on end_of_day:
              script: same as in Hermitage.HE1.Sorghum_HE1_T1.paddock.Manager folder.Harvesting rule
          irrigation: same as Hermitage.HE1.Sorghum_HE1_T1.paddock.Irrigation
          fertiliser
          operations: same as Hermitage.HE8.Sorghum_HE8_T2.paddock.operations
          Soil HRS: LocalName=HRS; Site=HRS; Region=SE Queensland
            SoilType = HMM  # Soil description
            NearestTown = Unknown
            NaturalVegetation = Unknown
            Water: same as Hermitage.HE3.HRS.Water
            SoilWater: same as Hermitage.HE5.HRS.SoilWater
            SoilOrganicMatter: same as Hermitage.HE3.HRS.SoilOrganicMatter
            Analysis: Thickness=[100, 100, 200, 200, 200, 200, 200, 200, 200, 200]
              PH=[6.300, 6.400, 6.500, 6.600, 6.600, 6.500, 6.500, 6.500, 6.500, 6.500]
            Sample Initial nitrogen: same as Hermitage.HE7.Sorghum_HE7_T1.paddock.HRS.Initial nitrogen
            Sample Initial water: Thickness=[100, 100, 200, 200, 200, 200, 200, 200, 200, 200]; NO3Units=ppm; NH4Units=ppm; SWUnits=Volumetric; OCUnits=Total; PHUnits=Water
              SW=[0.31, 0.387, 0.329, 0.308, 0.317, 0.33, 0.329, 0.348, 0.341, 0.345]
          sorghum: same as Hermitage.HE1.Sorghum_HE1_T1.paddock.sorghum
  folder Icrisat
    folder BW5
      simulation Sorghum_BW5_GxE_T1
        clock
          start_date = 26/09/1996  # Select the start date of the simulation
          end_date = 20/02/1997  # Select the end date of the simulation
        summaryfile
        metfile met: filename=BW5_GxE.met
        area paddock
          outputfile: filename=Sorghum_BW5_GxE_T1.out; title=Sorghum_BW5_GxE_T1
            variables My Variables -> /Validation/shared/My Variables
            events My Variables Events -> /Validation/shared/My Variables Events
          folder Manager folder
            manager Sow SkipRow on a fixed date
              # Sowing criteria
              date = 10/10/1996  # Enter sowing date (d/m/yyyy)
              # Sowing parameters
              crop = Sorghum  # Enter name of crop to sow
              density = 10  # Enter sowing density (plants/m2)
              depth = 30  # Enter sowing depth (mm)
              cultivar = M35-1  # Enter cultivar
              row_spacing = 0.5  # Enter row spacing (m)
              RowConfiguration = solid  # Enter skip row configuration
              ftn = 0  # Enter Fertile Tiller No.
              on start_of_day:
              script: same as in Hermitage.HE1.Sorghum_HE1_T1.paddock.Manager folder.Sow SkipRow on a fixed date
            manager Harvesting rule
              # Harvesting criteria
              crop = Sorghum  # Enter name of crop to harvest when ripe
              on end_of_day:
              script: same as in Hermitage.HE1.Sorghum_HE1_T1.paddock.Manager folder.Harvesting rule
          irrigation: same as Hermitage.HE4.Sorghum_HE4_T1.paddock.Irrigation
          fertiliser
          operations
            21/11/1996  Irrigation apply amount = 29
            2/12/1996  Irrigation apply amount = 45
            11/12/1996  Irrigation apply amount = 45
            8/01/1997  Irrigation apply amount = 65
            9/01/1997  Irrigation apply amount = 50
            27/09/1996  fertiliser apply amount = 10 (kg/ha), depth = 50 (mm), type = NO3_N ()
            9/10/1996  fertiliser apply amount = 13 (kg/ha), depth = 50 (mm), type = NO3_N ()
            16/10/1996  fertiliser apply amount = 99 (kg/ha), depth = 50 (mm), type = NO3_N ()
            11/11/1996  fertiliser apply amount = 59 (kg/ha), depth = 50 (mm), type = NO3_N ()
            11/12/1996  fertiliser apply amount = 59 (kg/ha), depth = 50 (mm), type = NO3_N ()
          Soil IC_BW5: SoilType=BW5; LocalName=ICRISAT; Site=ICRISAT; NearestTown=Unknown; Region=Hyderabad; NaturalVegetation=Unknown; Latitude=0; Longitude=0; YearOfSampling=0
            Water
              Thickness  BD    AirDry  LL15  DUL   SAT
              150        1.32  0.1     0.21  0.42  0.44
              150        1.49  0.21    0.22  0.39  0.41
              150        1.54  0.23    0.24  0.36  0.38
              150        1.54  0.23    0.24  0.36  0.38
              150        1.49  0.22    0.23  0.39  0.41
              150        1.47  0.22    0.23  0.42  0.44
              150        1.38  0.22    0.23  0.43  0.45
              150        1.37  0.21    0.22  0.43  0.45
              150        1.33  0.22    0.22  0.45  0.47
              150        1.35  0.22    0.22  0.43  0.45
              150        1.35  0.22    0.22  0.43  0.45
              150        1.33  0.22    0.22  0.45  0.47
              150        1.33  0.22    0.22  0.45  0.47
              SoilCrop Sorghum
                LL=[0.21, 0.22, 0.24, 0.24, 0.23, 0.23, 0.23, 0.22, 0.22, 0.22, 0.22, 0.22, 0.22]
                KL=[0.07, 0.07, 0.07, 0.07, 0.07, 0.07, 0.07, 0.07, 0.07, 0.04, 0.04, 0.04, 0.04]
                XF=[1, 1, 1, 1, 1, 1, 1, 1, 1, 1, 1, 1, 1]
            SoilWater: SummerCona=3.5; SummerU=6; SummerDate=1-Nov; WinterCona=3.5; WinterU=6; WinterDate=1-Apr; DiffusConst=40; DiffusSlope=16; Salb=0.11; CN2Bare=85; CNRed=0.8; CNCov=0.2
              Thickness=[150, 150, 150, 150, 150, 150, 150, 150, 150, 150, 150, 150, 150]
              SWCON=[0.16, 0.11, 0.14, 0.14, 0.11, 0.11, 0.1, 0.1, 0.1, 0.12, 0.12, 0.1, 0.1]
            SoilOrganicMatter: RootCN=45; RootWt=1000; SoilCN=14.5; EnrACoeff=7.4; EnrBCoeff=0.2; OCUnits=Total
              Thickness  OC    FBiom  FInert
              150        0.45  0.05   0.39
              150        0.32  0.02   0.47
              150        0.29  0.01   0.52
              150        0.23  0.01   0.62
              150        0.27  0.01   0.74
              150        0.3   0.01   0.83
              150        0.23  0.01   0.93
              150        0.22  0.01   0.93
              150        0.19  0.01   0.93
              150        0.12  0.01   0.93
              150        0.12  0.01   0.93
              150        0.14  0.01   0.93
              150        0.14  0.01   0.93
            Analysis: PHUnits=Water; BoronUnits=HotWater
              Thickness=[150, 150, 150, 150, 150, 150, 150, 150, 150, 150, 150, 150, 150]
              PH=[8.35, 8.52, 8.8, 8.95, 9, 9, 9, 9, 8.92, 8.97, 8.97, 8.82, 8.82]
            Sample Initial nitrogen: NO3Units=ppm; NH4Units=ppm; SWUnits=Volumetric; OCUnits=Total; PHUnits=Water
              Thickness  NO3  NH4
              150        6.1  0.1
              150        5.6  0.1
              150        4    0.1
              150        3.3  0.1
              150        3.2  0.1
              150        3.7  0.1
              150        5    0.1
              150        3    0.1
              150        3    0.1
              150        2    0.1
              150        2    0.1
              150        2    0.1
              150        2    0.1
            Sample Initial water: NO3Units=ppm; NH4Units=ppm; SWUnits=Volumetric; OCUnits=Total; PHUnits=Water
              Thickness=[150, 150, 150, 150, 150, 150, 150, 150, 150, 150, 150, 150, 150]
              SW=[0.281, 0.338, 0.353, 0.36, 0.39, 0.407, 0.43, 0.43, 0.45, 0.43, 0.43, 0.45, 0.45]
          sorghum: same as Hermitage.HE1.Sorghum_HE1_T1.paddock.sorghum
      simulation Sorghum_BW5_GxE_T2
        clock
          start_date = 26/09/1996  # Select the start date of the simulation
          end_date = 20/02/1997  # Select the end date of the simulation
        summaryfile
        metfile met: filename=BW5_GxE.met
        area paddock
          outputfile: filename=Sorghum_BW5_GxE_T2.out; title=Sorghum_BW5_GxE_T2
            variables My Variables -> /Validation/shared/My Variables
            events My Variables Events -> /Validation/shared/My Variables Events
          folder Manager folder
            manager Sow SkipRow on a fixed date
              # Sowing criteria
              date = 10/10/1996  # Enter sowing date (d/m/yyyy)
              # Sowing parameters
              crop = Sorghum  # Enter name of crop to sow
              density = 10  # Enter sowing density (plants/m2)
              depth = 30  # Enter sowing depth (mm)
              cultivar = CSH13R  # Enter cultivar
              row_spacing = 0.5  # Enter row spacing (m)
              RowConfiguration = solid  # Enter skip row configuration
              ftn = 0  # Enter Fertile Tiller No.
              on start_of_day:
              script: same as in Hermitage.HE1.Sorghum_HE1_T1.paddock.Manager folder.Sow SkipRow on a fixed date
            manager Harvesting rule
              # Harvesting criteria
              crop = Sorghum  # Enter name of crop to harvest when ripe
              on end_of_day:
              script: same as in Hermitage.HE1.Sorghum_HE1_T1.paddock.Manager folder.Harvesting rule
          irrigation: same as Hermitage.HE1.Sorghum_HE1_T1.paddock.Irrigation
          fertiliser
          operations: same as Icrisat.BW5.Sorghum_BW5_GxE_T1.paddock.operations
          Soil IC_BW5: same as Icrisat.BW5.Sorghum_BW5_GxE_T1.paddock.IC_BW5
          sorghum: same as Hermitage.HE1.Sorghum_HE1_T1.paddock.sorghum
      simulation Sorghum_BW5_GxE_T3
        clock
          start_date = 26/09/1996  # Select the start date of the simulation
          end_date = 20/02/1997  # Select the end date of the simulation
        summaryfile
        metfile met: filename=BW5_GxE.met
        area paddock
          outputfile: filename=Sorghum_BW5_GxE_T3.out; title=Sorghum_BW5_GxE_T3
            variables My Variables -> /Validation/shared/My Variables
            events My Variables Events -> /Validation/shared/My Variables Events
          folder Manager folder
            manager Sow SkipRow on a fixed date
              # Sowing criteria
              date = 10/10/1996  # Enter sowing date (d/m/yyyy)
              # Sowing parameters
              crop = Sorghum  # Enter name of crop to sow
              density = 10  # Enter sowing density (plants/m2)
              depth = 30  # Enter sowing depth (mm)
              cultivar = ATX623xRTX430  # Enter cultivar
              row_spacing = 0.5  # Enter row spacing (m)
              RowConfiguration = solid  # Enter skip row configuration
              ftn = 0  # Enter Fertile Tiller No.
              on start_of_day:
              script: same as in Hermitage.HE1.Sorghum_HE1_T1.paddock.Manager folder.Sow SkipRow on a fixed date
            manager Harvesting rule
              # Harvesting criteria
              crop = Sorghum  # Enter name of crop to harvest when ripe
              on end_of_day:
              script: same as in Hermitage.HE1.Sorghum_HE1_T1.paddock.Manager folder.Harvesting rule
          irrigation: same as Hermitage.HE1.Sorghum_HE1_T1.paddock.Irrigation
          fertiliser
          operations: same as Icrisat.BW5.Sorghum_BW5_GxE_T1.paddock.operations
          Soil IC_BW5: same as Icrisat.BW5.Sorghum_BW5_GxE_T1.paddock.IC_BW5
          sorghum: same as Hermitage.HE1.Sorghum_HE1_T1.paddock.sorghum
      simulation Sorghum_BW5_GxE_T4
        clock
          start_date = 26/09/1996  # Select the start date of the simulation
          end_date = 20/02/1997  # Select the end date of the simulation
        summaryfile
        metfile met: filename=BW5_GxE.met
        area paddock
          outputfile: filename=Sorghum_BW5_GxE_T4.out; title=Sorghum_BW5_GxE_T4
            variables My Variables -> /Validation/shared/My Variables
            events My Variables Events -> /Validation/shared/My Variables Events
          folder Manager folder
            manager Sow SkipRow on a fixed date
              # Sowing criteria
              date = 10/10/1996  # Enter sowing date (d/m/yyyy)
              # Sowing parameters
              crop = Sorghum  # Enter name of crop to sow
              density = 10  # Enter sowing density (plants/m2)
              depth = 30  # Enter sowing depth (mm)
              cultivar = QL41xQL36  # Enter cultivar
              row_spacing = 0.5  # Enter row spacing (m)
              RowConfiguration = solid  # Enter skip row configuration
              ftn = 0  # Enter Fertile Tiller No.
              on start_of_day:
              script: same as in Hermitage.HE1.Sorghum_HE1_T1.paddock.Manager folder.Sow SkipRow on a fixed date
            manager Harvesting rule
              # Harvesting criteria
              crop = Sorghum  # Enter name of crop to harvest when ripe
              on end_of_day:
              script: same as in Hermitage.HE1.Sorghum_HE1_T1.paddock.Manager folder.Harvesting rule
          irrigation: same as Hermitage.HE1.Sorghum_HE1_T1.paddock.Irrigation
          fertiliser
          operations: same as Icrisat.BW5.Sorghum_BW5_GxE_T1.paddock.operations
          Soil IC_BW5: same as Icrisat.BW5.Sorghum_BW5_GxE_T1.paddock.IC_BW5
          sorghum: same as Hermitage.HE1.Sorghum_HE1_T1.paddock.sorghum
      simulation Sorghum_BW5_GxE_T5
        clock
          start_date = 26/09/1996  # Select the start date of the simulation
          end_date = 20/02/1997  # Select the end date of the simulation
        summaryfile
        metfile met: filename=BW5_GxE.met
        area paddock
          outputfile: filename=Sorghum_BW5_GxE_T5.out; title=Sorghum_BW5_GxE_T5
            variables My Variables -> /Validation/shared/My Variables
            events My Variables Events -> /Validation/shared/My Variables Events
          folder Manager folder: same as Icrisat.BW5.Sorghum_BW5_GxE_T1.paddock.Manager folder
          irrigation: same as Hermitage.HE1.Sorghum_HE1_T1.paddock.Irrigation
          fertiliser
          operations
            27/09/1996  fertiliser apply amount = 10 (kg/ha), depth = 50 (mm), type = NO3_N ()
            9/10/1996  fertiliser apply amount = 13 (kg/ha), depth = 50 (mm), type = NO3_N ()
            16/10/1996  fertiliser apply amount = 99 (kg/ha), depth = 50 (mm), type = NO3_N ()
          Soil IC_BW5: same as Icrisat.BW5.Sorghum_BW5_GxE_T1.paddock.IC_BW5
          sorghum: same as Hermitage.HE1.Sorghum_HE1_T1.paddock.sorghum
      simulation Sorghum_BW5_GxE_T6
        clock
          start_date = 26/09/1996  # Select the start date of the simulation
          end_date = 20/02/1997  # Select the end date of the simulation
        summaryfile
        metfile met: filename=BW5_GxE.met
        area paddock
          outputfile: filename=Sorghum_BW5_GxE_T6.out; title=Sorghum_BW5_GxE_T6
            variables My Variables -> /Validation/shared/My Variables
            events My Variables Events -> /Validation/shared/My Variables Events
          folder Manager folder: same as Icrisat.BW5.Sorghum_BW5_GxE_T2.paddock.Manager folder
          irrigation: same as Hermitage.HE1.Sorghum_HE1_T1.paddock.Irrigation
          fertiliser
          operations
            27/09/1996  fertiliser apply amount = 10 (kg/ha), depth = 50 (mm), type = NO3_N ()
            9/10/1996  fertiliser apply amount = 13 (kg/ha), depth = 50 (mm), type = NO3_N ()
            16/10/1996  fertiliser apply amount = 99  (kg/ha), depth = 50 (mm), type = NO3_N ()
          Soil IC_BW5: same as Icrisat.BW5.Sorghum_BW5_GxE_T1.paddock.IC_BW5
          sorghum: same as Hermitage.HE1.Sorghum_HE1_T1.paddock.sorghum
      simulation Sorghum_BW5_GxE_T7
        clock
          start_date = 26/09/1996  # Select the start date of the simulation
          end_date = 20/02/1997  # Select the end date of the simulation
        summaryfile
        metfile met: filename=BW5_GxE.met
        area paddock
          outputfile: filename=Sorghum_BW5_GxE_T7.out; title=Sorghum_BW5_GxE_T7
            variables My Variables -> /Validation/shared/My Variables
            events My Variables Events -> /Validation/shared/My Variables Events
          folder Manager folder: same as Icrisat.BW5.Sorghum_BW5_GxE_T3.paddock.Manager folder
          irrigation: same as Hermitage.HE1.Sorghum_HE1_T1.paddock.Irrigation
          fertiliser
          operations: same as Icrisat.BW5.Sorghum_BW5_GxE_T5.paddock.operations
          Soil IC_BW5: same as Icrisat.BW5.Sorghum_BW5_GxE_T1.paddock.IC_BW5
          sorghum: same as Hermitage.HE1.Sorghum_HE1_T1.paddock.sorghum
      simulation Sorghum_BW5_GxE_T8
        clock
          start_date = 26/09/1996  # Select the start date of the simulation
          end_date = 20/02/1997  # Select the end date of the simulation
        summaryfile
        metfile met: filename=BW5_GxE.met
        area paddock
          outputfile: filename=Sorghum_BW5_GxE_T8.out; title=Sorghum_BW5_GxE_T8
            variables My Variables -> /Validation/shared/My Variables
            events My Variables Events -> /Validation/shared/My Variables Events
          folder Manager folder: same as Icrisat.BW5.Sorghum_BW5_GxE_T4.paddock.Manager folder
          irrigation: same as Hermitage.HE1.Sorghum_HE1_T1.paddock.Irrigation
          fertiliser
          operations: same as Icrisat.BW5.Sorghum_BW5_GxE_T5.paddock.operations
          Soil IC_BW5: same as Icrisat.BW5.Sorghum_BW5_GxE_T1.paddock.IC_BW5
          sorghum: same as Hermitage.HE1.Sorghum_HE1_T1.paddock.sorghum
      simulation Sorghum_BW5_GxE_T9
        clock
          start_date = 26/09/1996  # Select the start date of the simulation
          end_date = 20/02/1997  # Select the end date of the simulation
        summaryfile
        metfile met: filename=BW5_GxE.met
        area paddock
          outputfile: filename=Sorghum_BW5_GxE_T9.out; title=Sorghum_BW5_GxE_T9
            variables My Variables -> /Validation/shared/My Variables
            events My Variables Events -> /Validation/shared/My Variables Events
          folder Manager folder: same as Icrisat.BW5.Sorghum_BW5_GxE_T1.paddock.Manager folder
          irrigation: same as Hermitage.HE1.Sorghum_HE1_T1.paddock.Irrigation
          fertiliser
          operations
            27/09/1996  fertiliser apply amount = 10 (kg/ha), depth = 50 (mm), type = NO3_N ()
          Soil IC_BW5: same as Icrisat.BW5.Sorghum_BW5_GxE_T1.paddock.IC_BW5
          sorghum: same as Hermitage.HE1.Sorghum_HE1_T1.paddock.sorghum
      simulation Sorghum_BW5_GxE_T10
        clock
          start_date = 26/09/1996  # Select the start date of the simulation
          end_date = 20/02/1997  # Select the end date of the simulation
        summaryfile
        metfile met: filename=BW5_GxE.met
        area paddock
          outputfile: filename=Sorghum_BW5_GxE_T10.out; title=Sorghum_BW5_GxE_T10
            variables My Variables -> /Validation/shared/My Variables
            events My Variables Events -> /Validation/shared/My Variables Events
          folder Manager folder
            manager Sow SkipRow on a fixed date
              # Sowing criteria
              date = 10/10/1996  # Enter sowing date (d/m/yyyy)
              # Sowing parameters
              crop = sorghum  # Enter name of crop to sow
              density = 10  # Enter sowing density (plants/m2)
              depth = 30  # Enter sowing depth (mm)
              cultivar = CSH13R  # Enter cultivar
              row_spacing = 0.5  # Enter row spacing (m)
              RowConfiguration = solid  # Enter skip row configuration
              ftn = 0  # Enter Fertile Tiller No.
              on start_of_day:
              script: same as in Hermitage.HE1.Sorghum_HE1_T1.paddock.Manager folder.Sow SkipRow on a fixed date
            manager Harvesting rule
              # Harvesting criteria
              crop = Sorghum  # Enter name of crop to harvest when ripe
              on end_of_day:
              script: same as in Hermitage.HE1.Sorghum_HE1_T1.paddock.Manager folder.Harvesting rule
          irrigation: same as Hermitage.HE1.Sorghum_HE1_T1.paddock.Irrigation
          fertiliser
          operations
            27/09/1996  fertiliser apply amount = 10 (kg/ha), depth = 50 (mm), type = NO3_N ()
          Soil IC_BW5: same as Icrisat.BW5.Sorghum_BW5_GxE_T1.paddock.IC_BW5
          sorghum: same as Hermitage.HE1.Sorghum_HE1_T1.paddock.sorghum
      simulation Sorghum_BW5_GxE_T11
        clock
          start_date = 26/09/1996  # Select the start date of the simulation
          end_date = 20/02/1997  # Select the end date of the simulation
        summaryfile
        metfile met: filename=BW5_GxE.met
        area paddock
          outputfile: filename=Sorghum_BW5_GxE_T11.out; title=Sorghum_BW5_GxE_T11
            variables My Variables -> /Validation/shared/My Variables
            events My Variables Events -> /Validation/shared/My Variables Events
          folder Manager folder: same as Icrisat.BW5.Sorghum_BW5_GxE_T3.paddock.Manager folder
          irrigation: same as Hermitage.HE1.Sorghum_HE1_T1.paddock.Irrigation
          fertiliser
          operations
            27/09/1996  fertiliser apply amount = 10 (kg/ha), depth = 50 (mm), type = NO3_N ()
          Soil IC_BW5: same as Icrisat.BW5.Sorghum_BW5_GxE_T1.paddock.IC_BW5
          sorghum: same as Hermitage.HE1.Sorghum_HE1_T1.paddock.sorghum
      simulation Sorghum_BW5_GxE_T12
        clock
          start_date = 26/09/1996  # Select the start date of the simulation
          end_date = 20/02/1997  # Select the end date of the simulation
        summaryfile
        metfile met: filename=BW5_GxE.met
        area paddock
          outputfile: filename=Sorghum_BW5_GxE_T12.out; title=Sorghum_BW5_GxE_T12
            variables My Variables -> /Validation/shared/My Variables
            events My Variables Events -> /Validation/shared/My Variables Events
          folder Manager folder
            manager Sow SkipRow on a fixed date
              # Sowing criteria
              date = 10/10/1996  # Enter sowing date (d/m/yyyy)
              # Sowing parameters
              crop = sorghum  # Enter name of crop to sow
              density = 10  # Enter sowing density (plants/m2)
              depth = 30  # Enter sowing depth (mm)
              cultivar = QL41xQL36  # Enter cultivar
              row_spacing = 0.5  # Enter row spacing (m)
              RowConfiguration = solid  # Enter skip row configuration
              ftn = 0  # Enter Fertile Tiller No.
              on start_of_day:
              script: same as in Hermitage.HE1.Sorghum_HE1_T1.paddock.Manager folder.Sow SkipRow on a fixed date
            manager Harvesting rule
              # Harvesting criteria
              crop = Sorghum  # Enter name of crop to harvest when ripe
              on end_of_day:
              script: same as in Hermitage.HE1.Sorghum_HE1_T1.paddock.Manager folder.Harvesting rule
          irrigation: same as Hermitage.HE1.Sorghum_HE1_T1.paddock.Irrigation
          fertiliser
          operations
            27/09/1996  fertiliser apply amount = 10 (kg/ha), depth = 50 (mm), type = NO3_N ()
          Soil IC_BW5: same as Icrisat.BW5.Sorghum_BW5_GxE_T1.paddock.IC_BW5
          sorghum: same as Hermitage.HE1.Sorghum_HE1_T1.paddock.sorghum
    folder BW8
      simulation Sorghum_BW8_GxE_T1
        clock
          start_date = 26/09/1996  # Select the start date of the simulation
          end_date = 20/02/1997  # Select the end date of the simulation
        summaryfile
        metfile met: filename=BW8_GxE.met
        area paddock
          folder Manager folder
            manager Sow SkipRow on a fixed date
              # Sowing criteria
              date = 7/10/1996  # Enter sowing date (d/m/yyyy)
              # Sowing parameters
              crop = Sorghum  # Enter name of crop to sow
              density = 10  # Enter sowing density (plants/m2)
              depth = 0.5  # Enter sowing depth (mm)
              cultivar = M35-1  # Enter cultivar
              row_spacing = 0.5  # Enter row spacing (m)
              RowConfiguration = solid  # Enter skip row configuration
              ftn = 0  # Enter Fertile Tiller No.
              on start_of_day:
              script: same as in Hermitage.HE1.Sorghum_HE1_T1.paddock.Manager folder.Sow SkipRow on a fixed date
            manager Harvesting rule
              # Harvesting criteria
              crop = Sorghum  # Enter name of crop to harvest when ripe
              on end_of_day:
              script: same as in Hermitage.HE1.Sorghum_HE1_T1.paddock.Manager folder.Harvesting rule
          irrigation: same as Hermitage.HE4.Sorghum_HE4_T1.paddock.Irrigation
          fertiliser
          operations
            19/11/1996  Irrigation apply amount = 28
            28/11/1996  Irrigation apply amount = 58
            10/12/1996  Irrigation apply amount = 49
            24/12/1996  Irrigation apply amount = 57
            7/01/1997  Irrigation apply amount = 67
            25/09/1996  fertiliser apply amount = 20 (kg/ha), depth = 50 (mm), type = NO3_N ()
            17/10/1996  fertiliser apply amount = 99 (kg/ha), depth = 50 (mm), type = NO3_N ()
            6/11/1996  fertiliser apply amount = 59 (kg/ha), depth = 50 (mm), type = NO3_N ()
            10/12/1996  fertiliser apply amount = 59 (kg/ha), depth = 50 (mm), type = NO3_N ()
          outputfile: filename=Sorghum_BW8_GxE_T1.out; title=Sorghum_BW8_GxE_T1
            variables My Variables -> /Validation/shared/My Variables
            events My Variables Events -> /Validation/shared/My Variables
          sorghum: same as Hermitage.HE1.Sorghum_HE1_T1.paddock.sorghum
          Soil IC_BW8: SoilType=BW8; LocalName=ICRISAT; Site=ICRISAT; NearestTown=Unknown; Region=Hyderabad; NaturalVegetation=Unknown; Latitude=0; Longitude=0; YearOfSampling=0
            InitialWater Initial water: FractionFull=0.50; PercentMethod=FilledFromTop
            Water
              Thickness  BD     AirDry  LL15   DUL    SAT
              150        1.490  0.120   0.160  0.320  0.43
              150        1.410  0.150   0.190  0.350  0.46
              150        1.410  0.150   0.190  0.350  0.46
              150        1.560  0.100   0.140  0.280  0.41
              150        1.490  0.110   0.150  0.310  0.43
              150        1.520  0.130   0.170  0.330  0.42
              150        1.610  0.090   0.130  0.260  0.39
              150        1.680  0.080   0.120  0.220  0.36
              150        1.630  0.090   0.130  0.240  0.38
              300        1.620  0.090   0.130  0.240  0.38
              300        1.620  0.090   0.130  0.240  0.38
              SoilCrop Sorghum
                LL=[0.160, 0.190, 0.190, 0.140, 0.150, 0.170, 0.130, 0.120, 0.130, 0.130, 0.130]
                KL=[0.070, 0.070, 0.070, 0.070, 0.070, 0.070, 0.070, 0.070, 0.070, 0.040, 0.040]
                XF=[1, 1, 1, 1, 1, 1, 1, 1, 1, 1, 1]
            SoilWater: SummerCona=3.5; SummerU=6; SummerDate=1-Nov; WinterCona=3.5; WinterU=6; WinterDate=1-Apr; DiffusConst=40; DiffusSlope=16; Salb=0.11; CN2Bare=85; CNRed=0.8; CNCov=0.2; Thickness=[150, 150, 150, 150, 150, 150, 150, 150, 150, 300, 300]
              SWCON=[0.160, 0.110, 0.140, 0.140, 0.110, 0.110, 0.100, 0.100, 0.100, 0.120, 0.100]
            SoilOrganicMatter: RootCN=45; RootWt=1000; SoilCN=14.5; EnrACoeff=7.4; EnrBCoeff=0.2
              Thickness  OC     FBiom  FInert
              150        0.490  0.050  0.390
              150        0.450  0.020  0.470
              150        0.280  0.010  0.520
              150        0.180  0.010  0.620
              150        0.140  0.010  0.740
              150        0.110  0.010  0.830
              150        0.090  0.010  0.930
              150        0.070  0.010  0.930
              150        0.060  0.010  0.930
              300        0.050  0.010  0.930
              300        0.030  0.010  0.930
            Analysis: Thickness=[150, 150, 150, 150, 150, 150, 150, 150, 150, 300, 300]
              PH=[8.350, 8.520, 8.800, 8.950, 9, 9, 9, 9, 8.920, 8.970, 8.820]
            Sample Initial nitrogen
              Thickness  NO3  NH4
              150        9    0.1
              150        11   0.1
              150        8    0.1
              150        6    0.1
              150        4    0.1
              150        3    0.1
              150        3    0.1
              150        3    0.1
              150        6    0.1
              300        4    0.1
              300        5    0.1
      simulation Sorghum_BW8_GxE_T2
        clock
          start_date = 26/09/1996  # Select the start date of the simulation
          end_date = 20/02/1997  # Select the end date of the simulation
        summaryfile
        metfile met: filename=BW8_GxE.met
        area paddock
          folder Manager folder
            manager Sow SkipRow on a fixed date
              # Sowing criteria
              date = 7/10/1996  # Enter sowing date (d/m/yyyy)
              # Sowing parameters
              crop = Sorghum  # Enter name of crop to sow
              density = 10  # Enter sowing density (plants/m2)
              depth = 0.5  # Enter sowing depth (mm)
              cultivar = CSH13R  # Enter cultivar
              row_spacing = 0.5  # Enter row spacing (m)
              RowConfiguration = solid  # Enter skip row configuration
              ftn = 0  # Enter Fertile Tiller No.
              on start_of_day:
              script: same as in Hermitage.HE1.Sorghum_HE1_T1.paddock.Manager folder.Sow SkipRow on a fixed date
            manager Harvesting rule
              # Harvesting criteria
              crop = Sorghum  # Enter name of crop to harvest when ripe
              on end_of_day:
              script: same as in Hermitage.HE1.Sorghum_HE1_T1.paddock.Manager folder.Harvesting rule
          irrigation: same as Hermitage.HE1.Sorghum_HE1_T1.paddock.Irrigation
          fertiliser
          operations: same as Icrisat.BW8.Sorghum_BW8_GxE_T1.paddock.operations
          outputfile: filename=Sorghum_BW8_GxE_T2.out; title=Sorghum_BW8_GxE_T2
            variables My Variables -> /Validation/shared/My Variables
            events My Variables Events -> /Validation/shared/My Variables
          sorghum: same as Hermitage.HE1.Sorghum_HE1_T1.paddock.sorghum
          Soil IC_BW8: same as Icrisat.BW8.Sorghum_BW8_GxE_T1.paddock.IC_BW8
      simulation Sorghum_BW8_GxE_T3
        clock
          start_date = 26/09/1996  # Select the start date of the simulation
          end_date = 20/02/1997  # Select the end date of the simulation
        summaryfile
        metfile met: filename=BW8_GxE.met
        area paddock
          folder Manager folder
            manager Sow SkipRow on a fixed date
              # Sowing criteria
              date = 7/10/1996  # Enter sowing date (d/m/yyyy)
              # Sowing parameters
              crop = Sorghum  # Enter name of crop to sow
              density = 10  # Enter sowing density (plants/m2)
              depth = 0.5  # Enter sowing depth (mm)
              cultivar = ATX623xRTX430  # Enter cultivar
              row_spacing = 0.5  # Enter row spacing (m)
              RowConfiguration = solid  # Enter skip row configuration
              ftn = 0  # Enter Fertile Tiller No.
              on start_of_day:
              script: same as in Hermitage.HE1.Sorghum_HE1_T1.paddock.Manager folder.Sow SkipRow on a fixed date
            manager Harvesting rule
              # Harvesting criteria
              crop = Sorghum  # Enter name of crop to harvest when ripe
              on end_of_day:
              script: same as in Hermitage.HE1.Sorghum_HE1_T1.paddock.Manager folder.Harvesting rule
          irrigation: same as Hermitage.HE1.Sorghum_HE1_T1.paddock.Irrigation
          fertiliser
          operations: same as Icrisat.BW8.Sorghum_BW8_GxE_T1.paddock.operations
          outputfile: filename=Sorghum_BW8_GxE_T3.out; title=Sorghum_BW8_GxE_T3
            variables My Variables -> /Validation/shared/My Variables
            events My Variables Events -> /Validation/shared/My Variables
          sorghum: same as Hermitage.HE1.Sorghum_HE1_T1.paddock.sorghum
          Soil IC_BW8: same as Icrisat.BW8.Sorghum_BW8_GxE_T1.paddock.IC_BW8
      simulation Sorghum_BW8_GxE_T4
        clock
          start_date = 26/09/1996  # Select the start date of the simulation
          end_date = 20/02/1997  # Select the end date of the simulation
        summaryfile
        metfile met: filename=BW8_GxE.met
        area paddock
          folder Manager folder
            manager Sow SkipRow on a fixed date
              # Sowing criteria
              date = 7/10/1996  # Enter sowing date (d/m/yyyy)
              # Sowing parameters
              crop = Sorghum  # Enter name of crop to sow
              density = 10  # Enter sowing density (plants/m2)
              depth = 0.5  # Enter sowing depth (mm)
              cultivar = QL41xQL36  # Enter cultivar
              row_spacing = 0.5  # Enter row spacing (m)
              RowConfiguration = solid  # Enter skip row configuration
              ftn = 0  # Enter Fertile Tiller No.
              on start_of_day:
              script: same as in Hermitage.HE1.Sorghum_HE1_T1.paddock.Manager folder.Sow SkipRow on a fixed date
            manager Harvesting rule
              # Harvesting criteria
              crop = Sorghum  # Enter name of crop to harvest when ripe
              on end_of_day:
              script: same as in Hermitage.HE1.Sorghum_HE1_T1.paddock.Manager folder.Harvesting rule
          irrigation: same as Hermitage.HE1.Sorghum_HE1_T1.paddock.Irrigation
          fertiliser
          operations: same as Icrisat.BW8.Sorghum_BW8_GxE_T1.paddock.operations
          outputfile: filename=Sorghum_BW8_GxE_T4.out; title=Sorghum_BW8_GxE_T4
            variables My Variables -> /Validation/shared/My Variables
            events My Variables Events -> /Validation/shared/My Variables
          sorghum: same as Hermitage.HE1.Sorghum_HE1_T1.paddock.sorghum
          Soil IC_BW8: same as Icrisat.BW8.Sorghum_BW8_GxE_T1.paddock.IC_BW8
      simulation Sorghum_BW8_GxE_T5
        clock
          start_date = 26/09/1996  # Select the start date of the simulation
          end_date = 20/02/1997  # Select the end date of the simulation
        summaryfile
        metfile met: filename=BW8_GxE.met
        area paddock
          folder Manager folder: same as Icrisat.BW8.Sorghum_BW8_GxE_T1.paddock.Manager folder
          irrigation: same as Hermitage.HE4.Sorghum_HE4_T1.paddock.Irrigation
          fertiliser
          operations
            25/09/1996  fertiliser apply amount = 20 (kg/ha), depth = 50 (mm), type = NO3_N ()
            17/10/1996  fertiliser apply amount = 99 (kg/ha), depth = 50 (mm), type = NO3_N ()
          outputfile: filename=Sorghum_BW8_GxE_T5.out; title=Sorghum_BW8_GxE_T5
            variables My Variables -> /Validation/shared/My Variables
            events My Variables Events -> /Validation/shared/My Variables
          sorghum: same as Hermitage.HE1.Sorghum_HE1_T1.paddock.sorghum
          Soil IC_BW8: same as Icrisat.BW8.Sorghum_BW8_GxE_T1.paddock.IC_BW8
      simulation Sorghum_BW8_GxE_T6
        clock
          start_date = 26/09/1996  # Select the start date of the simulation
          end_date = 20/02/1997  # Select the end date of the simulation
        summaryfile
        metfile met: filename=BW8_GxE.met
        area paddock
          folder Manager folder: same as Icrisat.BW8.Sorghum_BW8_GxE_T2.paddock.Manager folder
          manager Calculator
            on init:
```
 head_wt = 0
root_n = 0
head_n = 0
leaf_n = 0
sd = 0
```
            on end_of_day:
```
 [cr]head_wt = dw_green(4)[cr]root_n = n_green(1)[cr]head_n = n_green(4)[cr]leaf_n = n_green(2)[cr][cr]if (sw_demand > 0) then[cr]   sd = sw_supply / sw_demand[cr]else[cr]   sd = 1[cr]endif[cr][cr]if (sd > 1) then[cr]   sd = 1[cr]endif[cr]
```
          irrigation: same as Hermitage.HE1.Sorghum_HE1_T1.paddock.Irrigation
          fertiliser
          operations
            25/09/1996  fertiliser apply amount = 20 (kg/ha), depth = 50 (mm), type = NO3_N ()
            17/10/1996  fertiliser apply amount = 99 (kg/ha), depth = 50 (mm), type = NO3_N ()
          outputfile: filename=Sorghum_BW8_GxE_T6.out; title=Sorghum_BW8_GxE_T6
            variables My Variables -> /Validation/shared/My Variables
            events My Variables Events -> /Validation/shared/My Variables
          sorghum: same as Hermitage.HE1.Sorghum_HE1_T1.paddock.sorghum
          Soil IC_BW8: same as Icrisat.BW8.Sorghum_BW8_GxE_T1.paddock.IC_BW8
      simulation Sorghum_BW8_GxE_T7
        clock
          start_date = 26/09/1996  # Select the start date of the simulation
          end_date = 20/02/1997  # Select the end date of the simulation
        summaryfile
        metfile met: filename=BW8_GxE.met
        area paddock
          folder Manager folder: same as Icrisat.BW8.Sorghum_BW8_GxE_T3.paddock.Manager folder
          irrigation: same as Hermitage.HE1.Sorghum_HE1_T1.paddock.Irrigation
          fertiliser
          operations
            25/09/1996  fertiliser apply amount = 20 (kg/ha), depth = 50 (mm), type = NO3_N ()
            17/10/1996  fertiliser apply amount = 99 (kg/ha), depth = 50 (mm), type = NO3_N ()
          outputfile: filename=Sorghum_BW8_GxE_T7.out; title=Sorghum_BW8_GxE_T7
            variables My Variables -> /Validation/shared/My Variables
            events My Variables Events -> /Validation/shared/My Variables
          sorghum: same as Hermitage.HE1.Sorghum_HE1_T1.paddock.sorghum
          Soil IC_BW8: same as Icrisat.BW8.Sorghum_BW8_GxE_T1.paddock.IC_BW8
      simulation Sorghum_BW8_GxE_T8
        clock
          start_date = 26/09/1996  # Select the start date of the simulation
          end_date = 20/02/1997  # Select the end date of the simulation
        summaryfile
        metfile met: filename=BW8_GxE.met
        area paddock
          folder Manager folder: same as Icrisat.BW8.Sorghum_BW8_GxE_T4.paddock.Manager folder
          irrigation: same as Hermitage.HE1.Sorghum_HE1_T1.paddock.Irrigation
          fertiliser
          operations
            25/09/1996  fertiliser apply amount = 20 (kg/ha), depth = 50 (mm), type = NO3_N ()
            17/10/1996  fertiliser apply amount = 99 (kg/ha), depth = 50 (mm), type = NO3_N ()
          outputfile: filename=Sorghum_BW8_GxE_T8.out; title=Sorghum_BW8_GxE_T8
            variables My Variables -> /Validation/shared/My Variables
            events My Variables Events -> /Validation/shared/My Variables
          sorghum: same as Hermitage.HE1.Sorghum_HE1_T1.paddock.sorghum
          Soil IC_BW8: same as Icrisat.BW8.Sorghum_BW8_GxE_T1.paddock.IC_BW8
      simulation Sorghum_BW8_GxE_T9
        clock
          start_date = 26/09/1996  # Select the start date of the simulation
          end_date = 20/02/1997  # Select the end date of the simulation
        summaryfile
        metfile met: filename=BW8_GxE.met
        area paddock
          folder Manager folder: same as Icrisat.BW8.Sorghum_BW8_GxE_T1.paddock.Manager folder
          irrigation: same as Hermitage.HE1.Sorghum_HE1_T1.paddock.Irrigation
          fertiliser
          operations
            25/09/1996  fertiliser apply amount = 20 (kg/ha), depth = 50 (mm), type = NO3_N ()
          outputfile: filename=Sorghum_BW8_GxE_T9.out; title=Sorghum_BW8_GxE_T9
            variables My Variables -> /Validation/shared/My Variables
            events My Variables Events -> /Validation/shared/My Variables
          sorghum: same as Hermitage.HE1.Sorghum_HE1_T1.paddock.sorghum
          Soil IC_BW8: same as Icrisat.BW8.Sorghum_BW8_GxE_T1.paddock.IC_BW8
      simulation Sorghum_BW8_GxE_T10
        clock
          start_date = 26/09/1996  # Select the start date of the simulation
          end_date = 20/02/1997  # Select the end date of the simulation
        summaryfile
        metfile met: filename=BW8_GxE.met
        area paddock
          folder Manager folder: same as Icrisat.BW8.Sorghum_BW8_GxE_T2.paddock.Manager folder
          irrigation: same as Hermitage.HE1.Sorghum_HE1_T1.paddock.Irrigation
          fertiliser
          operations
            25/09/1996  fertiliser apply amount = 20 (kg/ha), depth = 50 (mm), type = NO3_N ()
          outputfile: filename=Sorghum_BW8_GxE_T10.out; title=Sorghum_BW8_GxE_T10
            variables My Variables -> /Validation/shared/My Variables
            events My Variables Events -> /Validation/shared/My Variables
          sorghum: same as Hermitage.HE1.Sorghum_HE1_T1.paddock.sorghum
          Soil IC_BW8: same as Icrisat.BW8.Sorghum_BW8_GxE_T1.paddock.IC_BW8
      simulation Sorghum_BW8_GxE_T11
        clock
          start_date = 26/09/1996  # Select the start date of the simulation
          end_date = 20/02/1997  # Select the end date of the simulation
        summaryfile
        metfile met: filename=BW8_GxE.met
        area paddock
          folder Manager folder: same as Icrisat.BW8.Sorghum_BW8_GxE_T3.paddock.Manager folder
          irrigation: same as Hermitage.HE1.Sorghum_HE1_T1.paddock.Irrigation
          fertiliser
          operations
            25/09/1996  fertiliser apply amount = 20 (kg/ha), depth = 50 (mm), type = NO3_N ()
          outputfile: filename=Sorghum_BW8_GxE_T11.out; title=Sorghum_BW8_GxE_T11
            variables My Variables -> /Validation/shared/My Variables
            events My Variables Events -> /Validation/shared/My Variables
          sorghum: same as Hermitage.HE1.Sorghum_HE1_T1.paddock.sorghum
          Soil IC_BW8: same as Icrisat.BW8.Sorghum_BW8_GxE_T1.paddock.IC_BW8
      simulation Sorghum_BW8_GxE_T12
        clock
          start_date = 26/09/1996  # Select the start date of the simulation
          end_date = 20/02/1997  # Select the end date of the simulation
        summaryfile
        metfile met: filename=BW8_GxE.met
        area paddock
          folder Manager folder: same as Icrisat.BW8.Sorghum_BW8_GxE_T4.paddock.Manager folder
          irrigation: same as Hermitage.HE1.Sorghum_HE1_T1.paddock.Irrigation
          fertiliser
          operations
            25/09/1996  fertiliser apply amount = 20 (kg/ha), depth = 50 (mm), type = NO3_N ()
          outputfile: filename=Sorghum_BW8_GxE_T12.out; title=Sorghum_BW8_GxE_T12
            variables My Variables -> /Validation/shared/My Variables
            events My Variables Events -> /Validation/shared/My Variables
          sorghum: same as Hermitage.HE1.Sorghum_HE1_T1.paddock.sorghum
          Soil IC_BW8: same as Icrisat.BW8.Sorghum_BW8_GxE_T1.paddock.IC_BW8
  folder Lawes
    folder LE13
      simulation Sorghum_LE13_Buster-I-N
        clock
          start_date = 28/11/1995  # Select the start date of the simulation
          end_date = 1/05/1996  # Select the end date of the simulation
        summaryfile
        metfile met: filename=LE13.met
        area paddock
          outputfile: filename=Sorghum_LE13_Buster-I-N.out; title=Sorghum_LE13_Buster-I-N
            variables My Variables -> /Validation/shared/My Variables
            events My Variables Events -> /Validation/shared/My Variables
          folder Manager folder
            manager Sow SkipRow on a fixed date
              # Sowing criteria
              date = 29/11/1995  # Enter sowing date (d/m/yyyy)
              # Sowing parameters
              crop = Sorghum  # Enter name of crop to sow
              density = 16  # Enter sowing density (plants/m2)
              depth = 20  # Enter sowing depth (mm)
              cultivar = Buster  # Enter cultivar
              row_spacing = 0.5  # Enter row spacing (m)
              RowConfiguration = solid  # Enter skip row configuration
              ftn = 0  # Enter Fertile Tiller No.
              on start_of_day:
              script: same as in Hermitage.HE1.Sorghum_HE1_T1.paddock.Manager folder.Sow SkipRow on a fixed date
            manager Harvesting rule
              # Harvesting criteria
              crop = Sorghum  # Enter name of crop to harvest when ripe
              on end_of_day:
              script: same as in Hermitage.HE1.Sorghum_HE1_T1.paddock.Manager folder.Harvesting rule
          Soil GLH Field: LocalName=Cooper Lab; Site=Cooper Lab; Region=Gatton
            SoilType = GLHSoil  # Soil description
            NearestTown = Unknown
            NaturalVegetation = Unknown
            Water
              Thickness  BD    AirDry  LL15  DUL   SAT
              200        1.32  0.1     0.3   0.41  0.46
              200        1.3   0.15    0.3   0.43  0.48
              200        1.23  0.28    0.35  0.46  0.51
              300        1.27  0.28    0.32  0.44  0.49
              300        1.37  0.28    0.29  0.4   0.45
              300        1.35  0.3     0.31  0.41  0.46
              300        1.35  0.3     0.31  0.38  0.43
              SoilCrop Sorghum: LL=[0.3, 0.3, 0.35, 0.32, 0.29, 0.31, 0.31]; KL=[0.08, 0.08, 0.08, 0.08, 0.06, 0.04, 0.02]; XF=[1, 1, 1, 1, 1, 1, 1]
            SoilWater: SummerCona=3.5; SummerU=6; SummerDate=1-Nov; WinterCona=3.5; WinterU=6; WinterDate=1-Apr; DiffusConst=88; DiffusSlope=35.4; Salb=0.13; CN2Bare=91; CNRed=20; CNCov=0.8; Thickness=[200, 200, 200, 300, 300, 300, 300]; SWCON=[0.500, 0.500, 0.500, 0.500, 0.500, 0.500, 0.500]
            SoilOrganicMatter: RootCN=30; RootWt=1500; SoilCN=12.5; EnrACoeff=7.4; EnrBCoeff=0.2
              Thickness  OC     FBiom  FInert
              200        1.300  0.030  0.310
              200        0.650  0.010  0.380
              200        0.320  0      0.470
              300        0.110  0      0.700
              300        0.110  0      0.900
              300        0.110  0      0.950
              300        0.110  0      0.950
            Analysis: Thickness=[200, 200, 200, 300, 300, 300, 300]; PH=[8.200, 8.700, 8.900, 8.100, 8, 8, 8]
            Sample Initial nitrogen
              Thickness  NO3    NH4
              200        9      0.100
              200        2.480  0.100
              200        2.790  0.100
              300        1.280  0.100
              300        2.980  0.100
              300        2.965  0.100
              300        1.387  0.100
            Sample Initial water: Thickness=[200, 200, 200, 300, 300, 300, 300]; SW=[0.385, 0.470, 0.467, 0.459, 0.394, 0.399, 0.380]
          irrigation: same as Hermitage.HE1.Sorghum_HE1_T1.paddock.Irrigation
          fertiliser
          operations
            29/11/1995  Irrigation apply amount = 14
            1/12/1995  Irrigation apply amount = 10
            3/12/1995  Irrigation apply amount = 13
            5/12/1995  Irrigation apply amount = 8
            7/02/1996  Irrigation apply amount = 6
            28/11/1995  fertiliser apply amount = 0 (kg/ha), depth = 50 (mm), type = NO3_N ()
            28/11/1995  fertiliser apply amount = 0 (kg/ha), depth = 50 (mm), type = NO3_N ()
          sorghum
            sorghumConstants standard
              crop_type = sorghum
              default_crop_class = plant
              stage_names = sowing germination emergence end_of_juvenile floral_initiation flag_leaf flowering start_grain_fill end_grain_fill maturity harvest_ripe end_crop
              pesw_germ = 0.0  # plant extractable soil water in seedling layer inadequate for germination (mm/mm)
              shoot_lag = 15.0  # time lag before linear coleoptile growth starts (deg days)
              shoot_rate = 0.6  # growing deg day increase with depth for coleoptile (deg day/mm depth)
              twilight = -2.2  # Twilight is defined as the interval between sunrise or sunset and the time when the true
              x_temp = 11 30  42  # cardinal temps.
              y_tt = 0  19   0  # diff
              x_temp_fm = 5.7 23.5
              y_tt_fm = 0   17.8
              leaf_no_at_emerg = 1.0  # (expanded) leaf number at emergence ()
              leaf_no_seed = 4.0  # number of leaf primordia present in seed
              leaf_no_min = 10.0  # minimum leaf number
              leaf_no_max = 40.0  # maximum leaf number
              leaf_init_rate = 21.6  # degree days to initiate each leaf primordium until floral init (deg day)
              leaf_app_rate1 = 41.0  # Growing deg day required to develop the most leaf ligules. (deg day).
              leaf_app_rate2 = 20.0  # Growing deg day required to develop last leaf ligules. (deg day).
              leaf_no_rate_change = 3.5  # Leaf no below flag above which leaf appearance rate changes from rate1 to rate2.
              rue = 1.25  # g bio/MJ Radn radiation use efficiency
              row_spacing_default = 750  # Default rowing spacing used to calculate k
              x_row_spacing = 0.20   0.50   1.00  # Row spacing
              y_extinct_coef = 0.70   0.40   0.40  # extinction coefficient for green leaf
              x_ave_temp = 8 20 35 50  # mean daily temperature
              y_stress_photo = 0  1  1  0  # multiplier on RUE
              dm_leaf_init = 0.1  # leaf weight at emergence (g/plant)
              dm_root_init = 0.1  # root weight at emergence (g/plant)
              dm_stem_init = 0.1  # stem weight at emergence (g/plant)
              stem_trans_frac = 0.20  # fraction of stem used in translocation to grain
              leaf_trans_frac = 0.15  # fraction of leaf used in translocation to grain
              retransRate = 0.15
              ratio_root_shoot = 0   0   1    1     0.33  0.33  0.087  0    0     0    0    0
              partition_rate_leaf = 0.006  # coefficient of sigmoidal function between leaf partition fraction and internode no**2 (0-1)
              frac_stem2flower = 0.30  # fraction of dm allocated to stem that goes to developing head
              grn_water_cont = 0.130  # water content of grain g/g
              GrainTempWindow = -50 100
              GrainHiTemperature = 32 33 36 38  # Grain High Temperature
              GrainStressSeverity = 0 0.14 0.23 0.65  # Severity of seed set stress
              leaf_no_correction = 1.52  # corrects for other growing leaves
              sla_max = 45000
              sla_min = 8000  # minimum specific leaf area for new leaf area
              initial_tpla = 200.0  # initial total plant leaf area
              tillerSlaBound = 30  # SLA Range (%)
              aX0 = 0.786  # Largest leaf multiplier
              aMaxS = 46.312  # Largest Leaf Area Slope
              aMaxI = -321.13  # Intercept for Largest leaf calculation
              aMaxVert = 0.3  # Vertical Offset for Largest Leaf Calc
              aTillerVert = 0,05  # Additional Vertical Offset for each additional Tiller
              tilleringPropensity = -0.82  # Propensity to Tiller
              tillerSdSlope = 0.2065  # Tiller Supply/demand slope
              root_depth_rate = 0 27.0  27.0  27.0 27.0  27.0   27.0   0      0       0    0    0  # mm/day.
              x_sw_ratio = 0   0.25  # water availability for effects on root depth growth
              y_sw_fac_root = 0   1  # stress factor for root depth growth, This may be probably the same for all crops
              specific_root_length = 100000
              x_plant_rld = 0.0  0.1  # root branching
              y_rel_root_rate = 1.0  1.0
              transp_eff_cf = 0.009
              svp_fract = 0.75  # (0-1)
              x_sw_demand_ratio = 0.1 1.1  # water availability This is the original value
              y_swdef_leaf = 0   1  # stress indices
              x_sw_avail_ratio = 0 0.2 1.0  # water availability Needs to be severe to worry phenology
              y_swdef_pheno = 0 1.0 1.0  # stress indices
              no3_diffn_const = 2.0
              maxUptakeRate = 0.029
              initialRootNConc = 0.020
              targetRootNConc = 0.002
              initialLeafSLN = 1.5
              targetLeafSLN = 1.5
              newLeafSLN = 1.0
              leafDilnNSlope = 0.0043
              leafDilnNInt = -0.0017
              initialStemNConc = 0.01
              x_stem_n = 3         5       7         10
              targetStemNConc = 0.055   0.016   0.01      0.005
              structStemNConc = 0.012  0.012   0.005   0.0015
              stemDilnNSlope = 0.0062
              stemDilnNInt = -0.001
              initialRachisNConc = 0.000
              targetRachisNConc = 0.01
              structRachisNConc = 0.003
              rachisDilnNSlope = 0.0062
              rachisDilnNInt = -0.001
              grainFillRate = 0.001
              targetGrainNConc = 0.0175
              nUptakeCease = 570
              nSupplyFrac = 5
              dm_root_sen_frac = 0.002  # fraction of root dry matter senesced each day
              sen_light_time_const = 10.0  # delay factor for light senescence
              sen_radn_crit = 2  # radiation level for onset of light senescence
              frost_kill = 1.0  # temperature threshold for leaf death
              sen_water_time_const = 10.0  # delay factor for water senescence
              sen_threshold = 0.25  # supply:demand ratio for onset of water senescence
              tt_emerg_limit = 150.0  # maximum degree days allowed for emergence to take place
              pfact_photo_slope = 2.5
              pfact_expansion_slope = 2.5
              pfact_pheno_slope = 100
              pfact_grain_slope = 20
              x_p_stage_code = 3       4      5      6      7      8      10
              y_p_conc_max_leaf = 0.0059  0.0054 0.0040 0.0029 0.0026 0.0025 0.0022
              y_p_conc_min_leaf = 0.003   0.003  0.0029 0.0011 0.0011 0.0008 0.0006
              y_p_conc_sen_leaf = 0.0005  0.0005 0.0005 0.0005 0.0005 0.0005 0.0005
              y_p_conc_max_stem = 0.0057  0.0038 0.0037 0.0018 0.0016 0.0013 0.0013
              y_p_conc_min_stem = 0.003   0.003  0.002  0.0006 0.0006 0.0002 0.0002
              y_p_conc_sen_stem = 0.0002  0.0002 0.0002 0.0002 0.0002 0.0002 0.0002
              y_p_conc_max_root = 0.0010  0.0010 0.0010 0.0010 0.0010 0.0010 0.0010  # assume P conc in roots non-varying
              y_p_conc_min_root = 0.0010  0.0010 0.0010 0.0010 0.0010 0.0010 0.0010
              y_p_conc_sen_root = 0.0010  0.0010 0.0010 0.0010 0.0010 0.0010 0.0010
              y_p_conc_max_flower = 0.0057  0.0038 0.0037 0.0018 0.0016 0.0013 0.0013  # assumed same as stem
              y_p_conc_min_flower = 0.003   0.003  0.002  0.0006 0.0006 0.0002 0.0002
              y_p_conc_sen_flower = 0.0002  0.0002 0.0002 0.0002 0.0002 0.0002 0.0002
              y_p_conc_max_grain = 0.001   0.001  0.001  0.001  0.052  0.0044  0.0034
              y_p_conc_min_grain = 0.001   0.001  0.001  0.001  0.001  0.0015  0.0015  # based on Kenya maize data
              y_p_conc_sen_grain = 0.001   0.001  0.001  0.001  0.001  0.0015  0.0015
              p_conc_init_leaf = 0.0059
              p_conc_init_stem = 0.0057
              p_conc_init_root = 0.010
              p_conc_init_flower = 0.0057
              p_conc_init_grain = 0.0052
              senescedLeafSLN = 0.3
            sorghumGenotype Buster
              tt_emerg_to_endjuv = 100
              photoperiod_crit1 = 11.5
              photoperiod_crit2 = 13.5
              photoperiod_slope = 11.5
              tt_endjuv_to_init = 160
              tt_flag_to_flower = 170
              tt_flower_to_start_grain = 80
              tt_flower_to_maturity = 761
              tt_maturity_to_ripe = 1
              dm_per_seed = 0.00083
              maxGFRate = 0.09
              x_stem_wt = 0    80  # look up table for canopy height
              y_height = 0  2000  # plant canopy height
              aX0 = 0.786  # Largest leaf multiplier
              aMaxS = 46.312  # Largest Leaf Area Slope
              aMaxI = -321.13  # Intercept for Largest leaf calculation
            sorghumGenotype QL41xQL36
              tt_emerg_to_endjuv = 100
              photoperiod_crit1 = 11.5
              photoperiod_crit2 = 13.5
              photoperiod_slope = 12.5
              tt_endjuv_to_init = 179
              tt_flag_to_flower = 170
              tt_flower_to_start_grain = 80
              tt_flower_to_maturity = 761
              tt_maturity_to_ripe = 1
              dm_per_seed = 0.00083
              maxGFRate = 0.09
              x_stem_wt = 0    80
              y_height = 0  2000
              x_stem_wt = 0    80  # look up table for canopy height
              y_height = 0  2000  # plant canopy height
              aX0 = 0.687  # Largest leaf multiplier
              aMaxS = 0  # Largest Leaf Area Slope
              aMaxI = 450  # Intercept for Largest leaf calculation
            sorghumGenotype M35-1: same as Hermitage.HE1.Sorghum_HE1_T1.paddock.sorghum.M35-1
            sorghumGenotype CSH13R: same as Hermitage.HE1.Sorghum_HE1_T1.paddock.sorghum.CSH13R
            sorghumGenotype ATX623xRTX430
              tt_emerg_to_endjuv = 100
              photoperiod_crit1 = 11.5
              photoperiod_crit2 = 13.5
              photoperiod_slope = 13
              tt_endjuv_to_init = 202
              tt_flag_to_flower = 170
              tt_flower_to_start_grain = 80
              tt_flower_to_maturity = 761
              tt_maturity_to_ripe = 1
              dm_per_seed = 0.00083
              maxGFRate = 0.09
              x_stem_wt = 0    80  # look up table for canopy height
              y_height = 0  2000  # plant canopy height
              y_height = 0  2000
            sorghumGenotype A35xQL36: same as Hermitage.HE1.Sorghum_HE1_T1.paddock.sorghum.A35xQL36
            sorghumGenotype QL39xQL36: same as Hermitage.HE1.Sorghum_HE1_T1.paddock.sorghum.QL39xQL36
      simulation Sorghum_LE13_Buster-I+N
        clock
          start_date = 28/11/1995  # Select the start date of the simulation
          end_date = 1/05/1996  # Select the end date of the simulation
        summaryfile
        metfile met: filename=LE13.met
        area paddock
          outputfile: filename=Sorghum_LE13_Buster-I+N.out; title=Sorghum_LE13_Buster-I+N
            variables My Variables -> /Validation/shared/My Variables
            events My Variables Events -> /Validation/shared/My Variables
          folder Manager folder
            manager Sow SkipRow on a fixed date
              # Sowing criteria
              date = 29/11/1995  # Enter sowing date (d/m/yyyy)
              # Sowing parameters
              crop = Sorghum  # Enter name of crop to sow
              density = 16  # Enter sowing density (plants/m2)
              depth = 20  # Enter sowing depth (mm)
              cultivar = Buster  # Enter cultivar
              row_spacing = 0.5  # Enter row spacing (m)
              RowConfiguration = solid  # Enter skip row configuration
              ftn = 0.35  # Enter Fertile Tiller No.
              on start_of_day:
              script: same as in Hermitage.HE1.Sorghum_HE1_T1.paddock.Manager folder.Sow SkipRow on a fixed date
            manager Harvesting rule
              # Harvesting criteria
              crop = Sorghum  # Enter name of crop to harvest when ripe
              on end_of_day:
              script: same as in Hermitage.HE1.Sorghum_HE1_T1.paddock.Manager folder.Harvesting rule
          Soil GLH Field: LocalName=Cooper Lab; Site=Cooper Lab; Region=Gatton
            SoilType = GLHSoil  # Soil description
            NearestTown = Unknown
            NaturalVegetation = Unknown
            InitialWater Initial water: FractionFull=1.00; PercentMethod=FilledFromTop
            Water
              Thickness  BD     AirDry  LL15   DUL    SAT
              200        1.320  0.100   0.300  0.410  0.460
              200        1.300  0.150   0.300  0.430  0.480
              200        1.230  0.280   0.350  0.460  0.510
              300        1.270  0.280   0.320  0.440  0.490
              300        1.370  0.280   0.290  0.400  0.450
              300        1.350  0.300   0.310  0.410  0.460
              300        1.350  0.300   0.310  0.380  0.430
              SoilCrop Sorghum: LL=[0.300, 0.300, 0.350, 0.320, 0.290, 0.310, 0.310]; KL=[0.080, 0.080, 0.080, 0.080, 0.060, 0.040, 0.020]; XF=[1, 1, 1, 1, 1, 1, 1]
            SoilWater: same as Lawes.LE13.Sorghum_LE13_Buster-I-N.paddock.GLH Field.SoilWater
            SoilOrganicMatter: same as Lawes.LE13.Sorghum_LE13_Buster-I-N.paddock.GLH Field.SoilOrganicMatter
            Analysis: Thickness=[200, 200, 200, 300, 300, 300, 300]; PH=[8.200, 8.700, 8.900, 8.100, 8, 8, 8]
            Sample Initial nitrogen
              Thickness  NO3    NH4
              200        9      0.100
              200        2.480  0.100
              200        2.790  0.100
              300        1.280  0.100
              300        2.980  0.100
              300        2.965  0.100
              300        1.387  0.100
          irrigation: same as Hermitage.HE1.Sorghum_HE1_T1.paddock.Irrigation
          fertiliser
          operations
            29/11/1995  Irrigation apply amount = 14
            1/12/1995  Irrigation apply amount = 10
            3/12/1995  Irrigation apply amount = 13
            5/12/1995  Irrigation apply amount = 8
            7/02/1996  Irrigation apply amount = 6
            29/11/1995  fertiliser apply amount = 119 (kg/ha), depth = 50 (mm), type = NO3_N ()
            28/12/1995  fertiliser apply amount = 59 (kg/ha), depth = 50 (mm), type = NO3_N ()
            7/02/1996  fertiliser apply amount = 59 (kg/ha), depth = 50 (mm), type = NO3_N ()
            28/11/1995  fertiliser apply amount = 0 (kg/ha), depth = 50 (mm), type = NO3_N ()
            28/11/1995  fertiliser apply amount = 122 (kg/ha), depth = 50 (mm), type = NO3_N ()
          sorghum: same as Lawes.LE13.Sorghum_LE13_Buster-I-N.paddock.sorghum
      simulation Sorghum_LE13_Buster+I+N
        clock
          start_date = 28/11/1995  # Select the start date of the simulation
          end_date = 1/05/1996  # Select the end date of the simulation
        summaryfile
        metfile met: filename=LE13.met
        area paddock
          outputfile: filename=Sorghum_LE13_Buster+I+N.out; title=Sorghum_LE13_Buster+I+N
            variables My Variables -> /Validation/shared/My Variables
            events My Variables Events -> /Validation/shared/My Variables
          folder Manager folder
            manager Sow SkipRow on a fixed date
              # Sowing criteria
              date = 29/11/1995  # Enter sowing date (d/m/yyyy)
              # Sowing parameters
              crop = Sorghum  # Enter name of crop to sow
              density = 16  # Enter sowing density (plants/m2)
              depth = 20  # Enter sowing depth (mm)
              cultivar = Buster  # Enter cultivar
              row_spacing = 0.5  # Enter row spacing (m)
              RowConfiguration = solid  # Enter skip row configuration
              ftn = 0.2  # Enter Fertile Tiller No.
              on start_of_day:
              script: same as in Hermitage.HE1.Sorghum_HE1_T1.paddock.Manager folder.Sow SkipRow on a fixed date
            manager Harvesting rule
              # Harvesting criteria
              crop = Sorghum  # Enter name of crop to harvest when ripe
              on end_of_day:
              script: same as in Hermitage.HE1.Sorghum_HE1_T1.paddock.Manager folder.Harvesting rule
          Soil GLH Field: LocalName=Cooper Lab; Site=Cooper Lab; Region=Gatton
            SoilType = GLHSoil  # Soil description
            NearestTown = Unknown
            NaturalVegetation = Unknown
            Water: same as Lawes.LE13.Sorghum_LE13_Buster-I+N.paddock.GLH Field.Water
            SoilWater: same as Lawes.LE13.Sorghum_LE13_Buster-I-N.paddock.GLH Field.SoilWater
            SoilOrganicMatter: same as Lawes.LE13.Sorghum_LE13_Buster-I-N.paddock.GLH Field.SoilOrganicMatter
            Analysis: Thickness=[200, 200, 200, 300, 300, 300, 300]; PH=[8.200, 8.700, 8.900, 8.100, 8, 8, 8]
            Sample Initial nitrogen
              Thickness  NO3    NH4
              200        9      0.100
              200        2.480  0.100
              200        2.790  0.100
              300        1.280  0.100
              300        2.980  0.100
              300        2.965  0.100
              300        1.387  0.100
            Sample Initial water: Thickness=[200, 200, 200, 300, 300, 300, 300]; SW=[0.385, 0.470, 0.467, 0.459, 0.394, 0.399, 0.380]
          irrigation: same as Hermitage.HE1.Sorghum_HE1_T1.paddock.Irrigation
          fertiliser
          operations
            29/11/1995  Irrigation apply amount = 14
            1/12/1995  Irrigation apply amount = 10
            3/12/1995  Irrigation apply amount = 13
            5/12/1995  Irrigation apply amount = 8
            7/02/1996  Irrigation apply amount = 6
            12/02/1996  Irrigation apply amount = 33
            26/02/1996  Irrigation apply amount = 20
            6/03/1996  Irrigation apply amount = 18
            18/03/1996  Irrigation apply amount = 25
            28/11/1995  fertiliser apply amount = 122 (kg/ha), depth = 50 (mm), type = NO3_N ()
            28/12/1995  fertiliser apply amount = 59 (kg/ha), depth = 50 (mm), type = NO3_N ()
            7/02/1996  fertiliser apply amount = 59 (kg/ha), depth = 50 (mm), type = NO3_N ()
            28/11/1995  fertiliser apply amount = 0 (kg/ha), depth = 50 (mm), type = NO3_N ()
          sorghum: same as Lawes.LE13.Sorghum_LE13_Buster-I-N.paddock.sorghum
      simulation Sorghum_LE13_M35-1-I-N
        clock
          start_date = 28/11/1995  # Select the start date of the simulation
          end_date = 1/05/1996  # Select the end date of the simulation
        summaryfile
        metfile met: filename=LE13.met
        area paddock
          outputfile: filename=Sorghum_LE13_M35-1-I-N.out; title=Sorghum_LE13_M35-1-I-N
            variables My Variables -> /Validation/shared/My Variables
            events My Variables Events -> /Validation/shared/My Variables
          folder Manager folder
            manager Sow SkipRow on a fixed date
              # Sowing criteria
              date = 29/11/1995  # Enter sowing date (d/m/yyyy)
              # Sowing parameters
              crop = Sorghum  # Enter name of crop to sow
              density = 16  # Enter sowing density (plants/m2)
              depth = 20  # Enter sowing depth (mm)
              cultivar = M35-1  # Enter cultivar
              row_spacing = 0.5  # Enter row spacing (m)
              RowConfiguration = solid  # Enter skip row configuration
              ftn = 0.2  # Enter Fertile Tiller No.
              on start_of_day:
              script: same as in Hermitage.HE1.Sorghum_HE1_T1.paddock.Manager folder.Sow SkipRow on a fixed date
            manager Harvesting rule
              # Harvesting criteria
              crop = Sorghum  # Enter name of crop to harvest when ripe
              on end_of_day:
              script: same as in Hermitage.HE1.Sorghum_HE1_T1.paddock.Manager folder.Harvesting rule
          Soil GLH Field: same as Lawes.LE13.Sorghum_LE13_Buster+I+N.paddock.GLH Field
          irrigation: same as Hermitage.HE1.Sorghum_HE1_T1.paddock.Irrigation
          fertiliser
          operations
            29/11/1995  Irrigation apply amount = 14
            1/12/1995  Irrigation apply amount = 10
            3/12/1995  Irrigation apply amount = 13
            5/12/1995  Irrigation apply amount = 8
            7/02/1996  Irrigation apply amount = 6
            28/11/1995  fertiliser apply amount = 0 (kg/ha), depth = 50 (mm), type = NO3_N ()
            28/11/1995  fertiliser apply amount = 12 (kg/ha), depth = 50 (mm), type = NO3_N ()
          sorghum: same as Lawes.LE13.Sorghum_LE13_Buster-I-N.paddock.sorghum
      simulation Sorghum_LE13_M35-1-I+N
        clock
          start_date = 28/11/1995  # Select the start date of the simulation
          end_date = 1/05/1996  # Select the end date of the simulation
        summaryfile
        metfile met: filename=LE13.met
        area paddock
          outputfile: filename=Sorghum_LE13_M35-1-I+N.out; title=Sorghum_LE13_M35-1-I+N
            variables My Variables -> /Validation/shared/My Variables
            events My Variables Events -> /Validation/shared/My Variables
          folder Manager folder
            manager Sow SkipRow on a fixed date
              # Sowing criteria
              date = 29/11/1995  # Enter sowing date (d/m/yyyy)
              # Sowing parameters
              crop = Sorghum  # Enter name of crop to sow
              density = 16  # Enter sowing density (plants/m2)
              depth = 20  # Enter sowing depth (mm)
              cultivar = M35-1  # Enter cultivar
              row_spacing = 0.5  # Enter row spacing (m)
              RowConfiguration = solid  # Enter skip row configuration
              ftn = 0  # Enter Fertile Tiller No.
              on start_of_day:
              script: same as in Hermitage.HE1.Sorghum_HE1_T1.paddock.Manager folder.Sow SkipRow on a fixed date
            manager Harvesting rule
              # Harvesting criteria
              crop = Sorghum  # Enter name of crop to harvest when ripe
              on end_of_day:
              script: same as in Hermitage.HE1.Sorghum_HE1_T1.paddock.Manager folder.Harvesting rule
          Soil GLH Field: same as Lawes.LE13.Sorghum_LE13_Buster+I+N.paddock.GLH Field
          irrigation: same as Hermitage.HE1.Sorghum_HE1_T1.paddock.Irrigation
          fertiliser
          operations: same as Lawes.LE13.Sorghum_LE13_Buster-I+N.paddock.operations
          sorghum: same as Lawes.LE13.Sorghum_LE13_Buster-I-N.paddock.sorghum
      simulation Sorghum_LE13_M35-1+I+N
        clock
          start_date = 28/11/1995  # Select the start date of the simulation
          end_date = 1/05/1996  # Select the end date of the simulation
        summaryfile
        metfile met: filename=LE13.met
        area paddock
          outputfile: filename=Sorghum_LE13_M35-1+I+N.out; title=Sorghum_LE13_M35-1+I+N
            variables My Variables -> /Validation/shared/My Variables
            events My Variables Events -> /Validation/shared/My Variables
          folder Manager folder: same as Lawes.LE13.Sorghum_LE13_M35-1-I+N.paddock.Manager folder
          Soil GLH Field: same as Lawes.LE13.Sorghum_LE13_Buster+I+N.paddock.GLH Field
          irrigation: same as Hermitage.HE1.Sorghum_HE1_T1.paddock.Irrigation
          fertiliser
          operations: same as Lawes.LE13.Sorghum_LE13_Buster+I+N.paddock.operations
          sorghum: same as Lawes.LE13.Sorghum_LE13_Buster-I-N.paddock.sorghum
    folder LE14
      simulation Sorghum_LE14_Buster
        clock
          start_date = 5/09/1996  # Select the start date of the simulation
          end_date = 19/02/1997  # Select the end date of the simulation
        summaryfile
        metfile met: filename=LE14.met
        area paddock
          outputfile: filename=Sorghum_LE14_Buster.out; title=Sorghum_LE14_Buster
            variables My Variables -> /Validation/shared/My Variables
            events My Variables Events -> /Validation/shared/My Variables
          folder Manager folder
            manager Sow SkipRow on a fixed date
              # Sowing criteria
              date = 11/10/1996  # Enter sowing date (d/m/yyyy)
              # Sowing parameters
              crop = Sorghum  # Enter name of crop to sow
              density = 10  # Enter sowing density (plants/m2)
              depth = 20  # Enter sowing depth (mm)
              cultivar = Buster  # Enter cultivar
              row_spacing = 0.5  # Enter row spacing (m)
              RowConfiguration = solid  # Enter skip row configuration
              ftn = 0.4  # Enter Fertile Tiller No.
              on start_of_day:
              script: same as in Hermitage.HE1.Sorghum_HE1_T1.paddock.Manager folder.Sow SkipRow on a fixed date
            manager Harvesting rule
              # Harvesting criteria
              crop = Sorghum  # Enter name of crop to harvest when ripe
              on end_of_day:
              script: same as in Hermitage.HE1.Sorghum_HE1_T1.paddock.Manager folder.Harvesting rule
          Soil GLH Field: LocalName=Cooper Lab; Site=Cooper Lab; Region=Gatton
            SoilType = GLHSoil  # Soil description
            NearestTown = Unknown
            NaturalVegetation = Unknown
            Water: same as Lawes.LE13.Sorghum_LE13_Buster-I+N.paddock.GLH Field.Water
            SoilWater: same as Lawes.LE13.Sorghum_LE13_Buster-I-N.paddock.GLH Field.SoilWater
            SoilOrganicMatter: same as Lawes.LE13.Sorghum_LE13_Buster-I-N.paddock.GLH Field.SoilOrganicMatter
            Analysis: Thickness=[200, 200, 200, 300, 300, 300, 300]; PH=[8.200, 8.700, 8.900, 8.100, 8, 8, 8]
            Sample Initial nitrogen
              Thickness  NO3     NH4
              200        11.624  0.100
              200        5.732   0.100
              200        2.974   0.100
              300        1.645   0.100
              300        1.902   0.100
              300        2.246   0.100
              300        1.942   0.100
            Sample Initial water: Thickness=[200, 200, 200, 300, 300, 300, 300]; SW=[0.385, 0.470, 0.467, 0.459, 0.394, 0.399, 0.380]
          irrigation
            automatic_irrigation = on  # switch
            asw_depth = 1800  # Depth to which ASW is calculated. (mm)
            crit_fr_asw = 1.0  # Fraction of ASW below which irrigation is applied (0-1.0)
            irrigation_efficiency = 1.0  # Efficiency of the irrigation. (0-1.0)
            default_no3_conc = 0.0  # Nitrate concentration (ppm N)
            default_nh4_conc = 0.0  # Ammonium concentration (ppm N)
            default_cl_conc = 0.0  # Chloride concentration (ppm Cl)
          fertiliser
          operations
            6/09/1996  fertiliser apply amount = 0 (kg/ha), depth = 50 (mm), type = NO3_N ()
            6/09/1996  fertiliser apply amount = 126 (kg/ha), depth = 50 (mm), type = NO3_N ()
            16/09/1996  fertiliser apply amount = 105 (kg/ha), depth = 50 (mm), type = NO3_N ()
            15/11/1996  fertiliser apply amount = 73 (kg/ha), depth = 50 (mm), type = NO3_N ()
            31/12/1996  fertiliser apply amount = 59 (kg/ha), depth = 50 (mm), type = NO3_N ()
          sorghum: same as Lawes.LE13.Sorghum_LE13_Buster-I-N.paddock.sorghum
      simulation Sorghum_LE14_M35-1
        clock
          start_date = 5/09/1996  # Select the start date of the simulation
          end_date = 19/02/1997  # Select the end date of the simulation
        summaryfile
        metfile met: filename=LE14.met
        area paddock
          outputfile: filename=Sorghum_LE14_M35-1.out; title=Sorghum_LE14_M35-1
            variables My Variables -> /Validation/shared/My Variables
            events My Variables Events -> /Validation/shared/My Variables
          folder Manager folder
            manager Sow SkipRow on a fixed date
              # Sowing criteria
              date = 11/10/1996  # Enter sowing date (d/m/yyyy)
              # Sowing parameters
              crop = Sorghum  # Enter name of crop to sow
              density = 10  # Enter sowing density (plants/m2)
              depth = 20  # Enter sowing depth (mm)
              cultivar = M35-1  # Enter cultivar
              row_spacing = 0.5  # Enter row spacing (m)
              RowConfiguration = solid  # Enter skip row configuration
              ftn = 0.1  # Enter Fertile Tiller No.
              on start_of_day:
              script: same as in Hermitage.HE1.Sorghum_HE1_T1.paddock.Manager folder.Sow SkipRow on a fixed date
            manager Harvesting rule
              # Harvesting criteria
              crop = Sorghum  # Enter name of crop to harvest when ripe
              on end_of_day:
              script: same as in Hermitage.HE1.Sorghum_HE1_T1.paddock.Manager folder.Harvesting rule
          Soil GLH Field: same as Lawes.LE14.Sorghum_LE14_Buster.paddock.GLH Field
          irrigation: same as Lawes.LE14.Sorghum_LE14_Buster.paddock.Irrigation
          fertiliser
          operations: same as Lawes.LE14.Sorghum_LE14_Buster.paddock.operations
          sorghum: same as Lawes.LE13.Sorghum_LE13_Buster-I-N.paddock.sorghum
      simulation Sorghum_LE14_QL41xQL36
        clock
          start_date = 5/09/1996  # Select the start date of the simulation
          end_date = 19/02/1997  # Select the end date of the simulation
        summaryfile
        metfile met: filename=LE14.met
        area paddock
          outputfile: filename=Sorghum_LE14_QL41xQL36.out; title=Sorghum_LE14_QL41xQL36
            variables My Variables -> /Validation/shared/My Variables
            events My Variables Events -> /Validation/shared/My Variables
          folder Manager folder
            manager Sow SkipRow on a fixed date
              # Sowing criteria
              date = 11/10/1996  # Enter sowing date (d/m/yyyy)
              # Sowing parameters
              crop = Sorghum  # Enter name of crop to sow
              density = 10  # Enter sowing density (plants/m2)
              depth = 20  # Enter sowing depth (mm)
              cultivar = QL41xQL36  # Enter cultivar
              row_spacing = 0.5  # Enter row spacing (m)
              RowConfiguration = solid  # Enter skip row configuration
              ftn = 0.4  # Enter Fertile Tiller No.
              on start_of_day:
              script: same as in Hermitage.HE1.Sorghum_HE1_T1.paddock.Manager folder.Sow SkipRow on a fixed date
            manager Harvesting rule
              # Harvesting criteria
              crop = Sorghum  # Enter name of crop to harvest when ripe
              on end_of_day:
              script: same as in Hermitage.HE1.Sorghum_HE1_T1.paddock.Manager folder.Harvesting rule
          Soil GLH Field: same as Lawes.LE14.Sorghum_LE14_Buster.paddock.GLH Field
          irrigation: same as Lawes.LE14.Sorghum_LE14_Buster.paddock.Irrigation
          fertiliser
          operations: same as Lawes.LE14.Sorghum_LE14_Buster.paddock.operations
          sorghum: same as Lawes.LE13.Sorghum_LE13_Buster-I-N.paddock.sorghum
    folder LE15
      simulation Sorghum_LE15_Buster
        clock
          start_date = 5/09/1996  # Select the start date of the simulation
          end_date = 8/05/1997  # Select the end date of the simulation
        summaryfile
        metfile met: filename=LE15.met
        area paddock
          outputfile: filename=Sorghum_LE15_Buster.out; title=Sorghum_LE15_Buster
            events -> /Validation/shared/My Variables
            variables My Variables -> /Validation/shared/My Variables
          folder Manager folder
            manager Sow SkipRow on a fixed date
              # Sowing criteria
              date = 6/01/1997  # Enter sowing date (d/m/yyyy)
              # Sowing parameters
              crop = Sorghum  # Enter name of crop to sow
              density = 10  # Enter sowing density (plants/m2)
              depth = 25  # Enter sowing depth (mm)
              cultivar = Buster  # Enter cultivar
              row_spacing = 0.5  # Enter row spacing (m)
              RowConfiguration = solid  # Enter skip row configuration
              ftn = 0.5  # Enter Fertile Tiller No.
              on start_of_day:
              script: same as in Hermitage.HE1.Sorghum_HE1_T1.paddock.Manager folder.Sow SkipRow on a fixed date
            manager Harvesting rule
              # Harvesting criteria
              crop = Sorghum  # Enter name of crop to harvest when ripe
              on end_of_day:
              script: same as in Hermitage.HE1.Sorghum_HE1_T1.paddock.Manager folder.Harvesting rule
          Soil GLH Field: LocalName=Cooper Lab; Site=Cooper Lab; Region=Gatton
            SoilType = GLHSoil  # Soil description
            NearestTown = Unknown
            NaturalVegetation = Unknown
            Water: same as Lawes.LE13.Sorghum_LE13_Buster-I+N.paddock.GLH Field.Water
            SoilWater: same as Lawes.LE13.Sorghum_LE13_Buster-I-N.paddock.GLH Field.SoilWater
            SoilOrganicMatter: same as Lawes.LE13.Sorghum_LE13_Buster-I-N.paddock.GLH Field.SoilOrganicMatter
            Analysis: Thickness=[200, 200, 200, 300, 300, 300, 300]; PH=[8.200, 8.700, 8.900, 8.100, 8, 8, 8]
            Sample Initial nitrogen
              Thickness  NO3     NH4
              200        11.624  0.100
              200        5.732   0.100
              200        2.974   0.100
              300        1.645   0.100
              300        1.902   0.100
              300        2.246   0.100
              300        1.942   0.100
            Sample Initial water: Thickness=[200, 200, 200, 300, 300, 300, 300]; SW=[0.390, 0.470, 0.479, 0.422, 0.393, 0.379, 0.405]
          irrigation: same as Hermitage.HE1.Sorghum_HE1_T1.paddock.Irrigation
          fertiliser
          operations
            6/01/1997  Irrigation apply amount = 31
            8/01/1997  Irrigation apply amount = 14
            10/01/1997  Irrigation apply amount = 14
            12/01/1997  Irrigation apply amount = 14
            14/01/1997  Irrigation apply amount = 11
            17/01/1997  Irrigation apply amount = 14
            20/01/1997  Irrigation apply amount = 7
            22/01/1997  Irrigation apply amount = 8
            24/01/1997  Irrigation apply amount = 17
            4/02/1997  Irrigation apply amount = 8
            12/02/1997  Irrigation apply amount = 24
            26/02/1997  Irrigation apply amount = 29
            11/03/1997  Irrigation apply amount = 22
            19/03/1997  Irrigation apply amount = 27
            27/03/1997  Irrigation apply amount = 25
            3/04/1997  Irrigation apply amount = 20
            9/04/1997  Irrigation apply amount = 32
            18/04/1997  Irrigation apply amount = 35
            27/04/1997  Irrigation apply amount = 22
            3/01/1997  fertiliser apply amount = 0 (kg/ha), depth = 50 (mm), type = NO3_N ()
            3/01/1997  fertiliser apply amount = 45 (kg/ha), depth = 50 (mm), type = NO3_N ()
            3/01/1997  fertiliser apply amount = 116 (kg/ha), depth = 50 (mm), type = NO3_N ()
            4/02/1997  fertiliser apply amount = 59 (kg/ha), depth = 50 (mm), type = NO3_N ()
            11/03/1997  fertiliser apply amount = 59 (kg/ha), depth = 50 (mm), type = NO3_N ()
          sorghum: same as Lawes.LE13.Sorghum_LE13_Buster-I-N.paddock.sorghum
      simulation Sorghum_LE15_M35-1
        clock
          start_date = 5/09/1996  # Select the start date of the simulation
          end_date = 8/05/1997  # Select the end date of the simulation
        summaryfile
        metfile met: filename=LE15.met
        area paddock
          outputfile: filename=Sorghum_LE15_M35-1.out; title=Sorghum_LE15_M35-1
            events -> /Validation/shared/My Variables
            variables My Variables -> /Validation/shared/My Variables
          folder Manager folder
            manager Sow SkipRow on a fixed date
              # Sowing criteria
              date = 6/01/1997  # Enter sowing date (d/m/yyyy)
              # Sowing parameters
              crop = Sorghum  # Enter name of crop to sow
              density = 10  # Enter sowing density (plants/m2)
              depth = 25  # Enter sowing depth (mm)
              cultivar = M35-1  # Enter cultivar
              row_spacing = 0.5  # Enter row spacing (m)
              RowConfiguration = solid  # Enter skip row configuration
              ftn = 0  # Enter Fertile Tiller No.
              on start_of_day:
              script: same as in Hermitage.HE1.Sorghum_HE1_T1.paddock.Manager folder.Sow SkipRow on a fixed date
            manager Harvesting rule
              # Harvesting criteria
              crop = Sorghum  # Enter name of crop to harvest when ripe
              on end_of_day:
              script: same as in Hermitage.HE1.Sorghum_HE1_T1.paddock.Manager folder.Harvesting rule
          Soil GLH Field: same as Lawes.LE15.Sorghum_LE15_Buster.paddock.GLH Field
          irrigation: same as Hermitage.HE1.Sorghum_HE1_T1.paddock.Irrigation
          fertiliser
          operations: same as Lawes.LE15.Sorghum_LE15_Buster.paddock.operations
          sorghum: same as Lawes.LE13.Sorghum_LE13_Buster-I-N.paddock.sorghum
      simulation Sorghum_LE15_QL41xQL36
        clock
          start_date = 5/09/1996  # Select the start date of the simulation
          end_date = 8/05/1997  # Select the end date of the simulation
        summaryfile
        metfile met: filename=LE15.met
        area paddock
          outputfile: filename=Sorghum_LE15_QL41xQL36.out; title=Sorghum_LE15_QL41xQL36
            events -> /Validation/shared/My Variables
            variables My Variables -> /Validation/shared/My Variables
          folder Manager folder
            manager Sow SkipRow on a fixed date
              # Sowing criteria
              date = 6/01/1997  # Enter sowing date (d/m/yyyy)
              # Sowing parameters
              crop = Sorghum  # Enter name of crop to sow
              density = 10  # Enter sowing density (plants/m2)
              depth = 25  # Enter sowing depth (mm)
              cultivar = QL41xQL36  # Enter cultivar
              row_spacing = 0.5  # Enter row spacing (m)
              RowConfiguration = solid  # Enter skip row configuration
              ftn = 0.5  # Enter Fertile Tiller No.
              on start_of_day:
              script: same as in Hermitage.HE1.Sorghum_HE1_T1.paddock.Manager folder.Sow SkipRow on a fixed date
            manager Harvesting rule
              # Harvesting criteria
              crop = Sorghum  # Enter name of crop to harvest when ripe
              on end_of_day:
              script: same as in Hermitage.HE1.Sorghum_HE1_T1.paddock.Manager folder.Harvesting rule
          Soil GLH Field: same as Lawes.LE15.Sorghum_LE15_Buster.paddock.GLH Field
          irrigation: same as Hermitage.HE1.Sorghum_HE1_T1.paddock.Irrigation
          fertiliser
          operations: same as Lawes.LE15.Sorghum_LE15_Buster.paddock.operations
          sorghum: same as Lawes.LE13.Sorghum_LE13_Buster-I-N.paddock.sorghum
    folder LE17
      simulation Sorghum_LE17_T1
        clock
          start_date = 27/11/1997  # Select the start date of the simulation
          end_date = 9/04/1998  # Select the end date of the simulation
        summaryfile
        metfile met: filename=LE17.met
        area paddock
          outputfile: filename=Sorghum_LE17_T1.out; title=Sorghum_LE17_T1
            events -> /Validation/shared/My Variables
            variables My Variables -> /Validation/shared/My Variables
          folder Manager folder
            manager Sow SkipRow on a fixed date
              # Sowing criteria
              date = 4/12/1997  # Enter sowing date (d/m/yyyy)
              # Sowing parameters
              crop = Sorghum  # Enter name of crop to sow
              density = 10  # Enter sowing density (plants/m2)
              depth = 25  # Enter sowing depth (mm)
              cultivar = Buster  # Enter cultivar
              row_spacing = 0.5  # Enter row spacing (m)
              RowConfiguration = solid  # Enter skip row configuration
              ftn = 1  # Enter Fertile Tiller No.
              on start_of_day:
              script: same as in Hermitage.HE1.Sorghum_HE1_T1.paddock.Manager folder.Sow SkipRow on a fixed date
            manager Harvesting rule
              # Harvesting criteria
              crop = Sorghum  # Enter name of crop to harvest when ripe
              on end_of_day:
              script: same as in Hermitage.HE1.Sorghum_HE1_T1.paddock.Manager folder.Harvesting rule
          Soil CooperLab: LocalName=Gatton CSIRO; Site=Gatton CSIRO; Region=SE Queensland
            SoilType = Gatton  # Soil description
            NearestTown = Unknown
            NaturalVegetation = Unknown
            Water: same as Lawes.LE13.Sorghum_LE13_Buster-I+N.paddock.GLH Field.Water
            SoilWater: same as Lawes.LE13.Sorghum_LE13_Buster-I-N.paddock.GLH Field.SoilWater
            SoilOrganicMatter: same as Lawes.LE13.Sorghum_LE13_Buster-I-N.paddock.GLH Field.SoilOrganicMatter
            Analysis: Thickness=[200, 200, 200, 300, 300, 300, 300]; PH=[7.700, 8.300, 8.400, 8.500, 8.500, 8.500, 8.600]
            Sample Initial nitrogen
              Thickness  NO3      NH4
              200        5.18718  0.1
              200        2.41329  0.1
              200        6.50018  0.1
              300        6.34423  0.1
              300        6.81417  0.1
              300        6.70303  0.1
              300        3.09205  0.1
            Sample Initial water: Thickness=[200, 200, 200, 300, 300, 300, 300]; SW=[0.340, 0.412, 0.439, 0.434, 0.405, 0.399, 0.389]
          irrigation: same as Hermitage.HE1.Sorghum_HE1_T1.paddock.Irrigation
          fertiliser
          operations
            4/12/1997  Irrigation apply amount = 72
            17/12/1997  Irrigation apply amount = 22
            29/12/1997  Irrigation apply amount = 27
            6/01/1998  Irrigation apply amount = 44
            19/01/1998  Irrigation apply amount = 40
            10/02/1998  Irrigation apply amount = 17
            5/03/1998  Irrigation apply amount = 43
            18/03/1998  Irrigation apply amount = 37
            3/12/1997  fertiliser apply amount = 0 (kg/ha), depth = 50 (mm), type = NO3_N ()
            3/12/1997  fertiliser apply amount = 40 (kg/ha), depth = 50 (mm), type = NO3_N ()
            4/12/1997  fertiliser apply amount = 147 (kg/ha), depth = 50 (mm), type = NO3_N ()
            6/01/1998  fertiliser apply amount = 59 (kg/ha), depth = 50 (mm), type = NO3_N ()
            10/02/1998  fertiliser apply amount = 59 (kg/ha), depth = 50 (mm), type = NO3_N ()
          sorghum: same as Lawes.LE13.Sorghum_LE13_Buster-I-N.paddock.sorghum
      simulation Sorghum_LE17_T2
        clock
          start_date = 27/11/1997  # Select the start date of the simulation
          end_date = 9/04/1998  # Select the end date of the simulation
        summaryfile
        metfile met: filename=LE17.met
        area paddock
          outputfile: filename=Sorghum_LE17_T2.out; title=Sorghum_LE17_T2
            events -> /Validation/shared/My Variables
            variables My Variables -> /Validation/shared/My Variables
          folder Manager folder
            manager Sow SkipRow on a fixed date
              # Sowing criteria
              date = 4/12/1997  # Enter sowing date (d/m/yyyy)
              # Sowing parameters
              crop = Sorghum  # Enter name of crop to sow
              density = 10  # Enter sowing density (plants/m2)
              depth = 25  # Enter sowing depth (mm)
              cultivar = M35-1  # Enter cultivar
              row_spacing = 0.5  # Enter row spacing (m)
              RowConfiguration = solid  # Enter skip row configuration
              ftn = 1  # Enter Fertile Tiller No.
              on start_of_day:
              script: same as in Hermitage.HE1.Sorghum_HE1_T1.paddock.Manager folder.Sow SkipRow on a fixed date
            manager Harvesting rule
              # Harvesting criteria
              crop = Sorghum  # Enter name of crop to harvest when ripe
              on end_of_day:
              script: same as in Hermitage.HE1.Sorghum_HE1_T1.paddock.Manager folder.Harvesting rule
          Soil CooperLab: LocalName=Gatton CSIRO; Site=Gatton CSIRO; Region=SE Queensland
            SoilType = Gatton  # Soil description
            NearestTown = Unknown
            NaturalVegetation = Unknown
            Water: same as Lawes.LE13.Sorghum_LE13_Buster-I+N.paddock.GLH Field.Water
            SoilWater: same as Lawes.LE13.Sorghum_LE13_Buster-I-N.paddock.GLH Field.SoilWater
            SoilOrganicMatter: same as Lawes.LE13.Sorghum_LE13_Buster-I-N.paddock.GLH Field.SoilOrganicMatter
            Analysis: Thickness=[200, 200, 200, 300, 300, 300, 300]; PH=[7.700, 8.300, 8.400, 8.500, 8.500, 8.500, 8.600]
            Sample Initial nitrogen
              Thickness  NO3     NH4
              200        17.363  0.1
              200        8.078   0.1
              200        21.758  0.1
              300        21.236  0.1
              300        22.809  0.1
              300        22.437  0.1
              300        10.35   0.1
            Sample Initial water: Thickness=[200, 200, 200, 300, 300, 300, 300]; SW=[0.340, 0.412, 0.439, 0.434, 0.405, 0.399, 0.389]
          irrigation: same as Hermitage.HE1.Sorghum_HE1_T1.paddock.Irrigation
          fertiliser
          operations: same as Lawes.LE17.Sorghum_LE17_T1.paddock.operations
          sorghum: same as Lawes.LE13.Sorghum_LE13_Buster-I-N.paddock.sorghum
      simulation Sorghum_LE17_T3
        clock
          start_date = 27/11/1997  # Select the start date of the simulation
          end_date = 9/04/1998  # Select the end date of the simulation
        summaryfile
        metfile met: filename=LE17.met
        area paddock
          outputfile: filename=Sorghum_LE17_T3.out; title=Sorghum_LE17_T3
            events -> /Validation/shared/My Variables
            variables My Variables -> /Validation/shared/My Variables
          folder Manager folder
            manager Sow SkipRow on a fixed date
              # Sowing criteria
              date = 4/12/1997  # Enter sowing date (d/m/yyyy)
              # Sowing parameters
              crop = Sorghum  # Enter name of crop to sow
              density = 10  # Enter sowing density (plants/m2)
              depth = 25  # Enter sowing depth (mm)
              cultivar = CSH13R  # Enter cultivar
              row_spacing = 0.5  # Enter row spacing (m)
              RowConfiguration = solid  # Enter skip row configuration
              ftn = 1  # Enter Fertile Tiller No.
              on start_of_day:
              script: same as in Hermitage.HE1.Sorghum_HE1_T1.paddock.Manager folder.Sow SkipRow on a fixed date
            manager Harvesting rule
              # Harvesting criteria
              crop = Sorghum  # Enter name of crop to harvest when ripe
              on end_of_day:
              script: same as in Hermitage.HE1.Sorghum_HE1_T1.paddock.Manager folder.Harvesting rule
          Soil CooperLab: LocalName=Gatton CSIRO; Site=Gatton CSIRO; Region=SE Queensland
            SoilType = Gatton  # Soil description
            NearestTown = Unknown
            NaturalVegetation = Unknown
            Water: same as Lawes.LE13.Sorghum_LE13_Buster-I+N.paddock.GLH Field.Water
            SoilWater: same as Lawes.LE13.Sorghum_LE13_Buster-I-N.paddock.GLH Field.SoilWater
            SoilOrganicMatter: same as Lawes.LE13.Sorghum_LE13_Buster-I-N.paddock.GLH Field.SoilOrganicMatter
            Analysis: Thickness=[200, 200, 200, 300, 300, 300, 300]; PH=[7.700, 8.300, 8.400, 8.500, 8.500, 8.500, 8.600]
            Sample Initial nitrogen
              Thickness  NO3     NH4
              200        17.363  0.100
              200        8.078   0.100
              200        21.758  0.100
              300        21.236  0.100
              300        22.809  0.100
              300        22.437  0.100
              300        10.350  0.100
            Sample Initial water: Thickness=[200, 200, 200, 300, 300, 300, 300]; SW=[0.340, 0.412, 0.439, 0.434, 0.405, 0.399, 0.389]
          irrigation
            automatic_irrigation = on  # switch
            asw_depth = 600.0  # Depth to which ASW is calculated. (mm)
            crit_fr_asw = 0.5  # Fraction of ASW below which irrigation is applied (0-1.0)
            irrigation_efficiency = 1.0  # Efficiency of the irrigation. (0-1.0)
            default_no3_conc = 0.0  # Nitrate concentration (ppm N)
            default_nh4_conc = 0.0  # Ammonium concentration (ppm N)
            default_cl_conc = 0.0  # Chloride concentration (ppm Cl)
          fertiliser
          operations: same as Lawes.LE17.Sorghum_LE17_T1.paddock.operations
          sorghum: same as Lawes.LE13.Sorghum_LE13_Buster-I-N.paddock.sorghum
    folder LE19
      irrigation
        automatic_irrigation = on  # switch
        asw_depth = 600.0  # Depth to which ASW is calculated. (mm)
        crit_fr_asw = 0.75  # Fraction of ASW below which irrigation is applied (0-1.0)
        irrigation_efficiency = 1.0  # Efficiency of the irrigation. (0-1.0)
        default_no3_conc = 0.0  # Nitrate concentration (ppm N)
        default_nh4_conc = 0.0  # Ammonium concentration (ppm N)
        default_cl_conc = 0.0  # Chloride concentration (ppm Cl)
      simulation Sorghum_LE19_T1
        clock
          start_date = 9/11/1998  # Select the start date of the simulation
          end_date = 7/03/1999  # Select the end date of the simulation
        summaryfile
        metfile met: filename=LE19.met
        area paddock
          outputfile: filename=Sorghum_LE19_T1.out; title=Sorghum_LE19_T1
            events -> /Validation/shared/My Variables
            variables My Variables -> /Validation/shared/My Variables
          folder Manager folder
            manager Sow SkipRow on a fixed date
              # Sowing criteria
              date = 11/11/1998  # Enter sowing date (d/m/yyyy)
              # Sowing parameters
              crop = Sorghum  # Enter name of crop to sow
              density = 10  # Enter sowing density (plants/m2)
              depth = 30  # Enter sowing depth (mm)
              cultivar = Buster  # Enter cultivar
              row_spacing = 0.5  # Enter row spacing (m)
              RowConfiguration = solid  # Enter skip row configuration
              ftn = 0  # Enter Fertile Tiller No.
              on start_of_day:
              script: same as in Hermitage.HE1.Sorghum_HE1_T1.paddock.Manager folder.Sow SkipRow on a fixed date
            manager Harvesting rule
              # Harvesting criteria
              crop = Sorghum  # Enter name of crop to harvest when ripe
              on end_of_day:
              script: same as in Hermitage.HE1.Sorghum_HE1_T1.paddock.Manager folder.Harvesting rule
          Soil CooperLab: LocalName=Gatton CSIRO; Site=Gatton CSIRO; Region=SE Queensland
            SoilType = Gatton  # Soil description
            NearestTown = Unknown
            NaturalVegetation = Unknown
            InitialWater Initial water: FractionFull=100; PercentMethod=FilledFromTop
            Water: same as Lawes.LE13.Sorghum_LE13_Buster-I+N.paddock.GLH Field.Water
            SoilWater: same as Lawes.LE13.Sorghum_LE13_Buster-I-N.paddock.GLH Field.SoilWater
            SoilOrganicMatter: same as Lawes.LE13.Sorghum_LE13_Buster-I-N.paddock.GLH Field.SoilOrganicMatter
            Analysis: Thickness=[200, 200, 200, 300, 300, 300, 300]; PH=[7.700, 8.300, 8.400, 8.500, 8.500, 8.500, 8.600]
            Sample Initial nitrogen
              Thickness  NO3    NH4
              200        8.581  0.100
              200        5.840  0.100
              200        1.684  0.100
              300        0.665  0.100
              300        0.363  0.100
              300        0.439  0.100
              300        0.582  0.100
          fertiliser
          operations
          irrigation: same as Lawes.LE19.Irrigation
          sorghum: same as Lawes.LE13.Sorghum_LE13_Buster-I-N.paddock.sorghum
      simulation Sorghum_LE19_T2
        clock
          start_date = 9/11/1998  # Select the start date of the simulation
          end_date = 7/03/1999  # Select the end date of the simulation
        summaryfile
        metfile met: filename=LE19.met
        area paddock
          outputfile: filename=Sorghum_LE19_T2.out; title=Sorghum_LE19_T2
            events -> /Validation/shared/My Variables
            variables My Variables -> /Validation/shared/My Variables
          folder Manager folder
            manager Sow SkipRow on a fixed date
              # Sowing criteria
              date = 11/11/1998  # Enter sowing date (d/m/yyyy)
              # Sowing parameters
              crop = Sorghum  # Enter name of crop to sow
              density = 10  # Enter sowing density (plants/m2)
              depth = 30  # Enter sowing depth (mm)
              cultivar = Buster  # Enter cultivar
              row_spacing = 0.5  # Enter row spacing (m)
              RowConfiguration = solid  # Enter skip row configuration
              ftn = 0.2  # Enter Fertile Tiller No.
              on start_of_day:
              script: same as in Hermitage.HE1.Sorghum_HE1_T1.paddock.Manager folder.Sow SkipRow on a fixed date
            manager Harvesting rule
              # Harvesting criteria
              crop = Sorghum  # Enter name of crop to harvest when ripe
              on end_of_day:
              script: same as in Hermitage.HE1.Sorghum_HE1_T1.paddock.Manager folder.Harvesting rule
          Soil CooperLab: LocalName=Gatton CSIRO; Site=Gatton CSIRO; Region=SE Queensland
            SoilType = Gatton  # Soil description
            NearestTown = Unknown
            NaturalVegetation = Unknown
            Water: same as Lawes.LE13.Sorghum_LE13_Buster-I+N.paddock.GLH Field.Water
            SoilWater: same as Lawes.LE13.Sorghum_LE13_Buster-I-N.paddock.GLH Field.SoilWater
            SoilOrganicMatter: same as Lawes.LE13.Sorghum_LE13_Buster-I-N.paddock.GLH Field.SoilOrganicMatter
            Analysis: Thickness=[200, 200, 200, 300, 300, 300, 300]; PH=[7.700, 8.300, 8.400, 8.500, 8.500, 8.500, 8.600]
            Sample Initial nitrogen
              Thickness  NO3    NH4
              200        8.581  0.100
              200        5.840  0.100
              200        1.684  0.100
              300        0.665  0.100
              300        0.363  0.100
              300        0.439  0.100
              300        0.582  0.100
            Sample Initial water: Thickness=[200, 200, 200, 300, 300, 300, 300]; SW=[0.293, 0.388, 0.371, 0.315, 0.307, 0.350, 0.374]
          fertiliser
          operations
            11/11/1998  fertiliser apply amount = 55 (kg/ha), depth = 50 (mm), type = NO3_N ()
          irrigation: same as Lawes.LE19.Irrigation
          sorghum: same as Lawes.LE13.Sorghum_LE13_Buster-I-N.paddock.sorghum
      simulation Sorghum_LE19_T3
        clock
          start_date = 9/11/1998  # Select the start date of the simulation
          end_date = 7/03/1999  # Select the end date of the simulation
        summaryfile
        metfile met: filename=LE19.met
        area paddock
          outputfile: filename=Sorghum_LE19_T3.out; title=Sorghum_LE19_T3
            events -> /Validation/shared/My Variables
            variables My Variables -> /Validation/shared/My Variables
          folder Manager folder
            manager Sow SkipRow on a fixed date
              # Sowing criteria
              date = 11/11/1998  # Enter sowing date (d/m/yyyy)
              # Sowing parameters
              crop = sorghum  # Enter name of crop to sow
              density = 10  # Enter sowing density (plants/m2)
              depth = 30  # Enter sowing depth (mm)
              cultivar = Buster  # Enter cultivar
              row_spacing = 0.5  # Enter row spacing (m)
              RowConfiguration = solid  # Enter skip row configuration
              ftn = 0.3  # Enter Fertile Tiller No.
              on start_of_day:
              script: same as in Hermitage.HE1.Sorghum_HE1_T1.paddock.Manager folder.Sow SkipRow on a fixed date
            manager Harvesting rule
              # Harvesting criteria
              crop = Sorghum  # Enter name of crop to harvest when ripe
              on end_of_day:
              script: same as in Hermitage.HE1.Sorghum_HE1_T1.paddock.Manager folder.Harvesting rule
          Soil CooperLab: same as Lawes.LE19.Sorghum_LE19_T2.paddock.CooperLab
          fertiliser
          operations
            11/11/1998  fertiliser apply amount = 55 (kg/ha), depth = 50 (mm), type = NO3_N ()
            13/12/1998  fertiliser apply amount = 27 (kg/ha), depth = 50 (mm), type = NO3_N ()
            14/01/1999  fertiliser apply amount = 27 (kg/ha), depth = 50 (mm), type = NO3_N ()
          irrigation: same as Lawes.LE19.Irrigation
          sorghum: same as Lawes.LE13.Sorghum_LE13_Buster-I-N.paddock.sorghum
      simulation Sorghum_LE19_T4
        clock
          start_date = 9/11/1998  # Select the start date of the simulation
          end_date = 7/03/1999  # Select the end date of the simulation
        summaryfile
        metfile met: filename=LE19.met
        area paddock
          outputfile: filename=Sorghum_LE19_T4.out; title=Sorghum_LE19_T4
            events -> /Validation/shared/My Variables
            variables My Variables -> /Validation/shared/My Variables
          folder Manager folder
            manager Sow SkipRow on a fixed date
              # Sowing criteria
              date = 11/11/1998  # Enter sowing date (d/m/yyyy)
              # Sowing parameters
              crop = Sorghum  # Enter name of crop to sow
              density = 10  # Enter sowing density (plants/m2)
              depth = 30  # Enter sowing depth (mm)
              cultivar = Buster  # Enter cultivar
              row_spacing = 0.5  # Enter row spacing (m)
              RowConfiguration = solid  # Enter skip row configuration
              ftn = 0.4  # Enter Fertile Tiller No.
              on start_of_day:
              script: same as in Hermitage.HE1.Sorghum_HE1_T1.paddock.Manager folder.Sow SkipRow on a fixed date
            manager Harvesting rule
              # Harvesting criteria
              crop = Sorghum  # Enter name of crop to harvest when ripe
              on end_of_day:
              script: same as in Hermitage.HE1.Sorghum_HE1_T1.paddock.Manager folder.Harvesting rule
          Soil CooperLab: same as Lawes.LE19.Sorghum_LE19_T2.paddock.CooperLab
          fertiliser
          operations
            11/11/1998  fertiliser apply amount = 55 (kg/ha), depth = 50 (mm), type = NO3_N ()
            13/12/1998  fertiliser apply amount = 55 (kg/ha), depth = 50 (mm), type = NO3_N ()
            14/01/1999  fertiliser apply amount = 55 (kg/ha), depth = 50 (mm), type = NO3_N ()
          irrigation: same as Lawes.LE19.Irrigation
          sorghum: same as Lawes.LE13.Sorghum_LE13_Buster-I-N.paddock.sorghum
      simulation Sorghum_LE19_T5
        clock
          start_date = 9/11/1998  # Select the start date of the simulation
          end_date = 7/03/1999  # Select the end date of the simulation
        summaryfile
        metfile met: filename=LE19.met
        area paddock
          outputfile: filename=Sorghum_LE19_T5.out; title=Sorghum_LE19_T5
            events -> /Validation/shared/My Variables
            variables My Variables -> /Validation/shared/My Variables
          folder Manager folder
            manager Sow SkipRow on a fixed date
              # Sowing criteria
              date = 11/11/1998  # Enter sowing date (d/m/yyyy)
              # Sowing parameters
              crop = Sorghum  # Enter name of crop to sow
              density = 10  # Enter sowing density (plants/m2)
              depth = 30  # Enter sowing depth (mm)
              cultivar = CSH13R  # Enter cultivar
              row_spacing = 0.5  # Enter row spacing (m)
              RowConfiguration = solid  # Enter skip row configuration
              ftn = 0  # Enter Fertile Tiller No.
              on start_of_day:
              script: same as in Hermitage.HE1.Sorghum_HE1_T1.paddock.Manager folder.Sow SkipRow on a fixed date
            manager Harvesting rule
              # Harvesting criteria
              crop = Sorghum  # Enter name of crop to harvest when ripe
              on end_of_day:
              script: same as in Hermitage.HE1.Sorghum_HE1_T1.paddock.Manager folder.Harvesting rule
          Soil CooperLab: same as Lawes.LE19.Sorghum_LE19_T2.paddock.CooperLab
          fertiliser
          operations
          irrigation: same as Lawes.LE19.Irrigation
          sorghum: same as Lawes.LE13.Sorghum_LE13_Buster-I-N.paddock.sorghum
      simulation Sorghum_LE19_T6
        clock
          start_date = 9/11/1998  # Select the start date of the simulation
          end_date = 7/03/1999  # Select the end date of the simulation
        summaryfile
        metfile met: filename=LE19.met
        area paddock
          outputfile: filename=Sorghum_LE19_T6.out; title=Sorghum_LE19_T6
            events -> /Validation/shared/My Variables
            variables My Variables -> /Validation/shared/My Variables
          folder Manager folder
            manager Sow SkipRow on a fixed date
              # Sowing criteria
              date = 11/11/1998  # Enter sowing date (d/m/yyyy)
              # Sowing parameters
              crop = Sorghum  # Enter name of crop to sow
              density = 10  # Enter sowing density (plants/m2)
              depth = 30  # Enter sowing depth (mm)
              cultivar = CSH13R  # Enter cultivar
              row_spacing = 0.5  # Enter row spacing (m)
              RowConfiguration = solid  # Enter skip row configuration
              ftn = 0.2  # Enter Fertile Tiller No.
              on start_of_day:
              script: same as in Hermitage.HE1.Sorghum_HE1_T1.paddock.Manager folder.Sow SkipRow on a fixed date
            manager Harvesting rule
              # Harvesting criteria
              crop = Sorghum  # Enter name of crop to harvest when ripe
              on end_of_day:
              script: same as in Hermitage.HE1.Sorghum_HE1_T1.paddock.Manager folder.Harvesting rule
          Soil CooperLab: same as Lawes.LE19.Sorghum_LE19_T2.paddock.CooperLab
          fertiliser
          operations
            11/11/1998  fertiliser apply amount = 55 (kg/ha), depth = 50 (mm), type = NO3_N ()
          irrigation: same as Lawes.LE19.Irrigation
          sorghum: same as Lawes.LE13.Sorghum_LE13_Buster-I-N.paddock.sorghum
      simulation Sorghum_LE19_T7
        clock
          start_date = 9/11/1998  # Select the start date of the simulation
          end_date = 7/03/1999  # Select the end date of the simulation
        summaryfile
        metfile met: filename=LE19.met
        area paddock
          outputfile: filename=Sorghum_LE19_T7.out; title=Sorghum_LE19_T7
            events -> /Validation/shared/My Variables
            variables My Variables -> /Validation/shared/My Variables
          folder Manager folder
            manager Sow SkipRow on a fixed date
              # Sowing criteria
              date = 11/11/1998  # Enter sowing date (d/m/yyyy)
              # Sowing parameters
              crop = Sorghum  # Enter name of crop to sow
              density = 10  # Enter sowing density (plants/m2)
              depth = 30  # Enter sowing depth (mm)
              cultivar = CSH13R  # Enter cultivar
              row_spacing = 0.5  # Enter row spacing (m)
              RowConfiguration = solid  # Enter skip row configuration
              ftn = 0.3  # Enter Fertile Tiller No.
              on start_of_day:
              script: same as in Hermitage.HE1.Sorghum_HE1_T1.paddock.Manager folder.Sow SkipRow on a fixed date
            manager Harvesting rule
              # Harvesting criteria
              crop = Sorghum  # Enter name of crop to harvest when ripe
              on end_of_day:
              script: same as in Hermitage.HE1.Sorghum_HE1_T1.paddock.Manager folder.Harvesting rule
          Soil CooperLab: same as Lawes.LE19.Sorghum_LE19_T2.paddock.CooperLab
          fertiliser
          operations
            11/11/1998  fertiliser apply amount = 55 (kg/ha), depth = 50 (mm), type = NO3_N ()
            17/12/1998  fertiliser apply amount = 27 (kg/ha), depth = 50 (mm), type = NO3_N ()
            23/01/1999  fertiliser apply amount = 27 (kg/ha), depth = 50 (mm), type = NO3_N ()
          irrigation: same as Lawes.LE19.Irrigation
          sorghum: same as Lawes.LE13.Sorghum_LE13_Buster-I-N.paddock.sorghum
      simulation Sorghum_LE19_T8
        clock
          start_date = 9/11/1998  # Select the start date of the simulation
          end_date = 7/03/1999  # Select the end date of the simulation
        summaryfile
        metfile met: filename=LE19.met
        area paddock
          outputfile: filename=Sorghum_LE19_T8.out; title=Sorghum_LE19_T8
            events -> /Validation/shared/My Variables
            variables My Variables -> /Validation/shared/My Variables
          folder Manager folder: same as Lawes.LE19.Sorghum_LE19_T7.paddock.Manager folder
          Soil CooperLab: same as Lawes.LE19.Sorghum_LE19_T2.paddock.CooperLab
          fertiliser
          operations
            11/11/1998  fertiliser apply amount = 55 (kg/ha), depth = 50 (mm), type = NO3_N ()
            17/12/1998  fertiliser apply amount = 55 (kg/ha), depth = 50 (mm), type = NO3_N ()
            23/01/1999  fertiliser apply amount = 55 (kg/ha), depth = 50 (mm), type = NO3_N ()
          irrigation: same as Lawes.LE19.Irrigation
          sorghum: same as Lawes.LE13.Sorghum_LE13_Buster-I-N.paddock.sorghum
    folder LE21
      simulation Sorghum_Gatton_RUE_1
        clock
          start_date = 22/11/1999  # Select the start date of the simulation
          end_date = 3/04/2000  # Select the end date of the simulation
        summaryfile
        metfile met: filename=Gatton_RUE.met
        area paddock
          outputfile: filename=Sorghum_Gatton_RUE_1.out; title=Sorghum_Gatton_RUE_1
            events My Variables Events -> /Validation/shared/My Variables
            variables My Variables -> /Validation/shared/My Variables
          folder Manager folder
            manager Sow SkipRow on a fixed date
              # Sowing criteria
              date = 2/12/1999  # Enter sowing date (d/m/yyyy)
              # Sowing parameters
              crop = Sorghum  # Enter name of crop to sow
              density = 10  # Enter sowing density (plants/m2)
              depth = 40  # Enter sowing depth (mm)
              cultivar = CSH13R  # Enter cultivar
              row_spacing = 0.5  # Enter row spacing (m)
              RowConfiguration = solid  # Enter skip row configuration
              ftn = 0  # Enter Fertile Tiller No.
              on start_of_day:
              script: same as in Hermitage.HE1.Sorghum_HE1_T1.paddock.Manager folder.Sow SkipRow on a fixed date
            manager Harvesting rule
              # Harvesting criteria
              crop = Sorghum  # Enter name of crop to harvest when ripe
              on end_of_day:
              script: same as in Hermitage.HE1.Sorghum_HE1_T1.paddock.Manager folder.Harvesting rule
          Soil Ian's Paddock: LocalName=Gatton RS; Site=Gatton RS; Region=Gatton
            SoilType = LawesBlackVertosol  # Soil description
            NearestTown = Unknown
            NaturalVegetation = Unknown
            InitialWater Initial water: FractionFull=1.00; PercentMethod=FilledFromTop
            Water
              Thickness  BD     AirDry  LL15   DUL    SAT
              150        1.320  0.100   0.260  0.410  0.460
              150        1.300  0.150   0.260  0.430  0.480
              300        1.230  0.250   0.260  0.460  0.510
              300        1.270  0.260   0.260  0.440  0.490
              300        1.370  0.250   0.250  0.400  0.450
              300        1.350  0.280   0.280  0.410  0.460
              300        1.350  0.310   0.310  0.380  0.430
              SoilCrop Sorghum: LL=[0.260, 0.260, 0.260, 0.260, 0.250, 0.280, 0.310]; KL=[0.080, 0.080, 0.080, 0.080, 0.060, 0.040, 0.020]; XF=[1, 1, 1, 1, 1, 1, 1]
            SoilWater: SummerCona=3.5; SummerU=6; SummerDate=1-Nov; WinterCona=3.5; WinterU=6; WinterDate=1-Apr; DiffusConst=88; DiffusSlope=35.4; Salb=0.13; CN2Bare=91; CNRed=20; CNCov=0.8; Thickness=[150, 150, 300, 300, 300, 300, 300]; SWCON=[0.500, 0.500, 0.500, 0.500, 0.500, 0.500, 0.500]
            SoilOrganicMatter: RootCN=30; RootWt=1500; SoilCN=12.5; EnrACoeff=7.4; EnrBCoeff=0.2
              Thickness  OC     FBiom  FInert
              150        1.300  0.030  0.310
              150        0.650  0.010  0.380
              300        0.320  0      0.470
              300        0.110  0      0.700
              300        0.110  0      0.900
              300        0.110  0      0.950
              300        0.110  0      0.950
            Analysis: Thickness=[150, 150, 300, 300, 300, 300, 300]; PH=[8.200, 8.700, 8.900, 8.100, 8, 8, 8]
            Sample Initial nitrogen
              Thickness  NO3    NH4
              150        9.202  0.100
              150        4.403  0.100
              300        2.239  0.100
              300        1.237  0.100
              300        1.266  0.100
              300        1.770  0.100
              300        2.064  0.100
          irrigation: same as Hermitage.HE1.Sorghum_HE1_T1.paddock.Irrigation
          fertiliser
          operations
            3/12/1999  Irrigation apply amount = 17
            6/12/1999  Irrigation apply amount = 20
            17/12/1999  Irrigation apply amount = 20
            7/01/2000  Irrigation apply amount = 10
            14/01/2000  Irrigation apply amount = 48
            27/01/2000  Irrigation apply amount = 21
            4/02/2000  Irrigation apply amount = 17
            11/02/2000  Irrigation apply amount = 30
            25/02/2000  Irrigation apply amount = 41
            3/03/2000  Irrigation apply amount = 15
            28/11/1999  fertiliser apply amount = 0 (kg/ha), depth = 50 (mm), type = NO3_N ()
            27/11/1999  fertiliser apply amount = 0 (kg/ha), depth = 50 (mm), type = NO3_N ()
          sorghum: same as Lawes.LE13.Sorghum_LE13_Buster-I-N.paddock.sorghum
      simulation Sorghum_Gatton_RUE_2
        clock
          start_date = 22/11/1999  # Select the start date of the simulation
          end_date = 3/04/2000  # Select the end date of the simulation
        summaryfile
        metfile met: filename=Gatton_RUE.met
        area paddock
          outputfile: filename=Sorghum_Gatton_RUE_2.out; title=Sorghum_Gatton_RUE_2
            events My Variables Events -> /Validation/shared/My Variables
            variables My Variables -> /Validation/shared/My Variables
          folder Manager folder
            manager Sow SkipRow on a fixed date
              # Sowing criteria
              date = 2/12/1999  # Enter sowing date (d/m/yyyy)
              # Sowing parameters
              crop = Sorghum  # Enter name of crop to sow
              density = 10  # Enter sowing density (plants/m2)
              depth = 40  # Enter sowing depth (mm)
              cultivar = A35xQL36  # Enter cultivar
              row_spacing = 0.5  # Enter row spacing (m)
              RowConfiguration = solid  # Enter skip row configuration
              ftn = 0  # Enter Fertile Tiller No.
              on start_of_day:
              script: same as in Hermitage.HE1.Sorghum_HE1_T1.paddock.Manager folder.Sow SkipRow on a fixed date
            manager Harvesting rule
              # Harvesting criteria
              crop = Sorghum  # Enter name of crop to harvest when ripe
              on end_of_day:
              script: same as in Hermitage.HE1.Sorghum_HE1_T1.paddock.Manager folder.Harvesting rule
          Soil Ian's Paddock: same as Lawes.LE21.Sorghum_Gatton_RUE_1.paddock.Ian's Paddock
          irrigation: same as Hermitage.HE1.Sorghum_HE1_T1.paddock.Irrigation
          fertiliser
          operations: same as Lawes.LE21.Sorghum_Gatton_RUE_1.paddock.operations
          sorghum: same as Lawes.LE13.Sorghum_LE13_Buster-I-N.paddock.sorghum
      simulation Sorghum_Gatton_RUE_3
        clock
          start_date = 22/11/1999  # Select the start date of the simulation
          end_date = 3/04/2000  # Select the end date of the simulation
        summaryfile
        metfile met: filename=Gatton_RUE.met
        area paddock
          outputfile: filename=Sorghum_Gatton_RUE_3.out; title=Sorghum_Gatton_RUE_3
            events My Variables Events -> /Validation/shared/My Variables
            variables My Variables -> /Validation/shared/My Variables
          folder Manager folder
            manager Sow SkipRow on a fixed date
              # Sowing criteria
              date = 2/12/1999  # Enter sowing date (d/m/yyyy)
              # Sowing parameters
              crop = sorghum  # Enter name of crop to sow
              density = 10  # Enter sowing density (plants/m2)
              depth = 40  # Enter sowing depth (mm)
              cultivar = QL39xQL36  # Enter cultivar
              row_spacing = 0.5  # Enter row spacing (m)
              RowConfiguration = solid  # Enter skip row configuration
              ftn = 0  # Enter Fertile Tiller No.
              on start_of_day:
              script: same as in Hermitage.HE1.Sorghum_HE1_T1.paddock.Manager folder.Sow SkipRow on a fixed date
            manager Harvesting rule
              # Harvesting criteria
              crop = Sorghum  # Enter name of crop to harvest when ripe
              on end_of_day:
              script: same as in Hermitage.HE1.Sorghum_HE1_T1.paddock.Manager folder.Harvesting rule
          Soil Ian's Paddock: same as Lawes.LE21.Sorghum_Gatton_RUE_1.paddock.Ian's Paddock
          irrigation: same as Hermitage.HE1.Sorghum_HE1_T1.paddock.Irrigation
          fertiliser
          operations: same as Lawes.LE21.Sorghum_Gatton_RUE_1.paddock.operations
          sorghum: same as Lawes.LE13.Sorghum_LE13_Buster-I-N.paddock.sorghum
      simulation Sorghum_Gatton_RUE_4
        clock
          start_date = 22/11/1999  # Select the start date of the simulation
          end_date = 3/04/2000  # Select the end date of the simulation
        summaryfile
        metfile met: filename=Gatton_RUE.met
        area paddock
          outputfile: filename=Sorghum_Gatton_RUE_4.out; title=Sorghum_Gatton_RUE_4
            events My Variables Events -> /Validation/shared/My Variables
            variables My Variables -> /Validation/shared/My Variables
          folder Manager folder: same as Lawes.LE21.Sorghum_Gatton_RUE_1.paddock.Manager folder
          Soil Ian's Paddock: same as Lawes.LE21.Sorghum_Gatton_RUE_1.paddock.Ian's Paddock
          irrigation: same as Hermitage.HE1.Sorghum_HE1_T1.paddock.Irrigation
          fertiliser
          operations
            3/12/1999  Irrigation apply amount = 17
            6/12/1999  Irrigation apply amount = 20
            17/12/1999  Irrigation apply amount = 20
            7/01/2000  Irrigation apply amount = 10
            14/01/2000  Irrigation apply amount = 48
            27/01/2000  Irrigation apply amount = 21
            4/02/2000  Irrigation apply amount = 17
            11/02/2000  Irrigation apply amount = 30
            25/02/2000  Irrigation apply amount = 41
            3/03/2000  Irrigation apply amount = 15
            29/11/1999  fertiliser apply amount = 44 (kg/ha), depth = 50 (mm), type = NO3_N ()
            28/11/1999  fertiliser apply amount = 0 (kg/ha), depth = 50 (mm), type = NO3_N ()
            27/11/1999  fertiliser apply amount = 0 (kg/ha), depth = 50 (mm), type = NO3_N ()
          sorghum: same as Lawes.LE13.Sorghum_LE13_Buster-I-N.paddock.sorghum
      simulation Sorghum_Gatton_RUE_5
        clock
          start_date = 22/11/1999  # Select the start date of the simulation
          end_date = 3/04/2000  # Select the end date of the simulation
        summaryfile
        metfile met: filename=Gatton_RUE.met
        area paddock
          outputfile: filename=Sorghum_Gatton_RUE_5.out; title=Sorghum_Gatton_RUE_5
            events My Variables Events -> /Validation/shared/My Variables
            variables My Variables -> /Validation/shared/My Variables
          folder Manager folder: same as Lawes.LE21.Sorghum_Gatton_RUE_2.paddock.Manager folder
          Soil Ian's Paddock: same as Lawes.LE21.Sorghum_Gatton_RUE_1.paddock.Ian's Paddock
          irrigation: same as Hermitage.HE1.Sorghum_HE1_T1.paddock.Irrigation
          fertiliser
          operations: same as Lawes.LE21.Sorghum_Gatton_RUE_4.paddock.operations
          sorghum: same as Lawes.LE13.Sorghum_LE13_Buster-I-N.paddock.sorghum
      simulation Sorghum_Gatton_RUE_6
        clock
          start_date = 22/11/1999  # Select the start date of the simulation
          end_date = 3/04/2000  # Select the end date of the simulation
        summaryfile
        metfile met: filename=Gatton_RUE.met
        area paddock
          outputfile: filename=Sorghum_Gatton_RUE_6.out; title=Sorghum_Gatton_RUE_6
            events My Variables Events -> /Validation/shared/My Variables
            variables My Variables -> /Validation/shared/My Variables
          folder Manager folder
            manager Sow SkipRow on a fixed date
              # Sowing criteria
              date = 2/12/1999  # Enter sowing date (d/m/yyyy)
              # Sowing parameters
              crop = Sorghum  # Enter name of crop to sow
              density = 10  # Enter sowing density (plants/m2)
              depth = 40  # Enter sowing depth (mm)
              cultivar = QL39xQL36  # Enter cultivar
              row_spacing = 0.5  # Enter row spacing (m)
              RowConfiguration = solid  # Enter skip row configuration
              ftn = 0  # Enter Fertile Tiller No.
              on start_of_day:
              script: same as in Hermitage.HE1.Sorghum_HE1_T1.paddock.Manager folder.Sow SkipRow on a fixed date
            manager Harvesting rule
              # Harvesting criteria
              crop = Sorghum  # Enter name of crop to harvest when ripe
              on end_of_day:
              script: same as in Hermitage.HE1.Sorghum_HE1_T1.paddock.Manager folder.Harvesting rule
          Soil Ian's Paddock: same as Lawes.LE21.Sorghum_Gatton_RUE_1.paddock.Ian's Paddock
          irrigation: same as Hermitage.HE1.Sorghum_HE1_T1.paddock.Irrigation
          fertiliser
          operations: same as Lawes.LE21.Sorghum_Gatton_RUE_4.paddock.operations
          sorghum: same as Lawes.LE13.Sorghum_LE13_Buster-I-N.paddock.sorghum
      simulation Sorghum_Gatton_RUE_7
        clock
          start_date = 22/11/1999  # Select the start date of the simulation
          end_date = 3/04/2000  # Select the end date of the simulation
        summaryfile
        metfile met: filename=Gatton_RUE.met
        area paddock
          outputfile: filename=Sorghum_Gatton_RUE_7.out; title=Sorghum_Gatton_RUE_7
            events My Variables Events -> /Validation/shared/My Variables
            variables My Variables -> /Validation/shared/My Variables
          folder Manager folder
            manager Sow SkipRow on a fixed date
              # Sowing criteria
              date = 2/12/1999  # Enter sowing date (d/m/yyyy)
              # Sowing parameters
              crop = Sorghum  # Enter name of crop to sow
              density = 10  # Enter sowing density (plants/m2)
              depth = 40  # Enter sowing depth (mm)
              cultivar = CSH13R  # Enter cultivar
              row_spacing = 0.5  # Enter row spacing (m)
              RowConfiguration = solid  # Enter skip row configuration
              ftn = 0.9  # Enter Fertile Tiller No.
              on start_of_day:
              script: same as in Hermitage.HE1.Sorghum_HE1_T1.paddock.Manager folder.Sow SkipRow on a fixed date
            manager Harvesting rule
              # Harvesting criteria
              crop = Sorghum  # Enter name of crop to harvest when ripe
              on end_of_day:
              script: same as in Hermitage.HE1.Sorghum_HE1_T1.paddock.Manager folder.Harvesting rule
          Soil Ian's Paddock: same as Lawes.LE21.Sorghum_Gatton_RUE_1.paddock.Ian's Paddock
          irrigation: same as Hermitage.HE1.Sorghum_HE1_T1.paddock.Irrigation
          fertiliser
          operations
            3/12/1999  Irrigation apply amount = 17
            6/12/1999  Irrigation apply amount = 20
            17/12/1999  Irrigation apply amount = 20
            7/01/2000  Irrigation apply amount = 10
            14/01/2000  Irrigation apply amount = 48
            27/01/2000  Irrigation apply amount = 21
            4/02/2000  Irrigation apply amount = 17
            11/02/2000  Irrigation apply amount = 30
            25/02/2000  Irrigation apply amount = 41
            3/03/2000  Irrigation apply amount = 15
            29/11/1999  fertiliser apply amount = 117 (kg/ha), depth = 50 (mm), type = NO3_N ()
            7/01/2000  fertiliser apply amount = 119 (kg/ha), depth = 50 (mm), type = NO3_N ()
            11/02/2000  fertiliser apply amount = 119 (kg/ha), depth = 50 (mm), type = NO3_N ()
            28/11/1999  fertiliser apply amount = 0 (kg/ha), depth = 50 (mm), type = NO3_N ()
            27/11/1999  fertiliser apply amount = 0 (kg/ha), depth = 50 (mm), type = NO3_N ()
          sorghum: same as Lawes.LE13.Sorghum_LE13_Buster-I-N.paddock.sorghum
      simulation Sorghum_Gatton_RUE_8
        clock
          start_date = 22/11/1999  # Select the start date of the simulation
          end_date = 3/04/2000  # Select the end date of the simulation
        summaryfile
        metfile met: filename=Gatton_RUE.met
        area paddock
          outputfile: filename=Sorghum_Gatton_RUE_8.out; title=Sorghum_Gatton_RUE_8
            events My Variables Events -> /Validation/shared/My Variables
            variables My Variables -> /Validation/shared/My Variables
          folder Manager folder
            manager Sow SkipRow on a fixed date
              # Sowing criteria
              date = 2/12/1999  # Enter sowing date (d/m/yyyy)
              # Sowing parameters
              crop = Sorghum  # Enter name of crop to sow
              density = 10  # Enter sowing density (plants/m2)
              depth = 40  # Enter sowing depth (mm)
              cultivar = A35xQL36  # Enter cultivar
              row_spacing = 0.5  # Enter row spacing (m)
              RowConfiguration = solid  # Enter skip row configuration
              ftn = 0.2  # Enter Fertile Tiller No.
              on start_of_day:
              script: same as in Hermitage.HE1.Sorghum_HE1_T1.paddock.Manager folder.Sow SkipRow on a fixed date
            manager Harvesting rule
              # Harvesting criteria
              crop = Sorghum  # Enter name of crop to harvest when ripe
              on end_of_day:
              script: same as in Hermitage.HE1.Sorghum_HE1_T1.paddock.Manager folder.Harvesting rule
          Soil Ian's Paddock: same as Lawes.LE21.Sorghum_Gatton_RUE_1.paddock.Ian's Paddock
          irrigation: same as Hermitage.HE1.Sorghum_HE1_T1.paddock.Irrigation
          fertiliser
          operations: same as Lawes.LE21.Sorghum_Gatton_RUE_7.paddock.operations
          sorghum: same as Lawes.LE13.Sorghum_LE13_Buster-I-N.paddock.sorghum
      simulation Sorghum_Gatton_RUE_9
        clock
          start_date = 22/11/1999  # Select the start date of the simulation
          end_date = 3/04/2000  # Select the end date of the simulation
        summaryfile
        metfile met: filename=Gatton_RUE.met
        area paddock
          outputfile: filename=Sorghum_Gatton_RUE_9.out; title=Sorghum_Gatton_RUE_9
            events My Variables Events -> /Validation/shared/My Variables
            variables My Variables -> /Validation/shared/My Variables
          folder Manager folder
            manager Sow SkipRow on a fixed date
              # Sowing criteria
              date = 2/12/1999  # Enter sowing date (d/m/yyyy)
              # Sowing parameters
              crop = sorghum  # Enter name of crop to sow
              density = 10  # Enter sowing density (plants/m2)
              depth = 40  # Enter sowing depth (mm)
              cultivar = QL39xQL36  # Enter cultivar
              row_spacing = 0.5  # Enter row spacing (m)
              RowConfiguration = solid  # Enter skip row configuration
              ftn = 0.9  # Enter Fertile Tiller No.
              on start_of_day:
              script: same as in Hermitage.HE1.Sorghum_HE1_T1.paddock.Manager folder.Sow SkipRow on a fixed date
            manager Harvesting rule
              # Harvesting criteria
              crop = Sorghum  # Enter name of crop to harvest when ripe
              on end_of_day:
              script: same as in Hermitage.HE1.Sorghum_HE1_T1.paddock.Manager folder.Harvesting rule
          Soil Ian's Paddock: same as Lawes.LE21.Sorghum_Gatton_RUE_1.paddock.Ian's Paddock
          irrigation: same as Hermitage.HE1.Sorghum_HE1_T1.paddock.Irrigation
          fertiliser
          operations: same as Lawes.LE21.Sorghum_Gatton_RUE_7.paddock.operations
          sorghum: same as Lawes.LE13.Sorghum_LE13_Buster-I-N.paddock.sorghum
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